n := 30
i := 0 .. n
j := 0 .. n
k := 0 .. n
f[i] := 2*π*i/n
t[j] := π*j/n
r := -1
Z[i, j] := t[j]*sin(f[i]/2)
X[i, j] := (r + t[j]/2*cos(f[i]/2))*cos(f[i])
Y[i, j] := (r + t[j]/2*cos(f[i]/2))*sin(f[i])
# [component: inputs (X, Y, Z)]
