m := 0 .. 20
n := 0 .. 20
r := 20
R := 30
α[m] := 2*π*m/20
β[n] := 2*π*n/20
X[m, n] := (R + r*cos(β[n]))*cos(α[m])
Y[m, n] := (R + r*cos(β[n]))*sin(α[m])
Z[m, n] := r*sin(β[n])
# [component: inputs (X, Y, Z)]
