P := sqrt(0.25) = 0.5
M := sqrt(0.35) = 0.591608
N := sqrt(0.4) = 0.632456
A := [P, M, N, 1]
cosf := sqrt(N^2 + M^2) = 0.866025
sinf := sqrt(N^2 + P^2)
cost := N/sqrt(N^2 + M^2) = 0.730297
sint := M/sqrt(N^2 + M^2) = 0.68313
Rx := [1, 0, 0, 0; 0, cosf, sinf, 0; 0, -sinf, cosf, 0; 0, 0, 0, 1] = [1, 0, 0, 0; 0, 0.866025, 0.806226, 0; 0, -0.806226, 0.866025, 0; 0, 0, 0, 1]
Ax := A*Rx = [0.5, 0.00244559, 1.02469, 1]
Ry := [cost, 0, -sint, 0; 0, 1, 0, 0; sint, 0, cost, 0; 0, 0, 0, 1] = [0.730297, 0, -0.68313, 0; 0, 1, 0, 0; 0.68313, 0, 0.730297, 0; 0, 0, 0, 1]
Ay := Ax*Ry = [1.06515, 0.00244559, 0.406764, 1]
