N := 20
i := 0 .. N
j := 0 .. N
xmin := -10
xmax := 10
ymin := -10
ymax := 10
R := 25
x[i] := xmin + i*(xmax - xmin)/N
y[j] := ymin + j*(ymax - ymin)/N
z(x, y) := sqrt(R^2 + x^2 - y^2)
A[i, j] := z(x[i], y[j])
# [component: inputs A]
# [component: inputs A]
