R1 := 14
R2 := 12
R3 := 10
R4 := 8
XL1 := 37
XL2 := 27
XL3 := 20
XC1 := 13
XC2 := 10
XC3 := 6
j := (-1)^(1/2)
ψ := 35
E := 200
Xm := 15
f := 50
U := E*e^(j*ψ*π/180) = 163.83 + 114.715i
Z1 := R1 + j*(XL1 - XC1) = 14 + 24i
Z2 := R2 + j*XL2 = 12 + 27i
Z3 := (-j)*XC2 = -10i
Z4 := R3 + j*XL3 = 10 + 20i
Z5 := R4 - j*XC3 = 8 - 6i
((Z3 + (Z5*Z4)/(Z5 + Z4))*Z2)/(Z2 + Z3 + Z4*Z5/(Z5 + Z4)) + Z1 = 30.1397 + 18.1339i
