W := transpose([2*π*848, 2*π*753, 2*π*674, 2*π*589, 2*π*518])
I := transpose([118, 162, 188, 150, 94])
UC := transpose([9, 14, 18.1, 16.7, 10.9])
f := transpose([60, 40, 0, -40, -60])
UL := transpose([14.3, 17.8, 18.4, 13, 6.7])
# [plot: I vs W]
# [plot: UC, UL vs W]
# [plot: f vs W]
