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# Розрахувати струми у всіх вітках кола методом контурних струмів.
# Скласти баланс потужностей.
#
# Параметри елементів схеми:
E1 := 250 V
R1 := 20 Ω
R4 := 35 Ω
E7 := 300 V
R2 := 25 Ω
R5 := 40 Ω
J := 25 A
R3 := 30 Ω
R6 := 45 Ω
# МЕТОД КОНТУРНИХ СТРУМІВ
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# Аналізуємо електричне коло і бачимо, що в ньому наявна вітка із джерелом струму. Обираємо незалежні контури так, щоб через джерело струму проходив тільки один контурний струм. Тоді цей контурний струм буде відомим і складати рівняння для цього контура буде непотрібно.
# Система рівнянь за методом контурних струмів в загальному вигляді для цієї схеми виглядає так:
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# Розшифруємо коефіцієнти рівнянь:
# Власні контурні опори
# (сума опорів віток, які утворюють цей контур)
R22 := R4 + R5 = 75 Ω
R33 := R2 + R3 + R4 = 90 Ω
R44 := R1 + R3 + R5 + R6 = 135 Ω
# Суміжні контурні опори
# (сума опорів, через які проходять обидва контурні струми. "+" - в одну сторону, "-" - в різні)
R21 := 0 Ω
R31 := 0 Ω
R41 := R6 = 45 Ω
R23 := -R4 = -35 Ω
R32 := -R4 = -35 Ω
R42 := R5 = 40 Ω
R24 := R5 = 40 Ω
R34 := R3 = 30 Ω
R43 := R3 = 30 Ω
# Контурні ЕРС (алгебраїчна сума ЕРС віток, що створюють незалежний контур)
Ek2 := E7 = 300 V
Ek3 := 0 V
Ek4 := E1 = 250 V
# Застосуємо Метод Крамера для розв'язання системи рівнянь
Δ := det([R22, R23, R24; R32, R33, R34; R42, R43, R44]) = 450375 Ω^3
Δ2 := det([Ek2 - R21*J, R23, R24; Ek3 - R31*J, R33, R34; Ek4 - R41*J, R43, R44]) = 7443750 kg^3*m^6/(s^9*A^5)
Δ3 := det([R22, Ek2 - R21*J, R24; R32, Ek3 - R31*J, R34; R42, Ek4 - R41*J, R44]) = 4971250 kg^3*m^6/(s^9*A^5)
Δ4 := det([R22, R23, Ek2 - R21*J; R32, R33, Ek3 - R31*J; R42, R43, Ek4 - R41*J]) = -6229375 kg^3*m^6/(s^9*A^5)
Ik1 := J = 25 A
Ik3 := Δ3/Δ = 11.038 A
Ik2 := Δ2/Δ = 16.5279 A
Ik4 := Δ4/Δ = -13.8315 A
# Струми віток дорівнюють алгебраїчній сумі контурних струмів, що проходять через ці вітки.
I1 := Ik4 = -13.8315 A
I5 := Ik2 + Ik4 = 2.69636 A
I2 := Ik3 = 11.038 A
I6 := Ik4 + Ik1 = 11.1685 A
I3 := Ik3 + Ik4 = -2.79351 A
I7 := Ik2 = 16.5279 A
I4 := Ik2 - Ik3 = 5.48987 A
# Cкладемо баланс потужностей.
# Потужність джерел:
Pdg := E1*I1 + E7*I7 + J*I6*R6 = 14065 W
# Потужність споживачів:
Psp := R1*I1^2 + R2*I2^2 + R3*I3^2 + R4*I4^2 + R5*I5^2 + R6*I6^2 = 14065 W
# Похибка складає:  ΔP := |Pdg - Psp|/Pdg*100% = 2.58654e-16
# Складаємо рівняння за законами Кірхгофа для перевірки правильності одержаних результатів.
# a)
J + I5 - I7 - I6 = -1.77636e-15 A
# b)
J + I1 - I6 = 0 A
# c)
I2 + I4 - I7 = 0 A
# d)
I4 + I3 - I5 = 0 A
# II)
I4*R4 + I5*R5 - E7 = 1.13687e-13 V
# III)
I2*R2 + I3*R3 - R4*I4 = -5.68434e-14 V
# IV)
I5*R5 + R3*I3 + I1*R1 + I6*R6 - E1 = 1.13687e-13 V
# Отже розрахунки виконано правильно.
# МЕТОД ВУЗЛОВИХ ПОТЕНЦІАЛІВ
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# Аналізуємо електричне коло і бачимо, що в ньому наявна вітка із джерелом ЕРС та R=0. Це вітка №7. Тому заземляємо один з прилеглих до цієї вітки вузлів. Інший прилеглий вузол буде відомим.
#
# Для цих вузлів складати рівняння не потрібно.
Ua := 0 V
Uc := E7 = 300 V
# Система рівнянь за методом вузлових потенціалів у загальному вигляді для цієї схеми виглядає так:
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# Розшифруємо коефіцієнти рівнянь:
# Власні провідності віток:
Gbb := 1/R1 + 1/R6 = 0.0722222 S
Gdd := 1/R3 + 1/R4 + 1/R5 = 0.0869048 S
Gee := 1/R1 + 1/R2 + 1/R3 = 0.123333 S
# Суміжні провідності віток:
Gba := 1/R6 = 0.0222222 S
Gdb := 0 S
Gea := 0 S
Gbc := 0 S
Gda := 1/R5 = 0.025 S
Geb := 1/R1 = 0.05 S
Gbd := 0 S
Gdc := 1/R4 = 0.0285714 S
Gec := 1/R2 = 0.04 S
Gbe := 1/R1 = 0.05 S
Gde := 1/R3 = 0.0333333 S
Ged := 1/R3 = 0.0333333 S
# Струми віток:
Ibb := -E1/R1 - J = -37.5 A
Iee := E1/R1 = 12.5 A
Idd := 0
# Застосуємо Метод Крамера для розв'язання системи рівнянь
Δ := det([Gbb, -Gbd, -Gbe; -Gdb, Gdd, -Gde; -Geb, -Ged, Gee]) = 0.000476587 S^3
Δb := det([
    Ibb + Gba*Ua + Gbc*Uc, -Gbd, -Gbe;
    Idd + Gda*Ua + Gdc*Uc, Gdd, -Gde;
    Iee + Gea*Ua + Gec*Uc, -Ged, Gee
]) = -0.239524 s^6*A^5/(kg^2*m^4)
Δd := det([
    Gbb, Ibb + Gba*Ua + Gbc*Uc, -Gbe;
    -Gdb, Idd + Gda*Ua + Gdc*Uc, -Gde;
    -Geb, Iee + Gea*Ua + Gec*Uc, Gee
]) = 0.0514021 s^6*A^5/(kg^2*m^4)
Δe := det([
    Gbb, -Gbd, Ibb + Gba*Ua + Gbc*Uc;
    -Gdb, Gdd, Idd + Gda*Ua + Gdc*Uc;
    -Geb, -Ged, Iee + Gea*Ua + Gec*Uc
]) = 0.0114616 s^6*A^5/(kg^2*m^4)
Ub := Δb/Δ = -502.581 V
Ud := Δd/Δ = 107.855 V
Ue := Δe/Δ = 24.0494 V
# Обчислюємо струми віток за законом Ома для ділянки кола.
I1 := (Ub - Ue + E1)/R1 = -13.8315 A
I2 := (Uc - Ue)/R2 = 11.038 A
I3 := (Ue - Ud)/R3 = -2.79351 A
I4 := (Uc - Ud)/R4 = 5.48987 A
I5 := (Ud - Ua)/R5 = 2.69636 A
I6 := (Ua - Ub)/R6 = 11.1685 A
I7 := J - I6 = 13.8315 A
# Напругу на вольтметрі Uv знайдемо за другим законом Кірхгофа.
Uv := -I3*R3 - I1*R1 = 360.436 V
# Потенціальна діаграма.
f(x) := transpose([Ua, Uc, Ud, Ue, Ub, Ua])
x := transpose([0, 0, R4, R3 + R4, R1 + R4 + R3, R6 + R1 + R4 + R3])
# [plot: f(x) vs x]
# МЕТОД НАКЛАДАННЯ
# Розраховуємо 3 часткові схеми, які мають лише одне джерело струму чи  напруги. Вилучаючи джерело ЕРС, залишаємо замість нього його внутрішній опір. Вилучаючи джерело струму, в схемі утворюється розрив, бо опір джерела струму нескінченно великий.
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# Схема 1
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# Застосувавши еквівалентні перетворення, отримали нову схему з такими опорами:
R40 := R2*R4/(R2 + R3 + R4) = 9.72222 Ω
R30 := R4*R3/(R2 + R3 + R4) = 11.6667 Ω
R20 := R2*R3/(R2 + R3 + R4) = 8.33333 Ω
# Обчислення:
R := R6 + R1 + R20 + R40*(R5 + R30)/(R5 + R30 + R40) = 81.5158 Ω
I60 := E1/R = 3.06689 A
I10 := I60 = 3.06689 A
I70 := I60*(R5 + R30)/(R5 + R30 + R40) = 2.58118 A
I50 := I60 - I70 = 0.485706 A
# Відповідь до схеми 1:
I41 := (R40*I70 - R30*I50)/R4 = 0.555093 A
I21 := (R40*I70 + R20*I10)/R2 = 2.02609 A
I61 := I60 = 3.06689 A
I51 := I50 = 0.485706 A
I31 := (R30*I50 + R20*I10)/R3 = 1.0408 A
I11 := I10 = 3.06689 A
I71 := I70 = 2.58118 A
# Схема 2
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# Розраховуємо за методом контурних струмів:
Δ := det([R4 + R5, -R4, -R5; -R4, R2 + R3 + R4, -R3; -R5, -R3, R1 + R3 + R5 + R6]) = 450375 Ω^3
Δ1 := det([E7, -R4, -R5; 0 V, R2 + R3 + R4, -R3; 0 V, -R3, R1 + R3 + R5 + R6]) = 3375000 kg^3*m^6/(s^9*A^5)
Δ2 := det([R4 + R5, E7, -R5; -R4, 0 V, -R3; -R5, 0 V, R1 + R3 + R5 + R6]) = 1777500 kg^3*m^6/(s^9*A^5)
Δ3 := det([R4 + R5, -R4, E7; -R4, R2 + R3 + R4, 0 V; -R5, -R3, 0 V]) = 1395000 kg^3*m^6/(s^9*A^5)
Ik1 := Δ1/Δ = 7.49376 A
Ik2 := Δ2/Δ = 3.94671 A
Ik3 := Δ3/Δ = 3.09742 A
# Відповідь до схеми 2:
I12 := Ik3 = 3.09742 A
I42 := Ik1 - Ik2 = 3.54704 A
I72 := Ik1 = 7.49376 A
I22 := Ik2 = 3.94671 A
I52 := Ik1 - Ik3 = 4.39634 A
I32 := Ik2 - Ik3 = 0.849292 A
I62 := Ik3 = 3.09742 A
# Схема 3
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R45 := R4*R5/(R4 + R5) = 18.6667 Ω
R2345 := R2*(R3 + R45)/(R2 + R3 + R45) = 16.5158 Ω
# Відповідь до схеми 3:
I13 := J*R6/(R1 + R6 + R2345) = 13.801 A
I63 := J - I13 = 11.199 A
I33 := -I13*R2/(R2 + R3 + R45) = -4.6836 A
I23 := I13 + I33 = 9.1174 A
I43 := I33*R5/(R4 + R5) = -2.49792 A
I53 := -(I33 - I43) = 2.18568 A
I73 := I23 - I43 = 11.6153 A
# Обчислюємо безпосередньо струми в початковій схемі:
I1 := I11 - I12 - I13 = -13.8315 A
I2 := -I21 + I22 + I23 = 11.038 A
I3 := I31 + I32 + I33 = -2.79351 A
I4 := -I41 + I42 - I43 = 5.48987 A
I5 := I51 + I52 - I53 = 2.69636 A
I6 := I61 - I62 + I63 = 11.1685 A
I7 := -I71 + I72 + I73 = 16.5279 A
# Виконаємо перевірку за І законом Кірхгофа:
J + I5 - I7 - I6 = -3.55271e-15 A
I7 - I2 - I4 = 1.77636e-15 A
I1 + I2 - I3 = 4.44089e-16 A
I4 + I3 - I5 = 0 A
# Визначення вхідних та взаємних провідностей віток, коефіцієнтів передачі струму.
# Коло з джерелом напруги Е1:
G11 := I11/E1 = 0.0122676 S
G51 := I51/E1 = 0.00194283 S
G21 := I21/E1 = 0.00810436 S
G61 := I61/E1 = 0.0122676 S
G31 := I31/E1 = 0.0041632 S
G71 := I71/E1 = 0.0103247 S
G41 := I41/E1 = 0.00222037 S
Gj1 := 0 S
# Коло з джерелом напруги Е7:
G17 := I12/E7 = 0.0103247 S
G57 := I52/E7 = 0.0146545 S
G27 := I22/E7 = 0.0131557 S
G67 := I62/E7 = 0.0103247 S
G37 := I32/E7 = 0.00283097 S
G77 := I72/E7 = 0.0249792 S
G47 := I42/E7 = 0.0118235 S
Gj7 := 0 S
# Коло з джерелом струму J:
K1 := I13/J = 0.55204
K5 := I53/J = 0.0874271
K2 := I23/J = 0.364696
K6 := I63/J = 0.44796
K3 := I33/J = -0.187344
K7 := I73/J = 0.464613
K4 := I43/J = -0.0999167
Kj := J/J = 1
# Розрахуємо якою повинна бути ЕРС Е1x, щоб I5x := 5 A
E1x := (I5x - G57*E7 - K5*J)/G51 = -814.286 V
# МЕТОД ЕКВІВАЛЕНТНОГО ГЕНЕРАТОРА
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# Ube=-J*R6-I50*R5-I30*R3
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# За методом накладання:
I30 := E7*R4/(((R2 + R3)*R4/(R2 + R3 + R4) + R5)*(R2 + R3 + R4)) + 0 A = 1.90045 A
I50 := E7/((R2 + R3)*R4/(R2 + R3 + R4) + R5) + 0 A = 4.88688 A
Ube := -J*R6 - I50*R5 - I30*R3 = -1377.49 V
Rbe := R2*(R3 + R4*R5/(R4 + R5))/(R2 + R3 + R4*R5/(R4 + R5)) + R6 = 61.5158 Ω
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Ee := Ube
Re := Rbe
I1 := (E1 + Ee)/(Re + R1) = -13.8315 A
# Яку ЕРС (Ex) потрібно увімкнути в 1 вітку, щоб струм І1 збільшився в 5 разів і змінив напрямок?
I1x := -5*I1 = 69.1576 A
Ex := I1x*(Re + R1)*1 V/(E1 + Ee) = -5 V
# Знайти залежність між струмом у першій вітці ( I1) і опором у третій вітці (R3 ) при незмінності всіх інших параметрів. Розрахувати струм I1 при опорі R3 = 5(Ом) .
# Еквівалентний опір кола відносно вітки з R3:
Re := R4*R5/(R4 + R5) + (R6 + R1)*R2/(R6 + R1 + R2) = 36.7222 Ω
# Струми холостого ходу:
i_1x := (E1 - J*R6 - E7)/(R2 + R1 + R6) = -13.0556 A
i_2x := -i_1x = 13.0556 A
i_4x := E7/(R4 + R5) = 4 A
# Напруга холостого ходу:
U_xx := i_4x*R4 - i_2x*R2 = -186.389 V
# Струм у вітці з R3:
i1(R3) := i_1x + (I1 - i_1x)/I3*U_xx/(R3 + Re)
i1(5 ohm) = -14.2965 A
# Перевіримо:
i1(30 ohm) = -13.8315 A
I1 = -13.8315 A
