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# Розрахувати струми у всіх вітках кола методом контурних струмів.
# Скласти баланс потужностей.
#
# Параметри елементів схеми:
E1 := 225 V
R1 := 60 Ω
R4 := 40 Ω
E7 := 275 V
R2 := 55 Ω
R5 := 35 Ω
J := 25 A
R3 := 50 Ω
R6 := 30 Ω
# МЕТОД КОНТУРНИХ СТРУМІВ
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# Аналізуємо електричне коло і бачимо, що в ньому наявна вітка із джерелом струму. Обираємо незалежні контури так, щоб через джерело струму проходив тільки один контурний струм. Тоді цей контурний струм буде відомим і складати рівняння для цього контура буде непотрібно.
# Система рівнянь за методом контурних струмів в загальному вигляді для цієї схеми виглядає так:
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# Розшифруємо коефіцієнти рівнянь:
# Власні контурні опори
# (сума опорів віток, які утворюють цей контур)
R22 := R4 + R5 = 75 Ω
R33 := R2 + R3 + R4 = 145 Ω
R44 := R1 + R3 + R5 + R6 = 175 Ω
# Суміжні контурні опори
# (сума опорів, через які проходять обидва контурні струми. "+" - в одну сторону, "-" - в різні)
R21 := 0 Ω
R31 := 0 Ω
R41 := R6 = 30 Ω
R23 := -R4 = -40 Ω
R32 := -R4 = -40 Ω
R42 := R5 = 35 Ω
R24 := R5 = 35 Ω
R34 := R3 = 50 Ω
R43 := R3 = 50 Ω
# Контурні ЕРС (алгебраїчна сума ЕРС віток, що створюють незалежний контур)
Ek2 := E7 = 275 V
Ek3 := 0 V
Ek4 := E1 = 225 V
# Застосуємо Метод Крамера для розв'язання системи рівнянь
Δ := det([R22, R23, R24; R32, R33, R34; R42, R43, R44]) = 1118000 Ω^3
Δ2 := det([Ek2 - R21*J, R23, R24; Ek3 - R31*J, R33, R34; Ek4 - R41*J, R43, R44]) = 10005000 kg^3*m^6/(s^9*A^5)
Δ3 := det([R22, Ek2 - R21*J, R24; R32, Ek3 - R31*J, R34; R42, Ek4 - R41*J, R44]) = 5110000 kg^3*m^6/(s^9*A^5)
Δ4 := det([R22, R23, Ek2 - R21*J; R32, R33, Ek3 - R31*J; R42, R43, Ek4 - R41*J]) = -6815000 kg^3*m^6/(s^9*A^5)
Ik1 := J = 25 A
Ik3 := Δ3/Δ = 4.57066 A
Ik2 := Δ2/Δ = 8.94902 A
Ik4 := Δ4/Δ = -6.09571 A
# Струми віток дорівнюють алгебраїчній сумі контурних струмів, що проходять через ці вітки.
I1 := Ik4 = -6.09571 A
I5 := Ik2 + Ik4 = 2.85331 A
I2 := Ik3 = 4.57066 A
I6 := Ik4 + Ik1 = 18.9043 A
I3 := Ik3 + Ik4 = -1.52504 A
I7 := Ik2 = 8.94902 A
I4 := Ik2 - Ik3 = 4.37835 A
# Cкладемо баланс потужностей.
# Потужність джерел:
Pdg := E1*I1 + E7*I7 + J*I6*R6 = 15267.7 W
# Потужність споживачів:
Psp := R1*I1^2 + R2*I2^2 + R3*I3^2 + R4*I4^2 + R5*I5^2 + R6*I6^2 = 15267.7 W
# Похибка складає:  ΔP := |Pdg - Psp|/Pdg*100% = 0
# Складаємо рівняння за законами Кірхгофа для перевірки правильності одержаних результатів.
# a)
J + I5 - I7 - I6 = -3.55271e-15 A
# b)
J + I1 - I6 = 0 A
# c)
I2 + I4 - I7 = 0 A
# d)
I4 + I3 - I5 = 0 A
# II)
I4*R4 + I5*R5 - E7 = 0 V
# III)
I2*R2 + I3*R3 - R4*I4 = -8.52651e-14 V
# IV)
I5*R5 + R3*I3 + I1*R1 + I6*R6 - E1 = 0 V
# Отже розрахунки виконано правильно.
# МЕТОД ВУЗЛОВИХ ПОТЕНЦІАЛІВ
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# Аналізуємо електричне коло і бачимо, що в ньому наявна вітка із джерелом ЕРС та R=0. Це вітка №7. Тому заземляємо один з прилеглих до цієї вітки вузлів. Інший прилеглий вузол буде відомим.
#
# Для цих вузлів складати рівняння не потрібно.
Ua := 0 V
Uc := E7 = 275 V
# Система рівнянь за методом вузлових потенціалів у загальному вигляді для цієї схеми виглядає так:
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# Розшифруємо коефіцієнти рівнянь:
# Власні провідності віток:
Gbb := 1/R1 + 1/R6 = 0.05 S
Gdd := 1/R3 + 1/R4 + 1/R5 = 0.0735714 S
Gee := 1/R1 + 1/R2 + 1/R3 = 0.0548485 S
# Суміжні провідності віток:
Gba := 1/R6 = 0.0333333 S
Gdb := 0 S
Gea := 0 S
Gbc := 0 S
Gda := 1/R5 = 0.0285714 S
Geb := 1/R1 = 0.0166667 S
Gbd := 0 S
Gdc := 1/R4 = 0.025 S
Gec := 1/R2 = 0.0181818 S
Gbe := 1/R1 = 0.0166667 S
Gde := 1/R3 = 0.02 S
Ged := 1/R3 = 0.02 S
# Струми віток:
Ibb := -E1/R1 - J = -28.75 A
Iee := E1/R1 = 3.75 A
Idd := 0
# Застосуємо Метод Крамера для розв'язання системи рівнянь
Δ := det([Gbb, -Gbd, -Gbe; -Gdb, Gdd, -Gde; -Geb, -Ged, Gee]) = 0.000161328 S^3
Δb := det([
    Ibb + Gba*Ua + Gbc*Uc, -Gbd, -Gbe;
    Idd + Gda*Ua + Gdc*Uc, Gdd, -Gde;
    Iee + Gea*Ua + Gec*Uc, -Ged, Gee
]) = -0.0914935 s^6*A^5/(kg^2*m^4)
Δd := det([
    Gbb, Ibb + Gba*Ua + Gbc*Uc, -Gbe;
    -Gdb, Idd + Gda*Ua + Gdc*Uc, -Gde;
    -Geb, Iee + Gea*Ua + Gec*Uc, Gee
]) = 0.0161111 s^6*A^5/(kg^2*m^4)
Δe := det([
    Gbb, -Gbd, Ibb + Gba*Ua + Gbc*Uc;
    -Gdb, Gdd, Idd + Gda*Ua + Gdc*Uc;
    -Geb, -Ged, Iee + Gea*Ua + Gec*Uc
]) = 0.00380952 s^6*A^5/(kg^2*m^4)
Ub := Δb/Δ = -567.129 V
Ud := Δd/Δ = 99.8658 V
Ue := Δe/Δ = 23.6136 V
# Обчислюємо струми віток за законом Ома для ділянки кола.
I1 := (Ub - Ue + E1)/R1 = -6.09571 A
I2 := (Uc - Ue)/R2 = 4.57066 A
I3 := (Ue - Ud)/R3 = -1.52504 A
I4 := (Uc - Ud)/R4 = 4.37835 A
I5 := (Ud - Ua)/R5 = 2.85331 A
I6 := (Ua - Ub)/R6 = 18.9043 A
I7 := J - I6 = 6.09571 A
# Напругу на вольтметрі Uv знайдемо за другим законом Кірхгофа.
Uv := -I3*R3 - I1*R1 = 441.995 V
# Потенціальна діаграма.
f(x) := transpose([Ua, Uc, Ud, Ue, Ub, Ua])
x := transpose([0, 0, R4, R3 + R4, R1 + R4 + R3, R6 + R1 + R4 + R3])
# [plot: f(x) vs x]
# МЕТОД НАКЛАДАННЯ
# Розраховуємо 3 часткові схеми, які мають лише одне джерело струму чи  напруги. Вилучаючи джерело ЕРС, залишаємо замість нього його внутрішній опір. Вилучаючи джерело струму, в схемі утворюється розрив, бо опір джерела струму нескінченно великий.
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# Схема 1
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# Застосувавши еквівалентні перетворення, отримали нову схему з такими опорами:
R40 := R2*R4/(R2 + R3 + R4) = 15.1724 Ω
R30 := R4*R3/(R2 + R3 + R4) = 13.7931 Ω
R20 := R2*R3/(R2 + R3 + R4) = 18.9655 Ω
# Обчислення:
R := R6 + R1 + R20 + R40*(R5 + R30)/(R5 + R30 + R40) = 120.539 Ω
I60 := E1/R = 1.86661 A
I10 := I60 = 1.86661 A
I70 := I60*(R5 + R30)/(R5 + R30 + R40) = 1.42386 A
I50 := I60 - I70 = 0.442755 A
# Відповідь до схеми 1:
I41 := (R40*I70 - R30*I50)/R4 = 0.387411 A
I21 := (R40*I70 + R20*I10)/R2 = 1.03645 A
I61 := I60 = 1.86661 A
I51 := I50 = 0.442755 A
I31 := (R30*I50 + R20*I10)/R3 = 0.830165 A
I11 := I10 = 1.86661 A
I71 := I70 = 1.42386 A
# Схема 2
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# Розраховуємо за методом контурних струмів:
Δ := det([R4 + R5, -R4, -R5; -R4, R2 + R3 + R4, -R3; -R5, -R3, R1 + R3 + R5 + R6]) = 1118000 Ω^3
Δ1 := det([E7, -R4, -R5; 0 V, R2 + R3 + R4, -R3; 0 V, -R3, R1 + R3 + R5 + R6]) = 6290625 kg^3*m^6/(s^9*A^5)
Δ2 := det([R4 + R5, E7, -R5; -R4, 0 V, -R3; -R5, 0 V, R1 + R3 + R5 + R6]) = 2406250 kg^3*m^6/(s^9*A^5)
Δ3 := det([R4 + R5, -R4, E7; -R4, R2 + R3 + R4, 0 V; -R5, -R3, 0 V]) = 1945625 kg^3*m^6/(s^9*A^5)
Ik1 := Δ1/Δ = 5.62668 A
Ik2 := Δ2/Δ = 2.15228 A
Ik3 := Δ3/Δ = 1.74027 A
# Відповідь до схеми 2:
I12 := Ik3 = 1.74027 A
I42 := Ik1 - Ik2 = 3.4744 A
I72 := Ik1 = 5.62668 A
I22 := Ik2 = 2.15228 A
I52 := Ik1 - Ik3 = 3.8864 A
I32 := Ik2 - Ik3 = 0.412008 A
I62 := Ik3 = 1.74027 A
# Схема 3
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R45 := R4*R5/(R4 + R5) = 18.6667 Ω
R2345 := R2*(R3 + R45)/(R2 + R3 + R45) = 30.5391 Ω
# Відповідь до схеми 3:
I13 := J*R6/(R1 + R6 + R2345) = 6.22205 A
I63 := J - I13 = 18.778 A
I33 := -I13*R2/(R2 + R3 + R45) = -2.76722 A
I23 := I13 + I33 = 3.45483 A
I43 := I33*R5/(R4 + R5) = -1.29137 A
I53 := -(I33 - I43) = 1.47585 A
I73 := I23 - I43 = 4.7462 A
# Обчислюємо безпосередньо струми в початковій схемі:
I1 := I11 - I12 - I13 = -6.09571 A
I2 := -I21 + I22 + I23 = 4.57066 A
I3 := I31 + I32 + I33 = -1.52504 A
I4 := -I41 + I42 - I43 = 4.37835 A
I5 := I51 + I52 - I53 = 2.85331 A
I6 := I61 - I62 + I63 = 18.9043 A
I7 := -I71 + I72 + I73 = 8.94902 A
# Виконаємо перевірку за І законом Кірхгофа:
J + I5 - I7 - I6 = 0 A
I7 - I2 - I4 = 0 A
I1 + I2 - I3 = 0 A
I4 + I3 - I5 = 8.88178e-16 A
# Визначення вхідних та взаємних провідностей віток, коефіцієнтів передачі струму.
# Коло з джерелом напруги Е1:
G11 := I11/E1 = 0.00829606 S
G51 := I51/E1 = 0.0019678 S
G21 := I21/E1 = 0.00460644 S
G61 := I61/E1 = 0.00829606 S
G31 := I31/E1 = 0.00368962 S
G71 := I71/E1 = 0.00632826 S
G41 := I41/E1 = 0.00172182 S
Gj1 := 0 S
# Коло з джерелом напруги Е7:
G17 := I12/E7 = 0.00632826 S
G57 := I52/E7 = 0.0141324 S
G27 := I22/E7 = 0.00782648 S
G67 := I62/E7 = 0.00632826 S
G37 := I32/E7 = 0.00149821 S
G77 := I72/E7 = 0.0204606 S
G47 := I42/E7 = 0.0126342 S
Gj7 := 0 S
# Коло з джерелом струму J:
K1 := I13/J = 0.248882
K5 := I53/J = 0.059034
K2 := I23/J = 0.138193
K6 := I63/J = 0.751118
K3 := I33/J = -0.110689
K7 := I73/J = 0.189848
K4 := I43/J = -0.0516547
Kj := J/J = 1
# Розрахуємо якою повинна бути ЕРС Е1x, щоб I5x := 5 A
E1x := (I5x - G57*E7 - K5*J)/G51 = -184.091 V
# МЕТОД ЕКВІВАЛЕНТНОГО ГЕНЕРАТОРА
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# Ube=-J*R6-I50*R5-I30*R3
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# За методом накладання:
I30 := E7*R4/(((R2 + R3)*R4/(R2 + R3 + R4) + R5)*(R2 + R3 + R4)) + 0 A = 1.18598 A
I50 := E7/((R2 + R3)*R4/(R2 + R3 + R4) + R5) + 0 A = 4.29919 A
Ube := -J*R6 - I50*R5 - I30*R3 = -959.771 V
Rbe := R2*(R3 + R4*R5/(R4 + R5))/(R2 + R3 + R4*R5/(R4 + R5)) + R6 = 60.5391 Ω
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Ee := Ube
Re := Rbe
I1 := (E1 + Ee)/(Re + R1) = -6.09571 A
# Яку ЕРС (Ex) потрібно увімкнути в 1 вітку, щоб струм І1 збільшився в 5 разів і змінив напрямок?
I1x := -5*I1 = 30.4785 A
Ex := I1x*(Re + R1)*1 V/(E1 + Ee) = -5 V
