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# Розрахувати струми у всіх вітках кола методом контурних струмів.
# Скласти баланс потужностей.
#
# Параметри елементів схеми:
E1 := 100 V
R1 := 20 Ω
R4 := 35 Ω
E7 := 150 V
R2 := 25 Ω
R5 := 40 Ω
J := 10 A
R3 := 30 Ω
R6 := 45 Ω
# МЕТОД КОНТУРНИХ СТРУМІВ
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# Аналізуємо електричне коло і бачимо, що в ньому наявна вітка із джерелом струму. Обираємо незалежні контури так, щоб через джерело струму проходив тільки один контурний струм. Тоді цей контурний струм буде відомим і складати рівняння для цього контура буде непотрібно.
# Система рівнянь за методом контурних струмів в загальному вигляді для цієї схеми виглядає так:
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# Розшифруємо коефіцієнти рівнянь:
# Власні контурні опори
# (сума опорів віток, які утворюють цей контур)
R22 := R1 + R4 + R5 + R6 = 140 Ω
R33 := R2 + R1 = 45 Ω
R44 := R2 + R3 + R4 = 90 Ω
# Суміжні контурні опори
# (сума опорів, через які проходять обидва контурні струми. "+" - в одну сторону, "-" - в різні)
R21 := -R5 = -40 Ω
R31 := 0 Ω
R41 := 0 Ω
R23 := -R1 = -20 Ω
R32 := -R1 = -20 Ω
R42 := -R4 = -35 Ω
R24 := -R4 = -35 Ω
R34 := -R2 = -25 Ω
R43 := -R2 = -25 Ω
# Контурні ЕРС (алгебраїчна сума ЕРС віток, що створюють незалежний контур)
Ek2 := -E1 = -100 V
Ek3 := E1 - E7 = -50 V
Ek4 := 0 V
# Застосуємо Метод Крамера для розв'язання системи рівнянь
Δ := det([R22, R23, R24; R32, R33, R34; R42, R43, R44]) = 353375 Ω^3
Δ2 := det([Ek2 - R21*J, R23, R24; Ek3 - R31*J, R33, R34; Ek4 - R41*J, R43, R44]) = 893750 kg^3*m^6/(s^9*A^5)
Δ3 := det([R22, Ek2 - R21*J, R24; R32, Ek3 - R31*J, R34; R42, Ek4 - R41*J, R44]) = 233750 kg^3*m^6/(s^9*A^5)
Δ4 := det([R22, R23, Ek2 - R21*J; R32, R33, Ek3 - R31*J; R42, R43, Ek4 - R41*J]) = 412500 kg^3*m^6/(s^9*A^5)
Ik1 := J = 10 A
Ik3 := Δ3/Δ = 0.661479 A
Ik2 := Δ2/Δ = 2.52918 A
Ik4 := Δ4/Δ = 1.16732 A
# Струми віток дорівнюють алгебраїчній сумі контурних струмів, що проходять через ці вітки.
I1 := Ik2 - Ik3 = 1.8677 A
I5 := Ik1 - Ik2 = 7.47082 A
I2 := Ik4 - Ik3 = 0.505837 A
I6 := Ik2 = 2.52918 A
I3 := Ik4 = 1.16732 A
I7 := Ik3 = 0.661479 A
I4 := Ik2 - Ik4 = 1.36187 A
# Cкладемо баланс потужностей.
# Потужність джерел:
Pdg := -E1*I1 - E7*I7 + J*I5*R5 = 2702.33 W
# *Потужності на джерелах Е1 та Е7 взяли зі знаком "-", оскільки вони працюють як споживачі.
# Потужність споживачів:
Psp := R1*I1^2 + R2*I2^2 + R3*I3^2 + R4*I4^2 + R5*I5^2 + R6*I6^2 = 2702.33 W
# Похибка складає:  ΔP := |Pdg - Psp|/Pdg*100% = 3.36559e-16
# Складаємо рівняння за законами Кірхгофа для перевірки правильності одержаних результатів.
# a)
J - I5 - I6 = 0 A
# b)
J - I4 - I3 - I5 = -8.88178e-16 A
# c)
I6 - I1 - I7 = -1.11022e-16 A
# d)
I1 - I2 - I4 = 2.22045e-16 A
# II)
I4*R4 + I1*R1 + I6*R6 - I5*R5 + E1 = -2.84217e-14 V
# III)
-I2*R2 - I1*R1 + E7 - E1 = 0 V
# IV)
I2*R2 + R3*I3 - I4*R4 = 1.42109e-14 V
# Отже розрахунки виконано правильно.
# МЕТОД ВУЗЛОВИХ ПОТЕНЦІАЛІВ
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# Аналізуємо електричне коло і бачимо, що в ньому наявна вітка із джерелом ЕРС та R=0. Це вітка №7. Тому заземляємо один з прилеглих до цієї вітки вузлів. Інший прилеглий вузол буде відомим.
#
# Для цих вузлів складати рівняння не потрібно.
Ue := 0 V
Uc := E7 = 150 V
# Система рівнянь за методом вузлових потенціалів у загальному вигляді для цієї схеми виглядає так:
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# Розшифруємо коефіцієнти рівнянь:
# Власні провідності віток:
Gaa := 1/R5 + 1/R6 = 0.0472222 S
Gbb := 1/R3 + 1/R4 + 1/R5 = 0.0869048 S
Gdd := 1/R1 + 1/R2 + 1/R4 = 0.118571 S
# Суміжні провідності віток:
Gab := 1/R5 = 0.025 S
Gba := 1/R5 = 0.025 S
Gda := 0 S
Gac := 1/R6 = 0.0222222 S
Gbc := 0 S
Gdb := 1/R4 = 0.0285714 S
Gad := 0 S
Gbd := 1/R4 = 0.0285714 S
Gdc := 1/R1 = 0.05 S
Gae := 0 S
Gbe := 1/R3 = 0.0333333 S
Gde := 1/R2 = 0.04 S
# Струми віток:
Ibb := -J = -10 A
Iaa := J = 10 A
Idd := -E1/R1 = -5 A
# Застосуємо Метод Крамера для розв'язання системи рівнянь
Δ := det([Gaa, -Gab, -Gad; -Gba, Gbb, -Gbd; -Gda, -Gdb, Gdd]) = 0.000373942 S^3
Δa := det([
    Iaa + Gac*Uc + Gae*Ue, -Gab, -Gad;
    Ibb + Gbc*Uc + Gbe*Ue, Gbb, -Gbd;
    Idd + Gdc*Uc + Gde*Ue, -Gdb, Gdd
]) = 0.0986508 s^6*A^5/(kg^2*m^4)
Δb := det([
    Gaa, Iaa + Gac*Uc + Gae*Ue, -Gad;
    -Gba, Ibb + Gbc*Uc + Gbe*Ue, -Gbd;
    -Gda, Idd + Gdc*Uc + Gde*Ue, Gdd
]) = -0.0130952 s^6*A^5/(kg^2*m^4)
Δd := det([
    Gaa, -Gab, Iaa + Gac*Uc + Gae*Ue;
    -Gba, Gbb, Ibb + Gbc*Uc + Gbe*Ue;
    -Gda, -Gdb, Idd + Gdc*Uc + Gde*Ue
]) = 0.00472884 s^6*A^5/(kg^2*m^4)
Ub := Δb/Δ = -35.0195 V
Ud := Δd/Δ = 12.6459 V
Ua := Δa/Δ = 263.813 V
# Обчислюємо струми віток за законом Ома для ділянки кола.
I1 := (Uc - Ud - E1)/R1 = 1.8677 A
I2 := (Ud - Ue)/R2 = 0.505837 A
I3 := (Ue - Ub)/R3 = 1.16732 A
I4 := (Ud - Ub)/R4 = 1.36187 A
I5 := (Ua - Ub)/R5 = 7.47082 A
I6 := (Ua - Uc)/R6 = 2.52918 A
I7 := I6 - I1 = 0.661479 A
# Напругу на вольтметрі Uv знайдемо за другим законом Кірхгофа.
Uv := I5*R5 - I4*R4 = 251.167 V
# Потенціальна діаграма.
f(x) := transpose([Ue, Uc, Ud, Ub, Ue])
x := transpose([0, 0, R1, R1 + R4, R1 + R4 + R3])
# [plot: f(x) vs x]
# МЕТОД НАКЛАДАННЯ
# Розраховуємо 3 часткові схеми, які мають лише одне джерело струму чи  напруги. Вилучаючи джерело ЕРС, залишаємо замість нього його внутрішній опір. Вилучаючи джерело струму, в схемі утворюється розрив, бо опір джерела струму нескінченно великий.
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# Схема 1
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# Застосувавши еквівалентні перетворення, отримали нову схему з такими опорами:
R30 := R2*R4/(R2 + R3 + R4) = 9.72222 Ω
R40 := R4*R3/(R2 + R3 + R4) = 11.6667 Ω
R20 := R2*R3/(R2 + R3 + R4) = 8.33333 Ω
# Обчислення:
R := R30 + R1 + R20*(R5 + R6 + R40)/(R5 + R6 + R20 + R40) = 37.3942 Ω
I11 := E1/R = 2.67421 A
I61 := I11*R20/(R5 + R6 + R20 + R40) = 0.212239 A
I51 := I61 = 0.212239 A
I71 := I11 - I61 = 2.46197 A
I41 := (R40*I51 + R30*I11)/R4 = 0.813583 A
I21 := (R20*I71 + R30*I11)/R2 = 1.86063 A
I31 := (R20*I71 - R40*I51)/R3 = 0.601344 A
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# Схема 2
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# Розраховуємо за методом контурних струмів:
Δ := det([R1 + R2, -R1, R2; -R1, R1 + R4 + R5 + R6, R4; R2, R4, R2 + R3 + R4]) = 353375 Ω^3
Δ1 := det([E7, -R1, R2; 0 V, R1 + R4 + R5 + R6, R4; 0 V, R4, R2 + R3 + R4]) = 1706250 kg^3*m^6/(s^9*A^5)
Δ2 := det([R1 + R2, E7, R2; -R1, 0 V, R4; R2, 0 V, R2 + R3 + R4]) = 401250 kg^3*m^6/(s^9*A^5)
Δ3 := det([R1 + R2, -R1, E7; -R1, R1 + R4 + R5 + R6, 0 V; R2, R4, 0 V]) = -630000 kg^3*m^6/(s^9*A^5)
Ik1 := Δ1/Δ = 4.82844 A
Ik2 := Δ2/Δ = 1.13548 A
Ik3 := Δ3/Δ = -1.78281 A
# Відповідь до схеми 2:
I12 := Ik1 - Ik2 = 3.69296 A
I42 := Ik3 + Ik2 = -0.647329 A
I72 := Ik1 = 4.82844 A
I22 := Ik1 + Ik3 = 3.04563 A
I52 := Ik2 = 1.13548 A
I32 := -Ik3 = 1.78281 A
I62 := Ik2 = 1.13548 A
# Схема 3
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R12 := R1*R2/(R1 + R2) = 11.1111 Ω
R1234 := R3*(R4 + R12)/(R4 + R3 + R12) = 18.1752 Ω
# Відповідь до схеми 3:
I63 := J*R5/(R5 + R6 + R1234) = 3.8769 A
I53 := J - I63 = 6.1231 A
I33 := I63*(R12 + R4)/(R4 + R3 + R12) = 2.34878 A
I43 := I63 - I33 = 1.52812 A
I23 := I43*R1/(R1 + R2) = 0.679165 A
I13 := I43 - I23 = 0.848956 A
I73 := I63 - I13 = 3.02794 A
# Обчислюємо безпосередньо струми в початковій схемі:
I1 := -I11 + I12 + I13 = 1.8677 A
I5 := I51 + I52 + I53 = 7.47082 A
I2 := -I21 + I22 - I23 = 0.505837 A
I6 := -I61 - I62 + I63 = 2.52918 A
I3 := I31 - I32 + I33 = 1.16732 A
I7 := I71 - I72 + I73 = 0.661479 A
I4 := -I41 - I42 + I43 = 1.36187 A
# Виконаємо перевірку за І законом Кірхгофа:
J - I5 - I6 = 0 A
I6 - I7 - I1 = 2.22045e-16 A
I1 - I2 - I4 = 4.44089e-16 A
I3 - I7 - I2 = 4.44089e-16 A
# Визначення вхідних та взаємних провідностей віток, коефіцієнтів передачі струму.
# Коло з джерелом напруги Е1:
G11 := I11/E1 = 0.0267421 S
G51 := I51/E1 = 0.00212239 S
G21 := I21/E1 = 0.0186063 S
G61 := I61/E1 = 0.00212239 S
G31 := I31/E1 = 0.00601344 S
G71 := I71/E1 = 0.0246197 S
G41 := I41/E1 = 0.00813583 S
Gj1 := 0 S
# Коло з джерелом напруги Е7:
G17 := I12/E7 = 0.0246197 S
G57 := I52/E7 = 0.00756986 S
G27 := I22/E7 = 0.0203042 S
G67 := I62/E7 = 0.00756986 S
G37 := I32/E7 = 0.0118854 S
G77 := I72/E7 = 0.0321896 S
G47 := I42/E7 = -0.00431553 S
Gj7 := 0 S
# Коло з джерелом струму J:
K1 := I13/J = 0.0848956
K5 := I53/J = 0.61231
K2 := I23/J = 0.0679165
K6 := I63/J = 0.38769
K3 := I33/J = 0.234878
K7 := I73/J = 0.302794
K4 := I43/J = 0.152812
Kj := J/J = 1
# Розрахуємо якою повинна бути ЕРС Е1x, щоб I5x := 5 A
E1x := (I5x - G57*E7 - K5*J)/G51 = -1064.17 V
# МЕТОД ЕКВІВАЛЕНТНОГО ГЕНЕРАТОРА
# Ube=E7+I20*R2
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# За методом накладання:
I201 := J*R5/(R5 + R6 + (R2 + R4)*R3/(R2 + R3 + R4))*R3/(R4 + R2 + R3) = 1.26984 A
I202 := E7/(R5 + R6 + (R2 + R4)*R3/(R2 + R3 + R4))*R3/(R4 + R2 + R3) = 0.47619 A
I20 := I201 - I202 = 0.793651 A
Ucd := E7 + I20*R2 = 169.841 V
Rbe := R2*(R4 + R3*(R5 + R6)/(R3 + R5 + R6))/(R2 + R4 + R3*(R5 + R6)/(R3 + R5 + R6)) = 17.3942 Ω
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Ee := Ucd
Re := Rbe
I1 := (-E1 + Ee)/(Re + R1) = 1.8677 A
# Яку ЕРС (Ex) потрібно увімкнути в 1 вітку, щоб струм І1 збільшився в 5 разів і змінив напрямок?
I1x := -5*I1 = -9.33852 A
Ex := I1x*(Re + R1)*1 V/(-E1 + Ee) = -5 V
