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# Розрахувати струми у всіх вітках кола методом контурних струмів.
# Скласти баланс потужностей.
#
# Параметри елементів схеми:
E1 := 225 V
R1 := 20 Ω
R4 := 35 Ω
E7 := 275 V
R2 := 25 Ω
R5 := 40 Ω
J := 25 A
R3 := 30 Ω
R6 := 45 Ω
# МЕТОД КОНТУРНИХ СТРУМІВ
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# Аналізуємо електричне коло і бачимо, що в ньому наявна вітка із джерелом струму. Обираємо незалежні контури так, щоб через джерело струму проходив тільки один контурний струм. Тоді цей контурний струм буде відомим і складати рівняння для цього контура буде непотрібно.
# Система рівнянь за методом контурних струмів в загальному вигляді для цієї схеми виглядає так:
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# Розшифруємо коефіцієнти рівнянь:
# Власні контурні опори
# (сума опорів віток, які утворюють цей контур)
R22 := R4 + R5 + R1 = 95 Ω
R33 := R2 + R3 + R4 = 90 Ω
R44 := R2 + R5 + R6 = 110 Ω
# Суміжні контурні опори
# (сума опорів, через які проходять обидва контурні струми. "+" - в одну сторону, "-" - в різні)
R21 := -R1 = -20 Ω
R31 := 0 Ω
R41 := 0 Ω
R23 := -R4 = -35 Ω
R32 := -R4 = -35 Ω
R42 := -R5 = -40 Ω
R24 := -R5 = -40 Ω
R34 := -R2 = -25 Ω
R43 := -R2 = -25 Ω
# Контурні ЕРС (алгебраїчна сума ЕРС віток, що створюють незалежний контур)
Ek2 := E1 = 225 V
Ek3 := 0 V
Ek4 := E7 = 275 V
# Застосуємо Метод Крамера для розв'язання системи рівнянь
Δ := det([R22, R23, R24; R32, R33, R34; R42, R43, R44]) = 532375 Ω^3
Δ2 := det([Ek2 - R21*J, R23, R24; Ek3 - R31*J, R33, R34; Ek4 - R41*J, R43, R44]) = 7955000 kg^3*m^6/(s^9*A^5)
Δ3 := det([R22, Ek2 - R21*J, R24; R32, Ek3 - R31*J, R34; R42, Ek4 - R41*J, R44]) = 4554375 kg^3*m^6/(s^9*A^5)
Δ4 := det([R22, R23, Ek2 - R21*J; R32, R33, Ek3 - R31*J; R42, R43, Ek4 - R41*J]) = 5258750 kg^3*m^6/(s^9*A^5)
Ik1 := J = 25 A
Ik3 := Δ3/Δ = 8.55483 A
Ik2 := Δ2/Δ = 14.9425 A
Ik4 := Δ4/Δ = 9.87791 A
# Струми віток дорівнюють алгебраїчній сумі контурних струмів, що проходять через ці вітки.
I1 := Ik1 - Ik2 = 10.0575 A
I5 := Ik2 - Ik4 = 5.06457 A
I2 := Ik4 - Ik3 = 1.32308 A
I6 := Ik4 = 9.87791 A
I3 := Ik3 = 8.55483 A
I7 := Ik1 - Ik4 = 15.1221 A
I4 := Ik2 - Ik3 = 6.38765 A
# Cкладемо баланс потужностей.
# Потужність джерел:
Pdg := -E1*I1 - E7*I7 + J*(I6*R6 + I3*R3) = 11107.2 W
# Потужність споживачів:
Psp := R1*I1^2 + R2*I2^2 + R3*I3^2 + R4*I4^2 + R5*I5^2 + R6*I6^2 = 11107.2 W
# Похибка складає:  ΔP := |Pdg - Psp|/Pdg*100% = 0
# Складаємо рівняння за законами Кірхгофа для перевірки правильності одержаних результатів.
# a)
J - I3 - I4 - I1 = -1.77636e-15 A
# b)
I5 + I1 - I7 = 0 A
# c)
J - I7 - I6 = 0 A
# d)
I4 - I2 - I5 = 0 A
# II)
I4*R4 + I5*R5 - I1*R1 - E1 = 0 V
# III)
I4*R4 + R2*I2 - I3*R3 = 5.68434e-14 V
# IV)
I2*R2 + I6*R6 - R5*I5 - E7 = 1.13687e-13 V
# Отже розрахунки виконано правильно.
# МЕТОД ВУЗЛОВИХ ПОТЕНЦІАЛІВ
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# Аналізуємо електричне коло і бачимо, що в ньому наявна вітка із джерелом ЕРС та R=0. Це вітка №7. Тому заземляємо один з прилеглих до цієї вітки вузлів. Інший прилеглий вузол буде відомим.
#
# Для цих вузлів складати рівняння не потрібно.
Uc := 0 V
Ub := E7 = 275 V
# Система рівнянь за методом вузлових потенціалів у загальному вигляді для цієї схеми виглядає так:
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# Розшифруємо коефіцієнти рівнянь:
# Власні провідності віток:
Gaa := 1/R3 + 1/R4 + 1/R1 = 0.111905 S
Gdd := 1/R4 + 1/R2 + 1/R5 = 0.0935714 S
Gee := 1/R6 + 1/R2 + 1/R3 = 0.0955556 S
# Суміжні провідності віток:
Gab := 1/R1 = 0.05 S
Gdb := 1/R5 = 0.025 S
Gea := 1/R3 = 0.0333333 S
Gac := 0 S
Gda := 1/R4 = 0.0285714 S
Geb := 0 S
Gad := 1/R4 = 0.0285714 S
Gdc := 0 S
Gec := 1/R6 = 0.0222222 S
Gae := 1/R3 = 0.0333333 S
Gde := 1/R2 = 0.04 S
Ged := 1/R2 = 0.04 S
# Струми віток:
Iaa := J + E1/R1 = 36.25 A
Iee := 0 A
Idd := 0 A
# Застосуємо Метод Крамера для розв'язання системи рівнянь
Δ := det([Gaa, -Gad, -Gae; -Gda, Gdd, -Gde; -Gea, -Ged, Gee]) = 0.00056336 S^3
Δa := det([
    Iaa + Gab*Ub + Gac*Uc, -Gad, -Gae;
    Idd + Gdb*Ub + Gdc*Uc, Gdd, -Gde;
    Iee + Geb*Ub + Gec*Uc, -Ged, Gee
]) = 0.395 s^6*A^5/(kg^2*m^4)
Δd := det([
    Gaa, Iaa + Gab*Ub + Gac*Uc, -Gae;
    -Gda, Idd + Gdb*Ub + Gdc*Uc, -Gde;
    -Gea, Iee + Geb*Ub + Gec*Uc, Gee
]) = 0.269051 s^6*A^5/(kg^2*m^4)
Δe := det([
    Gaa, -Gad, Iaa + Gab*Ub + Gac*Uc;
    -Gda, Gdd, Idd + Gdb*Ub + Gdc*Uc;
    -Gea, -Ged, Iee + Geb*Ub + Gec*Uc
]) = 0.250417 s^6*A^5/(kg^2*m^4)
Ua := Δa/Δ = 701.151 V
Ud := Δd/Δ = 477.583 V
Ue := Δe/Δ = 444.506 V
# Обчислюємо струми віток за законом Ома для ділянки кола.
I1 := (Ua - Ub - E1)/R1 = 10.0575 A
I2 := (Ud - Ue)/R2 = 1.32308 A
I3 := (Ua - Ue)/R3 = 8.55483 A
I4 := (Ua - Ud)/R4 = 6.38765 A
I5 := (Ud - Ub)/R5 = 5.06457 A
I6 := (Ue - Uc)/R6 = 9.87791 A
I7 := J - I6 = 15.1221 A
# Напругу на вольтметрі Uv знайдемо за другим законом Кірхгофа.
Uv := I1*R1 - I5*R5 = -1.43226 V
# Потенціальна діаграма.
f(x) := transpose([Uc, Ub, Ua, Ud, Ue, Uc])
x := transpose([0, 0, R1, R1 + R4, R1 + R4 + R2, R6 + R1 + R4 + R2])
# [plot: f(x) vs x]
# МЕТОД НАКЛАДАННЯ
# Розраховуємо 3 часткові схеми, які мають лише одне джерело струму чи  напруги. Вилучаючи джерело ЕРС, залишаємо замість нього його внутрішній опір. Вилучаючи джерело струму, в схемі утворюється розрив, бо опір джерела струму нескінченно великий.
# Схема 1
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# Застосувавши еквівалентні перетворення, отримали нову схему з такими опорами:
R24 := R2*R4/(R2 + R3 + R4) = 9.72222 Ω
R34 := R4*R3/(R2 + R3 + R4) = 11.6667 Ω
R23 := R2*R3/(R2 + R3 + R4) = 8.33333 Ω
# Обчислення:
R := R1 + R34 + (R6 + R23)*(R5 + R24)/(R5 + R6 + R23 + R24) = 57.3989 Ω
I11 := E1/R = 3.91993 A
I51 := I11*(R6 + R23)/(R5 + R6 + R23 + R24) = 2.02865 A
I61 := I11 - I51 = 1.89129 A
I71 := I61 = 1.89129 A
I21 := (R5*I51 - R6*I61)/R2 = -0.158488 A
I31 := (R34*I11 + R23*I61)/R3 = 2.04978 A
I41 := (R34*I11 + R24*I51)/R4 = 1.87016 A
# Схема 2
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# Застосувавши еквівалентні перетворення, отримали нову схему з такими опорами:
R24 := R2*R4/(R2 + R3 + R4) = 9.72222 Ω
R34 := R4*R3/(R2 + R3 + R4) = 11.6667 Ω
R23 := R2*R3/(R2 + R3 + R4) = 8.33333 Ω
# Обчислення:
R := R6 + R23 + (R1 + R34)*(R5 + R24)/(R5 + R1 + R34 + R24) = 72.6792 Ω
I62 := E7/R = 3.78375 A
I72 := I62 = 3.78375 A
I12 := I62*(R5 + R24)/(R5 + R1 + R34 + R24) = 2.31158 A
I52 := I62 - I12 = 1.47218 A
I22 := (R24*I52 + R23*I62)/R2 = 1.83376 A
I32 := (R34*I12 + R23*I62)/R3 = 1.94999 A
I42 := (R5*I52 - R1*I12)/R4 = 0.361587 A
# Схема 3
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# Застосувавши еквівалентні перетворення, отримали нову схему з такими опорами:
R24 := R2*R4/(R2 + R3 + R4) = 9.72222 Ω
R34 := R4*R3/(R2 + R3 + R4) = 11.6667 Ω
R23 := R2*R3/(R2 + R3 + R4) = 8.33333 Ω
# Обчислення:
I13 := J*(R34 + (R5 + R24)*(R6 + R23)/(R5 + R6 + R24 + R23))/(R1 + R34 + (R5 + R24)*(R6 + R23)/(R5 + R6 + R24 + R23)) = 16.289 A
I53 := (J - I13)*(R6 + R23)/(R5 + R6 + R23 + R24) = 4.5081 A
I63 := J - I13 - I53 = 4.20286 A
I43 := (R1*I13 - R5*I53)/R4 = 4.15591 A
I33 := J - I13 - I43 = 4.55506 A
I23 := I43 - I53 = -0.352195 A
I73 := I13 + I53 = 20.7971 A
# Обчислюємо безпосередньо струми в початковій схемі:
I1 := -I11 - I12 + I13 = 10.0575 A
I2 := I21 + I22 + I23 = 1.32308 A
I3 := I31 + I32 + I33 = 8.55483 A
I4 := I41 + I42 + I43 = 6.38765 A
I5 := I51 - I52 + I53 = 5.06457 A
I6 := I61 + I62 + I63 = 9.87791 A
I7 := -I71 - I72 + I73 = 15.1221 A
# Виконаємо перевірку за І законом Кірхгофа:
# a)
J - I3 - I4 - I1 = 0 A
# b)
I5 + I1 - I7 = 0 A
# c)
J - I7 - I6 = 0 A
# d)
I4 - I2 - I5 = -1.77636e-15 A
# Визначення вхідних та взаємних провідностей віток, коефіцієнтів передачі струму.
# Коло з джерелом напруги Е1:
G11 := I11/E1 = 0.0174219 S
G51 := I51/E1 = 0.0090162 S
G21 := I21/E1 = -0.000704391 S
G61 := I61/E1 = 0.00840573 S
G31 := I31/E1 = 0.00911012 S
G71 := I71/E1 = 0.00840573 S
G41 := I41/E1 = 0.00831181 S
Gj1 := 0 S
# Коло з джерелом напруги Е7:
G17 := I12/E7 = 0.00840573 S
G57 := I52/E7 = 0.00535337 S
G27 := I22/E7 = 0.00666823 S
G67 := I62/E7 = 0.0137591 S
G37 := I32/E7 = 0.00709087 S
G77 := I72/E7 = 0.0137591 S
G47 := I42/E7 = 0.00131486 S
Gj7 := 0 S
# Коло з джерелом струму J:
K1 := I13/J = 0.651561
K5 := I53/J = 0.180324
K2 := I23/J = -0.0140878
K6 := I63/J = 0.168115
K3 := I33/J = 0.182202
K7 := I73/J = 0.831885
K4 := I43/J = 0.166236
Kj := J/J = 1
# Розрахуємо якою повинна бути ЕРС Е1x, щоб I5x := 5 A
E1x := (I5x - G57*E7 - K5*J)/G51 = -108.724 V
# МЕТОД ЕКВІВАЛЕНТНОГО ГЕНЕРАТОРА
# Uab=I4e*R4+I5e*R5
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# За методом контурних струмів:
#
# Ik1 = J
# -R5*Ik1 + (R2+R5+R6)*Ik2 - R2*Ik3 = E7
# -R4*Ik1 - R2*Ik2 + (R2+R3+R4)*Ik3 = 0 V
Δ := det([R2 + R5 + R6, -R2; -R2, R2 + R3 + R4]) = 9275 Ω^2
Δ1 := det([E7 + J*R5, -R2; R4*J, R2 + R3 + R4]) = 136625 kg^2*m^4/(s^6*A^3)
Δ2 := det([R2 + R5 + R6, E7 + J*R5; -R2, R4*J]) = 128125 kg^2*m^4/(s^6*A^3)
Ik2 := Δ1/Δ = 14.7305 A
Ik3 := Δ2/Δ = 13.814 A
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I4e := J - Ik3 = 11.186 A
I5e := J - Ik2 = 10.2695 A
Ee := I4e*R4 + I5e*R5 = 802.291 V
Re := R34 + (R24 + R5)*(R23 + R6)/(R24 + R5 + R23 + R6) = 37.3989 Ω
I1 := (-E1 + Ee)/(Re + R1) = 10.0575 A
# Яку ЕРС (Ex) потрібно увімкнути в 1 вітку, щоб струм І1 збільшився в 5 разів і змінив напрямок?
I1x := -5*I1 = -50.2876 A
Ex := I1x*(Re + R1)/(E1 + Ee) = -2.80977
