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# Параметри елементів схеми:
E := 220 V
XL1 := 50 Ω
XL2 := 40 Ω
j := sqrt(-1)
ψ := (5*π/18) rad
XL3 := 35 Ω
XC1 := 20 Ω
f := 100 Hz
R1 := 16 Ω
XC2 := 15 Ω
ω := 2*π*f
R2 := 14 Ω
XC3 := 12 Ω
R3 := 12 Ω
Xm := 30 Ω
R4 := 10 Ω
# Розраховуємо струми комплексним методом
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Z1 := R1 + j*(XL1 - XC1) = (16 + 30i) Ω
Z1 = (16 + 30i) Ω
Z2 := R2 + j*XL2 = (14 + 40i) Ω
Z2 = (14 + 40i) Ω
Z3 := j*(XL3 - XC2) = 20i Ω
Z3 = 20i Ω
Z4 := R3 = 12 Ω
Z4 = 12 Ω
Z5 := R4 - j*XC3 = (10 - 12i) Ω
Z5 = (10 - 12i) Ω
Z := Z1 + (Z3 + Z4*Z5/(Z4 + Z5))*Z2/(Z3 + Z4*Z5/(Z4 + Z5) + Z2) = (20.6641 + 42.058i) Ω
Z = (20.6641 + 42.058i) Ω
I1 := E*e^(j*ψ)/Z = (4.55863 - 1.12257i) A
I1 = (4.55863 - 1.12257i) A
I3 := I1*Z2/(Z2 + Z3 + Z4*Z5/(Z4 + Z5)) = (3.17976 - 0.735226i) A
I3 = (3.17976 - 0.735226i) A
I2 := I1 - I3 = (1.37887 - 0.387346i) A
I2 = (1.37887 - 0.387346i) A
I4 := I3*Z5/(Z4 + Z5) = (1.67446 - 1.15527i) A
I4 = (1.67446 - 1.15527i) A
I5 := I3 - I4 = (1.5053 + 0.420041i) A
I5 = (1.5053 + 0.420041i) A
# Перевірка за першим законом Кірхгофа:
I1 - I3 - I2 = 0 A
I3 - I5 - I4 = 0 A
# Баланс активних і реактивних потужностей:
U := E*e^(j*ψ) = (141.413 + 168.53i) V
U = (141.413 + 168.53i) V
S := U*conj(I1) = (455.464 + 927.012i) W
S = (455.464 + 927.012i) W
P := |I1|^2*R1 + |I2|^2*R2 + |I4|^2*R3 + |I5|^2*R4 = 455.464 W
Q := |I2|^2*XL2 + |I1|^2*(XL1 - XC1) + |I3|^2*(XL3 - XC2) - |I5|^2*XC3 = 927.012 W
# Розрахуємо похибку обчислень:
ΔP := (P - Re(S))/P*100% = 1.24803e-16
ΔQ := (Q - Im(S))/S*100% = 0
# Розрахуємо покази вольтметра:
Ucomplex := -I2*R2 + I3*(j*XL3) - I5*(j*XC3) = (11.4692 + 98.6508i) V
Uv := sqrt(Re(Ucomplex)^2 + Im(Ucomplex)^2) = 99.3153 V
# Суміщена діаграма струмів і напруг
# Визначимо потенціали точок кола
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Ua := 0 V
Ub := Ua - I1*(j*XC1) = (-22.4514 - 91.1726i) V
Uc := Ub + I1*R1 = (50.4867 - 109.134i) V
Ud := Uc + I3*(j*XL3) = (76.2196 + 2.15783i) V
Uk := Ud - I5*(j*XC3) = (81.2601 - 15.9058i) V
Uf := Uk + I5*R4 = (96.3131 - 11.7054i) V
Um := Uc + I2*R2 = (69.7909 - 114.557i) V
Uh := Um + I2*(j*XL2) = (85.2847 - 59.4018i) V
Ug := Uh + I1*(j*XL1) = (141.413 + 168.53i) V
xI1 := transpose([0, Re(I1)*20])
yI1 := transpose([0, Im(I1)*20])
xI2 := transpose([0, Re(I2)*20])
yI2 := transpose([0, Im(I2)*20])
xI3 := transpose([0, Re(I3)*20])
yI3 := transpose([0, Im(I3)*20])
xI4 := transpose([0, Re(I4)*20])
yI4 := transpose([0, Im(I4)*20])
xI5 := transpose([0, Re(I5)*20])
yI5 := transpose([0, Im(I5)*20])
X1 := transpose([Re(Ua), Re(Ub), Re(Uc), Re(Um), Re(Uh), Re(Ug), 0])
X2 := transpose([Re(Uc), Re(Ud), Re(Uk), Re(Uf), Re(Uh)])
X3 := transpose([Re(Ud), Re(Uf)])
Y1 := transpose([Im(Ua), Im(Ub), Im(Uc), Im(Um), Im(Uh), Im(Ug), 0])
Y2 := transpose([Im(Uc), Im(Ud), Im(Uk), Im(Uf), Im(Uh)])
Y3 := transpose([Im(Ud), Im(Uf)])
# [plot: Y1, Y2, Y3, yI1, yI2, yI3, yI4, yI5 vs X1, X2, X3, xI1, xI2, xI3, xI4, xI5]
# Приймаємо активний опір другої вітки рівним нулю і за умови резонансу струмів розраховуємо реактивний опір цієї вітки.
Y := 1/(Z3 + Z4*Z5/(Z4 + Z5)) = (0.020109 - 0.0498674i) S
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# -> за умовою резонансу.
XL2r := 1/Im(Y) = -20.0532 Ω
# -> опір котушки L2.
Z2r := j*XL2r = -20.0532i Ω
# -> опір вітки 2.
# Обчислимо струми віток за умови резонансу:
Zr := Z1 + (Z3 + Z4*Z5/(Z4 + Z5))*Z2r/(Z3 + Z4*Z5/(Z4 + Z5) + Z2r) = (65.7289 + 30i) Ω
Zr = (65.7289 + 30i) Ω
I1r := E*e^(j*ψ)/Zr = (2.74905 + 1.30929i) A
I1r = (2.74905 + 1.30929i) A
I3r := I1r*Z2r/(Z2r + Z3 + Z4*Z5/(Z4 + Z5)) = (5.9959 - 5.50795i) A
I3r = (5.9959 - 5.50795i) A
I2r := I1r - I3r = (-3.24685 + 6.81724i) A
I2r = (-3.24685 + 6.81724i) A
I4r := I3r*Z5/(Z4 + Z5) = (2.21236 - 4.56736i) A
I4r = (2.21236 - 4.56736i) A
I5r := I3r - I4r = (3.78354 - 0.940586i) A
I5r = (3.78354 - 0.940586i) A
# Баланс активних і реактивних потужностей:
U := E*e^(j*ψ) = (141.413 + 168.53i) V
U = (141.413 + 168.53i) V
Sr := U*conj(I1r) = (609.406 + 278.145i) W
Sr = (609.406 + 278.145i) W
Pr := |I1r|^2*R1 + |I4r|^2*R3 + |I5r|^2*R4 = 609.406 W
Qr := |I2r|^2*XL2r + |I1r|^2*(XL1 - XC1) + |I3r|^2*(XL3 - XC2) - |I5r|^2*XC3 = 278.145 W
# Розрахуємо покази вольтметра:
Ucomplex := I3r*(j*XL3) - I5r*(j*XC3) = (181.491 + 164.454i) V
Uv := sqrt(Re(Ucomplex)^2 + Im(Ucomplex)^2) = 244.917 V
# Суміщена діаграма струмів і напруг
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# Визначимо потенціали точок кола
Uar := 0 V
Ubr := Uar - I1r*(j*XC1) = (26.1858 - 54.981i) V
Ucr := Ubr + I1r*R1 = (70.1706 - 34.0323i) V
Udr := Ucr + I3r*(j*XL3) = (262.949 + 175.824i) V
Ukr := Udr - I5r*(j*XC3) = (251.662 + 130.422i) V
Uhr := Ucr + I2r*(j*XL2r) = (206.878 + 31.0774i) V
Ufr := Ukr + I5r*R4 = (289.497 + 121.016i) V
Ugr := Uhr + I1r*(j*XL1) = (141.413 + 168.53i) V
xI1r := transpose([0, Re(I1r)*20])
yI1r := transpose([0, Im(I1r)*20])
xI2r := transpose([0, Re(I2r)*20])
yI2r := transpose([0, Im(I2r)*20])
xI3r := transpose([0, Re(I3r)*20])
yI3r := transpose([0, Im(I3r)*20])
xI4r := transpose([0, Re(I4r)*20])
yI4r := transpose([0, Im(I4r)*20])
xI5r := transpose([0, Re(I5r)*20])
yI5r := transpose([0, Im(I5r)*20])
X1r := transpose([Re(Uar), Re(Ubr), Re(Ucr), Re(Uhr), Re(Ugr), 0])
X2r := transpose([Re(Ucr), Re(Udr), Re(Ukr), Re(Ufr), Re(Uhr)])
X3r := transpose([Re(Udr), Re(Ufr)])
Y1r := transpose([Im(Uar), Im(Ubr), Im(Ucr), Im(Uhr), Im(Ugr), 0])
Y2r := transpose([Im(Ucr), Im(Udr), Im(Ukr), Im(Ufr), Im(Uhr)])
Y3r := transpose([Im(Udr), Im(Ufr)])
# [plot: Y1r, Y2r, Y3r, yI1r, yI2r, yI3r, yI4r, yI5r vs X1r, X2r, X3r, xI1r, xI2r, xI3r, xI4r, xI5r]
# Розрахунок струмів за наявності магнітного зв'язку між L1 та L2
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Ze := R3*(R4 - j*XC3)/(R3 + R4 - j*XC3) = (6.95541 - 2.75159i) Ω
# Обчислюємо опори:
Z11 := R1 + R2 + j*(XL1 - XC1 + XL2 - 2*Xm) = (30 + 10i) Ω
Z22 := R2 + j*(XL2 - XC2 + XL3) + Ze = (20.9554 + 57.2484i) Ω
Z12 := R2 + j*(XL2 - Xm) = (14 + 10i) Ω
Z21 := Z12 = (14 + 10i) Ω
# Ek1 = Ik1*Z11 - Ik2*Z12
# Ek2 = - Ik1*Z21 + Ik2*Z22
# { | Контурні ЕРС:
Ek1 := U = (141.413 + 168.53i) V
Ek2 := 0 V
Δ := det([Z11, -Z12; -Z21, Z22]) = (-39.8217 + 1647.01i) Ω^2
Δ1 := det([Ek1, -Z12; Ek2, Z22]) = (-6684.69 + 11627.3i) kg^2*m^4/(s^6*A^3)
Ik1 := Δ1/Δ = (7.1536 + 3.88573i) A
# =>
Δ2 := det([Z11, Ek1; -Z21, Ek2]) = (294.488 + 3773.55i) kg^2*m^4/(s^6*A^3)
Ik2 := Δ2/Δ = (2.2855 - 0.234061i) A
I1m := Ik1 = (7.1536 + 3.88573i) A
I2m := Ik1 - Ik2 = (4.86811 + 4.11979i) A
I3m := Ik2 = (2.2855 - 0.234061i) A
I4m := I3m*(R4 - j*XC3)/(R3 + R4 - j*XC3) = (1.27105 - 0.659729i) A
I5m := I3m*R3/(R3 + R4 - j*XC3) = (1.01445 + 0.425668i) A
# Перевірка за І законом Кірхгофа
I1m - I2m - I3m = (4.44089e-16 - 2.77556e-16i) A
I3m - I4m - I5m = 0 A
I2m + I5m + I4m - I1m = 4.44089e-16i A
# Перевірка за ІІ законом Кірхгофа
I1m*(R1 + j*(XL1 - XC1 - Xm)) - Ek1 + I2m*(R2 + j*(XL2 - Xm)) = (-1.42109e-14 - 1.42109e-14i) V
I2m*(R2 + j*(XL2 - Xm)) - I4m*R3 - I3m*j*(-XC2 + XL3 + Xm) = (-1.95399e-14 - 2.84217e-14i) V
I4m*R3 - I5m*(R4 - j*XC3) = (-1.77636e-15 - 8.88178e-16i) V
# Рахуємо потужності магнітного зв'язку
SM1 := -I1m*conj(I2m)*j*Xm = (-316.656 - 1524.99i) W
SM2 := -I2m*conj(I1m)*j*Xm = (316.656 - 1524.99i) W
# Перевіряємо за балансом потужностей
Sm := U*conj(I1m) = (1666.48 + 656.102i) W
Pm := |I1m|^2*R1 + |I2m|^2*R2 + |I4m|^2*R3 + |I5m|^2*R4 = 1666.48 W
Qm := |I1m|^2*(XL1 - XC1) + |I2m|^2*XL2 + |I3m|^2*(XL3 - XC2) + |I5m|^2*(-XC3) + Im(SM1 + SM2)
Qm = 656.102 W
# Розрахуємо покази вольтметра:
Ucomplexm := -I2m*R2 + I3m*(j*XL3) - I5m*(j*XC3) = (-54.8533 + 10.1419i) V
Uvm := sqrt(Re(Ucomplexm)^2 + Im(Ucomplexm)^2) = 55.783 V
# Суміщена діаграма струмів і напруг
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# Визначимо потенціали точок кола
Uam := 0 V
Ubm := Uam - I1m*(j*XC1) = (77.7146 - 143.072i) V
Ucm := Ubm + I1m*R1 = (192.172 - 80.9004i) V
Udm := Ucm + I3m*(j*XL3) = (200.364 - 0.908024i) V
Ukm := Udm - I5m*(j*XC3) = (205.472 - 13.0815i) V
Ufm := Ukm + I5m*R4 = (215.617 - 8.82477i) V
Umm := Ucm + I2m*R2 = (260.326 - 23.2234i) V
Uhm := Umm + I2m*(j*(XL2 - Xm)) = (219.128 + 25.4577i) V
Ugm := Uhm + I1m*(j*(XL1 - Xm)) = (141.413 + 168.53i) V
xI1m := transpose([0, Re(I1m)*20])
yI1m := transpose([0, Im(I1m)*20])
xI2m := transpose([0, Re(I2m)*20])
yI2m := transpose([0, Im(I2m)*20])
xI3m := transpose([0, Re(I3m)*20])
yI3m := transpose([0, Im(I3m)*20])
xI4m := transpose([0, Re(I4m)*20])
yI4m := transpose([0, Im(I4m)*20])
xI5m := transpose([0, Re(I5m)*20])
yI5m := transpose([0, Im(I5m)*20])
X1m := transpose([Re(Uam), Re(Ubm), Re(Ucm), Re(Umm), Re(Uhm), Re(Ugm), 0])
X2m := transpose([Re(Ucm), Re(Udm), Re(Ukm), Re(Ufm), Re(Uhm)])
X3m := transpose([Re(Udm), Re(Ufm)])
Y1m := transpose([Im(Uam), Im(Ubm), Im(Ucm), Im(Umm), Im(Uhm), Im(Ugm), 0])
Y2m := transpose([Im(Ucm), Im(Udm), Im(Ukm), Im(Ufm), Im(Uhm)])
Y3m := transpose([Im(Udm), Im(Ufm)])
# [plot: Y1m, Y2m, Y3m, yI1m, yI2m, yI3m, yI4m (A), yI5m vs X1m, X2m, X3m, xI1m, xI2m, xI3m, xI4m, xI5m]
