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# Параметри елементів схеми:
E := 240 V
XL1 := 30 Ω
ψ := 50°
XL2 := 35 Ω
j := sqrt(-1)
R1 := 18 Ω
XL3 := 40 Ω
R2 := 16 Ω
XC1 := 10 Ω
f := 50 Hz
R3 := 14 Ω
XC2 := 15 Ω
ω := 2*π*f
R4 := 12 Ω
XC3 := 20 Ω
Xm := 20 Ω
# Розраховуємо струми комплексним методом
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Z1 := R1 + j*(XL1 - XC1) = (18 + 20i) Ω
Z1 = (18 + 20i) Ω
Z2 := R2 + j*XL2 = (16 + 35i) Ω
Z2 = (16 + 35i) Ω
Z3 := j*(XL3 - XC2) = 25i Ω
Z3 = 25i Ω
Z4 := R3 = 14 Ω
Z4 = 14 Ω
Z5 := R4 - j*XC3 = (12 - 20i) Ω
Z5 = (12 - 20i) Ω
Z := Z1 + (Z3 + Z4*Z5/(Z4 + Z5))*Z2/(Z3 + Z4*Z5/(Z4 + Z5) + Z2) = (23.8701 + 33.2649i) Ω
Z = (23.8701 + 33.2649i) Ω
I1 := E*e^(j*ψ)/Z = (5.845 - 0.443351i) A
I1 = (5.845 - 0.443351i) A
I3 := I1*Z2/(Z2 + Z3 + Z4*Z5/(Z4 + Z5)) = (3.63996 - 0.303024i) A
I3 = (3.63996 - 0.303024i) A
I2 := I1 - I3 = (2.20504 - 0.140327i) A
I2 = (2.20504 - 0.140327i) A
I4 := I3*Z5/(Z4 + Z5) = (2.32975 - 1.14772i) A
I4 = (2.32975 - 1.14772i) A
I5 := I3 - I4 = (1.31022 + 0.844692i) A
I5 = (1.31022 + 0.844692i) A
# Перевірка за першим законом Кірхгофа:
I1 - I3 - I2 = 0 A
I3 - I5 - I4 = 0 A
# Баланс активних і реактивних потужностей:
U := E*e^(j*ψ) = (154.269 + 183.851i) V
U = (154.269 + 183.851i) V
S := U*conj(I1) = (820.192 + 1143i) W
S = (820.192 + 1143i) W
P := |I1|^2*R1 + |I2|^2*R2 + |I4|^2*R3 + |I5|^2*R4 = 820.192 W
Q := |I2|^2*XL2 + |I1|^2*(XL1 - XC1) + |I3|^2*(XL3 - XC2) - |I5|^2*XC3 = 1143 W
# Розрахуємо похибку обчислень:
ΔP := (P - Re(S))/P*100% = -1.3861e-16
ΔQ := (Q - Im(S))/S*100% = 0
# Розрахуємо покази вольтметра:
Ucomplex := -I2*R2 + I3*(j*XL3) - I5*(j*XC3) = (-6.26578 + 121.639i) V
Uv := sqrt(Re(Ucomplex)^2 + Im(Ucomplex)^2) = 121.801 V
# Суміщена діаграма струмів і напруг
# Визначимо потенціали точок кола
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Ua := 0 V
Ub := Ua - I1*(j*XC1) = (-4.43351 - 58.45i) V
Uc := Ub + I1*R1 = (100.776 - 66.4303i) V
Ud := Uc + I3*(j*XL3) = (112.897 + 79.1682i) V
Uk := Ud - I5*(j*XC3) = (129.791 + 52.9638i) V
Uf := Uk + I5*R4 = (145.514 + 63.1002i) V
Um := Uc + I2*R2 = (136.057 - 68.6755i) V
Uh := Um + I2*(j*XL2) = (140.968 + 8.50072i) V
Ug := Uh + I1*(j*XL1) = (154.269 + 183.851i) V
xI1 := transpose([0, Re(I1)*20])
yI1 := transpose([0, Im(I1)*20])
xI2 := transpose([0, Re(I2)*20])
yI2 := transpose([0, Im(I2)*20])
xI3 := transpose([0, Re(I3)*20])
yI3 := transpose([0, Im(I3)*20])
xI4 := transpose([0, Re(I4)*20])
yI4 := transpose([0, Im(I4)*20])
xI5 := transpose([0, Re(I5)*20])
yI5 := transpose([0, Im(I5)*20])
X1 := transpose([Re(Ua), Re(Ub), Re(Uc), Re(Um), Re(Uh), Re(Ug), 0])
X2 := transpose([Re(Uc), Re(Ud), Re(Uk), Re(Uf), Re(Uh)])
X3 := transpose([Re(Ud), Re(Uf)])
Y1 := transpose([Im(Ua), Im(Ub), Im(Uc), Im(Um), Im(Uh), Im(Ug), 0])
Y2 := transpose([Im(Uc), Im(Ud), Im(Uk), Im(Uf), Im(Uh)])
Y3 := transpose([Im(Ud), Im(Uf)])
# [plot: Y1, Y2, Y3, yI1, yI2, yI3, yI4, yI5 vs X1, X2, X3, xI1, xI2, xI3, xI4, xI5]
# Приймаємо активний опір другої вітки рівним нулю і за умови резонансу струмів розраховуємо реактивний опір цієї вітки.
Y := 1/(Z3 + Z4*Z5/(Z4 + Z5)) = (0.0170941 - 0.0394084i) S
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# -> за умовою резонансу.
XL2r := 1/Im(Y) = -25.3753 Ω
# -> опір котушки L2.
Z2r := j*XL2r = -25.3753i Ω
# -> опір вітки 2.
# Обчислимо струми віток за умови резонансу:
Zr := Z1 + (Z3 + Z4*Z5/(Z4 + Z5))*Z2r/(Z3 + Z4*Z5/(Z4 + Z5) + Z2r) = (76.4996 + 20i) Ω
Zr = (76.4996 + 20i) Ω
I1r := E*e^(j*ψ)/Zr = (2.4757 + 1.75604i) A
I1r = (2.4757 + 1.75604i) A
I3r := I1r*Z2r/(Z2r + Z3 + Z4*Z5/(Z4 + Z5)) = (6.52404 - 3.95137i) A
I3r = (6.52404 - 3.95137i) A
I2r := I1r - I3r = (-4.04835 + 5.70742i) A
I2r = (-4.04835 + 5.70742i) A
I4r := I3r*Z5/(Z4 + Z5) = (3.28879 - 4.31237i) A
I4r = (3.28879 - 4.31237i) A
I5r := I3r - I4r = (3.23526 + 0.360996i) A
I5r = (3.23526 + 0.360996i) A
# Баланс активних і реактивних потужностей:
U := E*e^(j*ψ) = (154.269 + 183.851i) V
U = (154.269 + 183.851i) V
Sr := U*conj(I1r) = (704.774 + 184.255i) W
Sr = (704.774 + 184.255i) W
Pr := |I1r|^2*R1 + |I4r|^2*R3 + |I5r|^2*R4 = 704.774 W
Qr := |I2r|^2*XL2r + |I1r|^2*(XL1 - XC1) + |I3r|^2*(XL3 - XC2) - |I5r|^2*XC3 = 184.255 W
# Розрахуємо покази вольтметра:
Ucomplex := I3r*(j*XL3) - I5r*(j*XC3) = (165.275 + 196.257i) V
Uv := sqrt(Re(Ucomplex)^2 + Im(Ucomplex)^2) = 256.578 V
# Суміщена діаграма струмів і напруг
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# Визначимо потенціали точок кола
Uar := 0 V
Ubr := Uar - I1r*(j*XC1) = (17.5604 - 24.757i) V
Ucr := Ubr + I1r*R1 = (62.123 + 6.85182i) V
Udr := Ucr + I3r*(j*XL3) = (220.178 + 267.814i) V
Ukr := Udr - I5r*(j*XC3) = (227.398 + 203.108i) V
Uhr := Ucr + I2r*(j*XL2r) = (206.95 + 109.58i) V
Ufr := Ukr + I5r*R4 = (266.221 + 207.44i) V
Ugr := Uhr + I1r*(j*XL1) = (154.269 + 183.851i) V
xI1r := transpose([0, Re(I1r)*20])
yI1r := transpose([0, Im(I1r)*20])
xI2r := transpose([0, Re(I2r)*20])
yI2r := transpose([0, Im(I2r)*20])
xI3r := transpose([0, Re(I3r)*20])
yI3r := transpose([0, Im(I3r)*20])
xI4r := transpose([0, Re(I4r)*20])
yI4r := transpose([0, Im(I4r)*20])
xI5r := transpose([0, Re(I5r)*20])
yI5r := transpose([0, Im(I5r)*20])
X1r := transpose([Re(Uar), Re(Ubr), Re(Ucr), Re(Uhr), Re(Ugr), 0])
X2r := transpose([Re(Ucr), Re(Udr), Re(Ukr), Re(Ufr), Re(Uhr)])
X3r := transpose([Re(Udr), Re(Ufr)])
Y1r := transpose([Im(Uar), Im(Ubr), Im(Ucr), Im(Uhr), Im(Ugr), 0])
Y2r := transpose([Im(Ucr), Im(Udr), Im(Ukr), Im(Ufr), Im(Uhr)])
Y3r := transpose([Im(Udr), Im(Ufr)])
# [plot: Y1r, Y2r, Y3r, yI1r, yI2r, yI3r, yI4r, yI5r vs X1r, X2r, X3r, xI1r, xI2r, xI3r, xI4r, xI5r]
# Розрахунок струмів за наявності магнітного зв'язку між L1 та L2
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Ze := R3*(R4 - j*XC3)/(R3 + R4 - j*XC3) = (9.26394 - 3.64312i) Ω
# Обчислюємо опори:
Z11 := R1 + R2 + j*(XL1 - XC1 + XL2 - 2*Xm) = (34 + 15i) Ω
Z22 := R2 + j*(XL2 - XC2 + XL3) + Ze = (25.2639 + 56.3569i) Ω
Z12 := R2 + j*(XL2 - Xm) = (16 + 15i) Ω
Z21 := Z12 = (16 + 15i) Ω
# Ek1 = Ik1*Z11 - Ik2*Z12
# Ek2 = - Ik1*Z21 + Ik2*Z22
# { | Контурні ЕРС:
Ek1 := U = (154.269 + 183.851i) V
Ek2 := 0 V
Δ := det([Z11, -Z12; -Z21, Z22]) = (-17.3792 + 1815.09i) Ω^2
Δ1 := det([Ek1, -Z12; Ek2, Z22]) = (-6463.81 + 13338.9i) kg^2*m^4/(s^6*A^3)
Ik1 := Δ1/Δ = (7.38231 + 3.49046i) A
# =>
Δ2 := det([Z11, Ek1; -Z21, Ek2]) = (-289.456 + 5255.65i) kg^2*m^4/(s^6*A^3)
Ik2 := Δ2/Δ = (2.89679 + 0.131735i) A
I1m := Ik1 = (7.38231 + 3.49046i) A
I2m := Ik1 - Ik2 = (4.48552 + 3.35872i) A
I3m := Ik2 = (2.89679 + 0.131735i) A
I4m := I3m*(R4 - j*XC3)/(R3 + R4 - j*XC3) = (1.95111 - 0.66664i) A
I5m := I3m*R3/(R3 + R4 - j*XC3) = (0.945673 + 0.798375i) A
# Перевірка за І законом Кірхгофа
I1m - I2m - I3m = (-4.44089e-16 + 1.11022e-16i) A
I3m - I4m - I5m = 1.11022e-16 A
I2m + I5m + I4m - I1m = (8.88178e-16 - 4.44089e-16i) A
# Перевірка за ІІ законом Кірхгофа
I1m*(R1 + j*(XL1 - XC1 - Xm)) - Ek1 + I2m*(R2 + j*(XL2 - Xm)) = (1.42109e-14 - 2.84217e-14i) V
I2m*(R2 + j*(XL2 - Xm)) - I4m*R3 - I3m*j*(-XC2 + XL3 + Xm) = 2.22045e-14 V
I4m*R3 - I5m*(R4 - j*XC3) = (3.55271e-15 - 3.55271e-15i) V
# Рахуємо потужності магнітного зв'язку
SM1 := -I1m*conj(I2m)*j*Xm = (-182.772 - 896.74i) W
SM2 := -I2m*conj(I1m)*j*Xm = (182.772 - 896.74i) W
# Перевіряємо за балансом потужностей
Sm := U*conj(I1m) = (1780.58 + 818.772i) W
Pm := |I1m|^2*R1 + |I2m|^2*R2 + |I4m|^2*R3 + |I5m|^2*R4 = 1780.58 W
Qm := |I1m|^2*(XL1 - XC1) + |I2m|^2*XL2 + |I3m|^2*(XL3 - XC2) + |I5m|^2*(-XC3) + Im(SM1 + SM2)
Qm = 818.772 W
# Розрахуємо покази вольтметра:
Ucomplexm := -I2m*R2 + I3m*(j*XL3) - I5m*(j*XC3) = (-61.0703 + 43.2184i) V
Uvm := sqrt(Re(Ucomplexm)^2 + Im(Ucomplexm)^2) = 74.8158 V
# Суміщена діаграма струмів і напруг
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# Визначимо потенціали точок кола
Uam := 0 V
Ubm := Uam - I1m*(j*XC1) = (34.9046 - 73.8231i) V
Ucm := Ubm + I1m*R1 = (167.786 - 10.9948i) V
Udm := Ucm + I3m*(j*XL3) = (162.517 + 104.877i) V
Ukm := Udm - I5m*(j*XC3) = (178.484 + 85.9632i) V
Ufm := Ukm + I5m*R4 = (189.832 + 95.5437i) V
Umm := Ucm + I2m*R2 = (239.554 + 42.7448i) V
Uhm := Umm + I2m*(j*(XL2 - Xm)) = (189.174 + 110.028i) V
Ugm := Uhm + I1m*(j*(XL1 - Xm)) = (154.269 + 183.851i) V
xI1m := transpose([0, Re(I1m)*20])
yI1m := transpose([0, Im(I1m)*20])
xI2m := transpose([0, Re(I2m)*20])
yI2m := transpose([0, Im(I2m)*20])
xI3m := transpose([0, Re(I3m)*20])
yI3m := transpose([0, Im(I3m)*20])
xI4m := transpose([0, Re(I4m)*20])
yI4m := transpose([0, Im(I4m)*20])
xI5m := transpose([0, Re(I5m)*20])
yI5m := transpose([0, Im(I5m)*20])
X1m := transpose([Re(Uam), Re(Ubm), Re(Ucm), Re(Umm), Re(Uhm), Re(Ugm), 0])
X2m := transpose([Re(Ucm), Re(Udm), Re(Ukm), Re(Ufm), Re(Uhm)])
X3m := transpose([Re(Udm), Re(Ufm)])
Y1m := transpose([Im(Uam), Im(Ubm), Im(Ucm), Im(Umm), Im(Uhm), Im(Ugm), 0])
Y2m := transpose([Im(Ucm), Im(Udm), Im(Ukm), Im(Ufm), Im(Uhm)])
Y3m := transpose([Im(Udm), Im(Ufm)])
# [plot: Y1m, Y2m, Y3m, yI1m, yI2m, yI3m, yI4m (A), yI5m vs X1m, X2m, X3m, xI1m, xI2m, xI3m, xI4m, xI5m]
