ψ := 50°
X_L2 := 40 Ω
f := 60 H
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E := 220 V
X_L1 := 35 Ω
X_M := 23 Ω
R_1 := 16 Ω
X_L3 := 45 Ω
j := sqrt(-1)
R_2 := 14 Ω
X_C1 := 15 Ω
R_3 := 12 Ω
X_C2 := 20 Ω
R_4 := 10 Ω
X_C3 := 25 Ω
U := E*e^(j*5*π/18) = (141.413 + 168.53i) V
# Для електричного кола без взаємної індукції
#
# Розрахувати всі струми символічним методом
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Z_1 := R_1 + j*(X_L1 - X_C1) = (16 + 20i) Ω
Z_4 := -j*X_C3 = -25i Ω
Z_2 := R_2 - j*X_C2 = (14 - 20i) Ω
Z_5 := R_4 + j*X_L3 = (10 + 45i) Ω
Z_3 := R_3 + j*X_L2 = (12 + 40i) Ω
Z_E := (Z_5*Z_4/(Z_5 + Z_4) + Z_3)*Z_2/(Z_2 + Z_5*Z_4/(Z_5 + Z_4) + Z_3) + Z_1 = (26.2447 + 11.6193i) Ω
I_1 := U/Z_E = (6.88224 + 3.37451i) A
I_2 := I_1*(Z_5*Z_4/(Z_5 + Z_4) + Z_3)/(Z_2 + Z_5*Z_4/(Z_5 + Z_4) + Z_3) = (3.09593 + 2.77223i) A
I_3 := I_1*Z_2/(Z_2 + Z_5*Z_4/(Z_5 + Z_4) + Z_3) = (3.78632 + 0.602281i) A
I_4 := I_3*Z_5/(Z_5 + Z_4) = (7.2715 + 3.09772i) A
I_5 := I_3*(-Z_4/(Z_5 + Z_4)) = (3.48518 + 2.49544i) A
# Перевірка за першим законом Кіргофа:
I_1 - I_2 - I_3 = -1.33227e-15 A
I_3 - I_4 + I_5 = -4.44089e-16 A
I_2 + I_4 - I_5 - I_1 = (1.77636e-15 - 4.44089e-16i) A
# Перевірка за балансом потужностей:
S_1 := U*conj(I_1) = (1541.95 + 682.662i) W
P := |I_1^2|*R_1 + |I_2^2|*R_2 + |I_3^2|*R_3 + |I_5^2|*R_4 = 1541.95 W
Q := |I_1^2|*(-X_C1 + X_L1) + |I_2^2|*(-X_C2) + |I_3^2|*X_L2 + |I_4^2|*(-X_C3) + |I_5^2|*X_L3 = 682.662 W
S := P + 1i*Q = (1541.95 + 682.662i) W
# Будуємо сумісну діаграму струмів та топографічну діаграму напруг
#
# Знаходимо потенціали точок
ϕ_a := 0
ϕ_b := ϕ_a + I_1*R_1 = (110.116 + 53.9922i) V
ϕ_c := ϕ_b - I_1*j*X_C1 = (160.734 - 49.2415i) V
ϕ_d := ϕ_c + I_3*R_3 = (206.169 - 42.0141i) V
ϕ_e := ϕ_d - I_5*j*X_L3 = (318.464 - 198.847i) V
ϕ_g := ϕ_e - I_5*R_4 = (283.612 - 223.801i) V
ϕ_n := ϕ_c + I_2*R_2 = (204.077 - 10.4302i) V
ϕ_h := ϕ_n - I_2*j*X_C2 = (259.521 - 72.3488i) V
ϕ_f := ϕ_h + I_1*j*X_L1 = (141.413 + 168.53i) V
xI1 := transpose([0, Re(I_1)*20])
yI1 := transpose([0, Im(I_1)*20])
xI2 := transpose([0, Re(I_2)*20])
yI2 := transpose([0, Im(I_2)*20])
xI3 := transpose([0, Re(I_3)*20])
yI3 := transpose([0, Im(I_3)*20])
xI4 := transpose([0, Re(I_4)*20])
yI4 := transpose([0, Im(I_4)*20])
xI5 := transpose([0, Re(I_5)*20])
yI5 := transpose([0, Im(I_5)*20])
X1 := transpose([Re(ϕ_a), Re(ϕ_b), Re(ϕ_c), Re(ϕ_n), Re(ϕ_h), Re(ϕ_f), 0])
X2 := transpose([Re(ϕ_c), Re(ϕ_d), Re(ϕ_e), Re(ϕ_g), Re(ϕ_h)])
X3 := transpose([Re(ϕ_d), Re(ϕ_g)])
Y1 := transpose([Im(ϕ_a), Im(ϕ_b), Im(ϕ_c), Im(ϕ_n), Im(ϕ_h), Im(ϕ_f), 0])
Y2 := transpose([Im(ϕ_c), Im(ϕ_d), Im(ϕ_e), Im(ϕ_g), Im(ϕ_h)])
Y3 := transpose([Im(ϕ_d), Im(ϕ_g)])
# [plot: Y1, Y2, Y3, yI1, yI2, yI3, yI4, yI5 vs X1, X2, X3, xI1, xI2, xI3, xI4, xI5]
# Прийняти опір R2=0 i, вважаючи реактивний опір цієї вітки невідомим, визначити його за умовою резонансу струмів.
Z_ER := (R_4 + j*X_L3)*(-j*X_C3)/(R_4 + j*(X_L3 - X_C3)) + j*X_L2 + R_3 = (24.5 - 10i) Ω
R_E := Re(Z_ER) = 24.5 Ω
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X_E := Im(Z_ER) = -10 Ω
# За умовою резонансу:
B_n := 1/(Z_3 + Z_4*Z_5/(Z_4 + Z_5)) = (0.0349875 + 0.0142806i) S
# Реактивний опір вітки:
X_N := 1/Im(B_n) = 70.025 Ω
# Розрахувати струми для резонансного стану кола:
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Z_1R := R_1 - X_C1*j + X_L1*j = (16 + 20i) Ω
Z_3R := R_3 + X_L2*j = (12 + 40i) Ω
Z_5R := -X_C3*j = -25i Ω
Z_345 := Z_4*Z_5/(Z_4 + Z_5) + Z_3 = (24.5 - 10i) Ω
# Вхідний опір кола:
Z_VX := Z_345*(-j)*X_N/(Z_345 - j*X_N) + Z_1R = (33.1518 + 5.9985i) Ω
I_1R := U/Z_VX = (5.02106 + 4.17506i) A
I_2R := I_1R*(Z_5*Z_4/(Z_5 + Z_4) + Z_3)/(-j*X_N + Z_5*Z_4/(Z_5 + Z_4) + Z_3) = (-0.0186732 + 2.06466i) A
I_3R := I_1R*(-j*X_N)/(-j*X_N + Z_5*Z_4/(Z_5 + Z_4) + Z_3) = (5.03973 + 2.11041i) A
I_4R := I_3R*Z_5/(Z_5 + Z_4) = (9.02426 + 6.74068i) A
I_5R := I_3R*(-Z_4/(Z_5 + Z_4)) = (3.98453 + 4.63027i) A
# Перевірка за першим законом Кіргофа:
I_1R - I_2R - I_3R = -8.88178e-16i A
I_3R - I_4R + I_5R = 0 A
I_2R + I_4R - I_5R - I_1R = -8.88178e-16 A
# Перевірка за балансом потужностей:
S_1 := U*conj(I_1R) = (1413.67 + 255.789i) W
P := |I_1R|^2*R_1 + |I_3R|^2*R_3 + |I_5R|^2*R_4 = 1413.67 W
Q := |I_1R^2|*(-X_C1 + X_L1) + |I_2R^2|*(-X_N) + |I_3R^2|*X_L2 + |I_4R^2|*(-X_C3) + |I_5R^2|*X_L3
Q = 255.789 W
S := P + j*Q = (1413.67 + 255.789i) W
# Будуємо сумісну діаграму струмів та топографічну діаграму напруг
#
# Знаходимо потенціали точок
ϕ_ar := 0
ϕ_br := ϕ_ar + I_1R*R_1 = (80.337 + 66.801i) V
ϕ_cr := ϕ_br - I_1R*j*X_C1 = (142.963 - 8.51493i) V
ϕ_dr := ϕ_cr + I_3R*R_3 = (203.44 + 16.8099i) V
ϕ_er := ϕ_dr - I_5R*j*X_L3 = (411.802 - 162.494i) V
ϕ_gr := ϕ_er - I_5R*R_4 = (371.957 - 208.797i) V
ϕ_hr := ϕ_cr - I_2R*j*X_N = (287.54 - 7.20734i) V
ϕ_fr := ϕ_hr + I_1R*j*X_L1 = (141.413 + 168.53i) V
xI1 := transpose([0, Re(I_1R)*20])
yI1 := transpose([0, Im(I_1R)*20])
xI2 := transpose([0, Re(I_2R)*20])
yI2 := transpose([0, Im(I_2R)*20])
xI3 := transpose([0, Re(I_3R)*20])
yI3 := transpose([0, Im(I_3R)*20])
xI4 := transpose([0, Re(I_4R)*20])
yI4 := transpose([0, Im(I_4R)*20])
xI5 := transpose([0, Re(I_5R)*20])
yI5 := transpose([0, Im(I_5R)*20])
X1 := transpose([Re(ϕ_ar), Re(ϕ_br), Re(ϕ_cr), Re(ϕ_hr), Re(ϕ_fr), 0])
X2 := transpose([Re(ϕ_cr), Re(ϕ_dr), Re(ϕ_er), Re(ϕ_gr), Re(ϕ_hr)])
X3 := transpose([Re(ϕ_dr), Re(ϕ_gr)])
Y1 := transpose([Im(ϕ_ar), Im(ϕ_br), Im(ϕ_cr), Im(ϕ_hr), Im(ϕ_fr), 0])
Y2 := transpose([Im(ϕ_cr), Im(ϕ_dr), Im(ϕ_er), Im(ϕ_gr), Im(ϕ_hr)])
Y3 := transpose([Im(ϕ_dr), Im(ϕ_gr)])
# [plot: Y1, Y2, Y3, yI1, yI2, yI3, yI4, yI5 vs X1, X2, X3, xI1, xI2, xI3, xI4, xI5]
# При наявності магнітного зв'язку між індуктивними елементами
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# Записуємо рівняння для методу контурних струмів
# Ek1 = Ik1*Z11 - Ik2*Z12
# Ek2 = - Ik1*Z21 + Ik2*Z22
Z := -j*X_C3*(R_4 + j*X_L3)/(R_4 + j*(X_L3 - X_C3)) = (12.5 - 50i) Ω
Z_11 := R_1 + R_2 + j*(X_L1 - X_C1 - X_C2) = 30 Ω
Z_22 := R_2 + R_3 + j*(X_L2 - X_C2) + Z = (38.5 - 30i) Ω
Z_12 := R_2 - j*(X_M + X_C2) = (14 - 43i) Ω
E_k1 := U = (141.413 + 168.53i) V
Z_21 := Z_12 = (14 - 43i) Ω
E_k2 := 0 V
# Вирішуємо систему методом Гауса
Δ := det([Z_11, -Z_12; -Z_21, Z_22]) = (2808 + 304i) Ω^2
Δ1 := det([E_k1, -Z_12; E_k2, Z_22]) = (10500.3 + 2246i) kg^2*m^4/(s^6*A^3)
Δ2 := det([Z_11, E_k1; -Z_21, E_k2]) = (9226.57 - 3721.35i) kg^2*m^4/(s^6*A^3)
I_K1 := Δ1/Δ = (3.78169 + 0.390443i) A
# =>
I_K2 := Δ2/Δ = (3.10593 - 1.66152i) A
I_1m := I_K1 = (3.78169 + 0.390443i) A
I_2m := I_K1 - I_K2 = (0.675761 + 2.05197i) A
I_3m := I_K2 = (3.10593 - 1.66152i) A
I_4m := I_3m*Z_5/(Z_5 + Z_4) = (7.04263 - 1.77008i) A
I_5m := -I_3m*Z_4/(Z_5 + Z_4) = (3.9367 - 0.108556i) A
# Перевірка за першим законом Кіргофа:
I_1m - I_2m - I_3m = -2.22045e-16i A
S_M1 := I_1m*conj(I_3m)*j*X_M = (-172.409 + 255.23i) W
I_3m - I_4m + I_5m = (4.44089e-16 - 6.10623e-16i) A
S_M2 := conj(I_1m)*I_3m*j*X_M = (172.409 + 255.23i) W
I_2m + I_4m - I_5m - I_1m = (-4.44089e-16 + 7.77156e-16i) A
# Перевірка за балансом потужностей:
S_1 := U*conj(I_1m) = (600.583 + 582.114i) W
P := |I_1m^2|*R_1 + |I_2m^2|*R_2 + |I_3m^2|*R_3 + |I_5m^2|*R_4 = 600.583 W
Q := |I_1m^2|*(-X_C1 + X_L1) - |I_2m^2|*X_C2 + |I_3m^2|*X_L2 - |I_4m^2|*X_C3 + |I_5m^2|*X_L3 + Im(S_M1 + S_M2)
Q = 582.114 W
# Будуємо сумісну діаграму струмів та топографічну діаграму напруг
#
# Знаходимо потенціали точок
ϕ_am := 0
ϕ_bm := ϕ_am + I_1m*R_1 = (60.5071 + 6.24708i) V
ϕ_cm := ϕ_bm - I_1m*j*X_C1 = (66.3638 - 50.4783i) V
ϕ_dm := ϕ_cm + I_3m*R_3 = (103.635 - 70.4166i) V
ϕ_em := ϕ_dm - I_5m*j*X_L3 = (98.7499 - 247.568i) V
ϕ_gm := ϕ_em - I_5m*R_4 = (59.383 - 246.482i) V
ϕ_nm := ϕ_cm + I_2m*R_2 = (75.8244 - 21.7508i) V
ϕ_hm := ϕ_nm - I_2m*j*(X_C2 + X_M) = (164.059 - 50.8085i) V
ϕ_fm := ϕ_hm + I_1m*j*(X_L1 + X_M) = (141.413 + 168.53i) V
xI1 := transpose([0, Re(I_1m)*20])
yI1 := transpose([0, Im(I_1m)*20])
xI2 := transpose([0, Re(I_2m)*20])
yI2 := transpose([0, Im(I_2m)*20])
xI3 := transpose([0, Re(I_3m)*20])
yI3 := transpose([0, Im(I_3m)*20])
xI4 := transpose([0, Re(I_4m)*20])
yI4 := transpose([0, Im(I_4m)*20])
xI5 := transpose([0, Re(I_5m)*20])
yI5 := transpose([0, Im(I_5m)*20])
X1 := transpose([Re(ϕ_am), Re(ϕ_bm), Re(ϕ_cm), Re(ϕ_nm), Re(ϕ_hm), Re(ϕ_fm), 0])
X2 := transpose([Re(ϕ_cm), Re(ϕ_dm), Re(ϕ_em), Re(ϕ_gm), Re(ϕ_hm)])
X3 := transpose([Re(ϕ_dm), Re(ϕ_gm)])
Y1 := transpose([Im(ϕ_am), Im(ϕ_bm), Im(ϕ_cm), Im(ϕ_nm), Im(ϕ_hm), Im(ϕ_fm), 0])
Y2 := transpose([Im(ϕ_cm), Im(ϕ_dm), Im(ϕ_em), Im(ϕ_gm), Im(ϕ_hm)])
Y3 := transpose([Im(ϕ_dm), Im(ϕ_gm)])
# [plot: Y1, Y2, Y3, yI1, yI2, yI3, yI4, yI5 vs X1, X2, X3, xI1, xI2, xI3, xI4, xI5]
