E := 120
XL1 := 37
ψ := -30
XL2 := 27
R1 := 7
XL3 := 20
R2 := 9
XC1 := 13
R3 := 11
XC2 := 10
R4 := 13
XC3 := 6
f := 50
XM := 15
ω := 2*π*f
ω = 314.159
# 1)
E1 := 103.92 - 60i
|E1| = 119.997
arg(E1)*180/π = -30.0007
Z1 := R1 + 1i*(XL1 - XC1) = 7 + 24i
|Z1| = 25
arg(Z1)*180/π = 73.7398
Z2 := R2 - 1i*XC2 = 9 - 10i
|Z2| = 13.4536
arg(Z2)*180/π = -48.0128
Z3 := R3 + 1i*XL2 = 11 + 27i
|Z3| = 29.1548
arg(Z3)*180/π = 67.8337
Z4 := -1i*XC3 = -6i
|Z4| = 6
arg(Z4)*180/π = -90
Z5 := R4 + 1i*XL3 = 13 + 20i
|Z5| = 23.8537
arg(Z5)*180/π = 56.9761
Z6 := Z4*Z5/(Z4 + Z5) = 1.28219 - 7.38082i
|Z6| = 7.49136
arg(Z6)*180/π = -80.145
Z7 := Z3 + Z6 = 12.2822 + 19.6192i
|Z7| = 23.1466
arg(Z7)*180/π = 57.9522
Z8 := Z7*Z2/(Z7 + Z2) = 12.9156 - 3.31201i
|Z8| = 13.3335
arg(Z8)*180/π = -14.3827
ZE := Z1 + Z8 = 19.9156 + 20.688i
|ZE| = 28.7163
arg(ZE)*180/π = 46.0898
I1 := E1/ZE
I1 = 1.00452 - 4.05619i
|I1| = 4.17872
arg(I1)*180/π = -76.0905
I2 := I1*Z7/(Z2 + Z7)
I2 = 3.0553 - 2.79579i
|I2| = 4.14142
arg(I2)*180/π = -42.4604
I3 := I1*Z2/(Z2 + Z7)
I3 = -2.05078 - 1.2604i
|I3| = 2.40714
arg(I3)*180/π = -148.425
I4 := I3*Z5/(Z4 + Z5)
I4 = -2.2534 - 1.98871i
|I4| = 3.00546
arg(I4)*180/π = -138.57
I5 := I3*Z4/(Z4 + Z5)
I5 = 0.202616 + 0.728314i
|I5| = 0.755973
arg(I5)*180/π = 74.4535
U84 := I2*R2 - I3*R3 - I5*1i*XL3 = 64.6227 - 15.3501i
|U84| = 66.4207
U841 := I2*1i*XC2 + I3*1i*XL2 + I5*R4 = 64.6227 - 15.3501i
arg(U84)*180/π = -13.362
# Баланс мощностей
S2 := E1*conj(I1)
S2 = 347.761 + 361.248i
P := (|I1|^2*R1) + (|I2|^2*R2) + (|I3|^2*R3) + (|I5|^2*R4)
P = 347.761
Q := (|I1|^2*(XL1 - XC1)) + (|I2|^2*(-XC2)) + (|I3|^2*XL2) + (|I4|^2*(-XC3)) + (|I5|^2*XL3)
Q = 361.248
fi1 := I1*R1 = 7.03164 - 28.3933i
fi2 := fi1 - I1*XC1*1i = -45.6988 - 41.4521i
fi3 := fi2 + I3*R3 = -68.2574 - 55.3165i
fi4 := fi3 + I5*XL3*1i = -82.8237 - 51.2641i
fi5 := fi4 + I5*R4 = -80.1897 - 41.7961i
fi6 := fi5 + I3*XL2*1i = -46.159 - 97.1672i
fi7 := fi6 + I1*XL1*1i = 103.92 - 60i
fi8 := fi6 - I2*XC2*1i = -74.1169 - 127.72i
Z7 = 12.2822 + 19.6192i
Y2 := 1/Z7 = 0.0229246 - 0.036619i
B2 := Im(Y2) = -0.036619
x2 := 1/B2 = -27.3082
x22 := 27.3082
ze2 := 1i*x22 = 27.3082i
Cc := 1/(x22*ω) = 0.000116562
Ze2 := ze2*Z7/(ze2 + Z7) = 3.89255 + 12.4357i
|Ze2| = 13.0307
Zeq := Z1 + Ze2 = 10.8926 + 36.4357i
I11 := E1/Zeq = -0.728932 - 3.07007i
|I11| = 3.15542
arg(I11)*180/π = -103.357
I21 := I11*Z7/(1i*x22 + Z7) = -0.769555 - 1.29415i
|I21| = 1.50567
arg(I21)*180/π = -120.737
I31 := I11*(1i*x2)/(1i*x22 + Z7) = -0.0406224 + 1.77592i
|I31| = 1.77638
arg(I31)*180/π = 91.3104
I41 := I31*Z5/(Z5 - XC3*1i) = -0.429482 + 2.17594i
|I41| = 2.21792
arg(I41)*180/π = 101.165
I51 := I31 - I41 = 0.388859 - 0.400023i
|I51| = 0.55788
arg(I51)*180/π = -45.8107
S2 := E1*conj(I11)
S2 = 108.453 + 362.777i
P1 := (|I11|^2*R1) + (|I31|^2*R3) + (|I51|^2*R4)
P1 = 108.453
Q2 := |I11|^2*(XL1 - XC1) + |I21|^2*(-x2) + (|I31|^2*XL2) + (|I41|^2*(-XC3)) + (|I51|^2*XL3) = 362.777
U11 := I31*(XL2*1i) + I51*R4 = -42.8945 - 6.2971i
U12 := I21*(-x22*1i) - I31*R3 - I51*(XL3*1i) = -42.8945 - 6.2971i
# last state
C1 := 1/(XC1*ω) = 0.000244854
L1 := XL1/ω = 0.117775
C2 := 1/(XC2*ω) = 0.00031831
L2 := XL2/ω = 0.0859437
L3 := XL3/ω = 0.063662
C3 := 1/(XC3*ω) = 0.000530516
Z(p) := ω*L1 - 1/(ω*C1) + ((ω*L2 + (ω*L3*(-1/(ω*C3)))/(ω*L3 - 1/(ω*C3)))*(-1/(ω*C2))/(-1/(ω*C2) + ω*L2 + (ω*L3*(-1/(ω*C3)))/(ω*L3 - 1/(ω*C3))))
ee := Z(p)  # error: Эта переменная не определена.
Induct
Z6 = 1.28219 - 7.38082i
RE := Re(Z6) = 1.28219
XCe := |Im(Z6)| = 7.38082
Z11 := R1 - 1i*(XC2 - XL1 + XC1) + R2 = 16 + 14i
Z22 := R3 + R2 + RE - 1i*(XCe + XC2 - XL2) = 21.2822 + 9.61918i
Z12 := -(R2 - 1i*(XC2 + XM)) = -9 + 25i
Z21 := Z12 = -9 + 25i
Δ := [Z11, Z12; Z21, Z22] → [16 + 14i, -9 + 25i; -9 + 25i, 21.2821917808 + 9.61917808219i]
Δ := Z11*Z22 - Z12*Z21 → 749.846575342 + 901.857534247i
Δ = 749.847 + 901.858i
arg(Δ)*180/π = 50.2583
|Δ| = 1172.87
Δ1 := [E1, Z12; 0, Z22] → [103.92 - 60.0i, -9 + 25i; 0, 21.2821917808 + 9.61917808219i]
Δ1 := E1*Z22 → 2788.79605479 - 277.306520548i
Δ1 = 2788.8 - 277.307i
|Δ1| = 2802.55
arg(Δ1)*180/π = -5.67859
Δ2 := [Z11, E1; Z21, 0] → [16 + 14i, 103.92 - 60.0i; -9 + 25i, 0]
Δ2 := -E1*Z21 → -564.72 - 3138.0i
Δ2 = -564.72 - 3138i
|Δ2| = 3188.41
arg(Δ2)*180/π = -100.202
i1 := Δ1/Δ
i1 = 1.33837 - 1.9795i
|i1| = 2.38949
arg(i1)*180/π = -55.9369
i3 := Δ2/Δ
i3 = -2.36511 - 1.34029i
|i3| = 2.71847
arg(i3)*180/π = -150.46
i2 := i1 - i3 = 3.70347 - 0.639213i
|i2| = 3.75823
arg(i2)*180/π = -9.79267
i4 := i3*Z5/(Z4 + Z5)
i4 = -2.62299 - 2.15416i
|i4| = 3.39418
arg(i4)*180/π = -140.605
i5 := i3*Z4/(Z4 + Z5)
i5 = 0.257881 + 0.81387i
|i5| = 0.853749
arg(i5)*180/π = 72.4188
U44 := i2*R2 - i3*R3 - i5*1i*XL3 = 75.6248 + 3.83261i
U45 := -i2*1i*(-XC2) + i3*1i*XL2 + i1*1i*XM + i5*R4 = 75.6248 + 3.83261i
|U44| = 75.7219
s3 := E1*conj(i1)
s3 = 257.853 + 125.408i
|s3| = 286.732
arg(s3)*180/π = 25.9361
p := (|i1|^2*R1) + (|i2|^2*R2) + (|i3|^2*R3) + (|i5|^2*R4)
p = 257.853
Sm1 := 1i*XM*i3*conj(i1) = 97.1329 - 7.6842i
Pm1 := Re(Sm1) = 97.1329
Qm1 := Im(Sm1) = -7.6842
Sm2 := 1i*XM*i1*conj(i3) = -97.1329 - 7.6842i
Pm2 := Re(Sm2) = -97.1329
Qm2 := Im(Sm2) = -7.6842
Qw := Qm1 + Qm2 = -15.3684
q55 := (|i1|^2*(XL1 - XC1)) + (|i2|^2*(-XC2)) + (|i3|^2*XL2) + (|i4|^2*(-XC3)) + |i5|^2*XL3
q55 = 140.776
q555 := q55 + Qw = 125.408
fe1 := i1*R1 = 9.36856 - 13.8565i
fe2 := fe1 - 1i*XC1*i1 = -16.3649 - 31.2553i
fe3 := fe2 + i3*R3 = -42.3811 - 45.9984i
fe4 := fe3 + i5*1i*XL3 = -58.6585 - 40.8408i
fe5 := fe4 + i5*R4 = -55.3061 - 30.2605i
fe6 := fe5 + i3*1i*XL2 + i1*XM*1i = 10.5742 - 74.0429i
fe7 := fe6 + i1*1i*XL1 + i3*1i*XM = 103.92 - 60i
fe8 := fe6 - i2*1i*XC2 = 4.18205 - 111.078i
fe5' := fe5 + i3*1i*XL2 = -19.1183 - 94.1184i
fe5' + i1*1i*XM = 10.5742 - 74.0429i
fe6' := fe6 + i1*1i*XL1 = 83.8157 - 24.5234i
