U := 98.995 - 98.995i
R1 := 9
XL1 := 45
E := 140
R2 := 11
XL2 := 50
Ф := -45
R3 := 13
XL3 := 55
R4 := 15
XC1 := 25
XC2 := 30
XC3 := 35
XM := 27
Z1 := R1 + (XL1 - XC1)*1i = 9 + 20i
Z4 := R3 = 13
Z2 := R2 + XL2*1i = 11 + 50i
Z5 := R4 - XC3*1i = 15 - 35i
Z3 := -XC2*1i = -30i
Z6 := XL3*1i = 55i
Ze := Z1 + ((Z3 + Z6 + Z5*Z4/(Z5 + Z4))*Z2)/(Z2 + Z3 + Z6 + Z5*Z4/(Z5 + Z4)) = 15.0943 + 35.5103i
K1 := U/Ze = -1.35751 - 3.36482i
K2 := (K1*(Z3 + Z6 + (Z5*Z4)/(Z5 + Z4)))/(Z2 + Z3 + Z6 + (Z5*Z4)/(Z5 + Z4)) = -0.608545 - 1.0122i
K3 := (K1*Z2)/(Z2 + Z3 + Z6 + (Z5*Z4)/(Z5 + Z4)) = -0.748961 - 2.35261i
K4 := K3*Z5/(Z5 + Z4) = -1.14608 - 1.75673i
K5 := K3*Z4/(Z5 + Z4) = 0.397121 - 0.595883i
# Перевірка за балансом потужностей
S1 := U*conj(K1) = 198.714 + 467.486i
P := (R1*|K1|^2) + R2*|K2|^2 + R3*|K4|^2 + R4*|K5|^2 = 198.714
Q := ((-XC1 + XL1)*|K1|^2) + XL2*|K2|^2 + (-XC2 + XL3)*|K3|^2 + (-XC3)*|K5|^2 = 467.486
# Покази вольтметра
V1 := |-K2*1i*XL2 + K3*(-1i*XC2) + K5*R4| = 123.331
V2 := |(K2*R2 - K3*(1i*XL3)) - K5*(-1i*XC3)| = 123.331
# Діаграми напруг
Fia := 0
Fib := Fia + K1*(-1i*XC1) = -84.1204 + 33.9377i
Fic := Fib + K1*R1 = -96.338 + 3.65432i
Fid := Fic + K2*R2 = -103.032 - 7.47993i
Fie := Fid + K2*1i*XL2 = -52.4217 - 37.9072i
Fi1 := Fie + K1*1i*XL1 = 98.995 - 98.995i
Fi11 := Fi1 - U = 1.42109e-14
Fif := Fic + K3*1i*XL3 = 33.0557 - 37.5386i
Fin := Fif + K4*R3 = 18.1566 - 60.376i
Fim := Fif + K5*(-1i*XC3) = 12.1998 - 51.4378i
Finn := Fim + K5*R4 = 18.1566 - 60.376i
# Прийняти опір Р2 = 0 і, вважаючи реакт.....
