U := 98.995 - 98.995i
R1 := 9
XL1 := 45
E := 140
R2 := 11
XL2 := 50
Ф := -45
R3 := 13
XL3 := 55
R4 := 15
XC1 := 25
XC2 := 30
XC3 := 35
XM := 27
Ze := -1i*(XC2 + XL3) + (R3*(R4 - 1i*XC3))/(R3 + R4 + 1i*(-XC3)) = 10.6446 - 87.9443i
Re := Re(Ze) = 10.6446
Xe := Im(Ze) = -87.9443
# Умова резонансу Bab := Bn + Be  Bn = -Be
Bn := -Xe/(Xe^2 + Re^2) = 0.0112067
Xn := 1/Bn = 89.2327
# Розрахувати струми для резоннсного стану кола | XN
Z1 := R1 + (XL1 - XC1)*1i = 9 + 20i
Z4 := R3 = 13
Z5 := R4 - XC3*1i = 15 - 35i
Z3 := -XC2*1i + XL3*1i = 25i
Z345 := Z3 + (Z4*Z5)/(Z4 + Z5) = 10.6446 + 22.0557i
# Вхідний опір кола
Z(XN) := Z1 + (Z345*1i*XN)/(Z345 + 1i*XN) → 9 - (22.0557491289 - 10.6445993031i)*XN/(1.0i*XN + 10.6445993031 + 22.0557491289i) + 20i
# Зробити ручками. Є фотка
