U := 98.995 - 98.995i
R1 := 9
XL1 := 45
w := 60
E := 140
R2 := 11
XL2 := 50
f := 2*π*w = 376.991
Ф := -45
R3 := 13
XL3 := 55
R4 := 15
XC1 := 25
XC2 := 30
XC3 := 35
XM := 27
L3 := XL3/f = 0.145892
C2 := 1/(XC2*f) = 8.84194e-5
C3 := 1/(XC3*f) = 7.57881e-5
L2 := XL2/f = 0.132629
Z(p) := (L2*p*(L3*p - 1/(C3*p) - 1/(C2*p)))/(L2*p + L3*p - 1/(C2*p) + (-1/(C3*p))) float, 5 → 0.13263*p*(-0.14589*p + 24504.0/p)/(-0.27852*p + 24504.0/p)
# знаходимо нулі
p := Z(p) solve, p; float, 5 → [-409.83; 409.83; 0]
# знаходимо полюси
