v := [45, -25, 20; -25, 100, 35; 20, 35, 115]
f := [150; 0; -50]
Q := v^-1*f = [5.34073; 2.02853; -1.98098]
a := [0.119, -0.028, 0; -0.028, 0.076, -0.022; 0, -0.022, 0.09]
b := [6; 6; -12.22]
n := a^-1*b → [66.6786428776; 69.0985179439; -118.887028947]
d := [45, -25; -25, 100]
t := [150; 0]
cur := d^-1*t → [120/31; 30/31]
