U := 14.4
i1 := 0.064*exp(21.5*(-π/180)*1i)
i2 := 0.082*exp(-63.9*π/180*1i)
z1e := 209.3 + 82.46i
z2e := 77.26 + 157.7i
Zm := 42i
z1 := (U - i2*Zm)/i1 = 173.058 + 42.7246i
z2 := (U - i1*Zm)/i2 = 99.3616 + 133.495i
Uz := 13.2
i1z := 0.1*exp(1.3*(-π/180)*1i)
i2z := 0.09*exp(31.5*(-π/180)*1i)
z1z := (Uz + i2z*Zm)/i1z = 150.98 + 35.6643i
z2z := (Uz + i1z*Zm)/i2z = 101.58 + 116.966i
