I1 := -1.25 - 2.04i
I4 := -0.72 - 0.7i
I5 := -0.055 - 0.66i
I2 := -0.47 - 0.68i
I3 := -0.78 - 1.36i
XL1 := 60i
XL2 := 50i
XL3 := 43i
XC1 := -20i
XC2 := -15i
XC3 := -13i
R1 := 9
R2 := 11
R3 := 13
R4 := 15
Xm := 32i
Um := I1*XC1 = -40.8 + 25i
Uf := Um + I1*R1 = -52.05 + 6.64i
Ue := Uf + I3*XL3 = 6.43 - 26.9i
Uc := Ue + I4*R3 = -2.93 - 36i
Ud := Ue + I5*XC3 = -2.15 - 26.185i
Uc1 := Ud + I5*R4 = -2.975 - 36.085i
Ub := Uc + I3*XC2 = -23.33 - 24.3i
Ul := Uf + I2*R2 = -57.22 - 0.84i
Ub1 := Ul + I2*XL2 = -23.22 - 24.34i
Ua := Ub + I1*XL1 = 99.07 - 99.3i
||Ua|| = 140.269
arg(Ua)*180/π = -45.0664
