XL1 := 60i
XL2 := 50i
XL3 := 43i
XC1 := -20i
XC2 := -15i
XC3 := -13i
R1 := 9
R2 := 11
R3 := 13
R4 := 15
Xm := 32i
z1 := XL1 + XC1 + R1 = 9 + 40i
z2 := XL2 + R2 = 11 + 50i
z3 := XC2 + XL3 = 28i
z4 := R3 = 13
z5 := R4 + XC3 = 15 - 13i
z45 := 1/(1/z4 + 1/z5) = 8.03463 - 2.30535i
z11 := z1 + z3 + z45 = 17.0346 + 65.6946i
z22 := z2 + z3 + z45 = 19.0346 + 75.6946i
z12 := z3 + z45 + Xm = 8.03463 + 57.6946i
E := 140*exp(-π/4*1i) = 98.9949 - 98.9949i
Ik1 := 0
A := [z11, z12; z12, z22]
C := [E; 0]
Ik2 := 0
[Ik1; Ik2] := (A^-1*C) = [-0.871257 - 5.06672i; 0.238902 + 3.82947i]
|Ik1| = 5.14109
arg(Ik1)*180/π = -99.757
|Ik2| = 3.83691
arg(Ik2)*180/π = 86.4302
i1 := Ik1 = -0.871257 - 5.06672i
i2 := -Ik2 = -0.238902 - 3.82947i
|i2| = 3.83691
arg(i2)*180/π = -93.5698
i3 := Ik1 + Ik2 = -0.632354 - 1.23726i
|i3| = 1.38949
arg(i3)*180/π = -117.071
i4 := i3*z5/(z4 + z5) = -0.610234 - 0.652547i
|i4| = 0.893422
arg(i4)*180/π = -133.081
i5 := i3 - i4 = -0.0221199 - 0.584711i
|i5| = 0.58513
arg(i5)*180/π = -92.1665
Uv := i2*R2 - i3*XL3 - i5*XC3 = -48.2288 - 15.2205i
|Uv| = 50.5735
Sdzh := E*conj(i1) = 415.33 + 587.83i
Sm12 := Xm*i2*conj(i1) = -68.0319 + 627.552i
Sm21 := Xm*i1*conj(i2) = 68.0319 + 627.552i
Sm := Sm12 + Sm21 = 1255.1i
Psp := |i1|^2*R1 + |i2|^2*R2 + |i4|^2*R3 + |i5|^2*R4 = 415.33
Qsp := |i1|^2*(XL1 + XC1) + |i2|^2*XL2 + |i3|^2*(XL3 + XC2) + |i5|^2*XC3 - Sm = 587.83i
Um := i1*XC1 = -101.334 + 17.4251i
Uf := Um + i1*R1 = -109.176 - 28.1754i
Ue := Uf + i3*XL3 = -55.9737 - 55.3666i
Uc := Ue + i4*R3 = -63.9067 - 63.8497i
Ud := Ue + i5*XC3 = -63.5749 - 55.0791i
Uc1 := Ud + i5*R4 = -63.9067 - 63.8497i
Ub := Uc + i3*XC2 = -82.4656 - 54.3644i
Ul := Uf + i2*R2 = -111.804 - 70.2995i
Ub1 := Ul + i2*XL2 = 79.6696 - 82.2446i
Ubm := Ub1 - i1*Xm = -82.4656 - 54.3644i
Ua := Ub + i1*XL1 = 221.538 - 106.64i
Uam := Ua - i2*Xm = 98.9949 - 98.9949i
||Uam|| = 140
arg(Uam)*180/π = -45
