a := 10
b := 15
d := 15
P := a + b + d
p := P/2
sq := sqrt(p*(p - a)*(p - b)*(p - d))
ha := 2*sq/a
hb := 2*sq/b
hd := 2*sq/d
ma := sqrt(2*(b^2 + d^2) - a^2)/2
mb := sqrt(2*(a^2 + d^2) - b^2)/2
md := sqrt(2*(b^2 + a^2) - d^2)/2
ba := 2*sqrt(b*d*p*(p - a))/(b + d)
bb := 2*sqrt(a*d*p*(p - b))/(a + d)
bd := 2*sqrt(b*a*p*(p - d))/(b + a)
sq = 70.7107
ha = 14.1421
hb = 9.42809
hd = 9.42809
ma = 14.1421
mb = 10.3078
md = 10.3078
ba = 14.1421
bb = 9.79796
bd = 9.79796
