h11e := 2000
r1 := 100000
h12e := 0.04
r2 := 10000
h21e := 200
r3 := r2
h22e := 0.0001
r4 := r2
c1 := 10^-3
r5 := r1
c2 := c1
h11c := h11e = 2000
He := det([h11e, h12e; h21e, h22e]) = -7.8
h12c := 1/(1 + h12e) = 0.961538
h21c := -(1 + h21e) = -201
h22c := h22e = 0.0001
Hc := det([h11c, h12c; h21c, h22c]) = 193.469
Z1 := [He/h22e, h12e/h22e; -h21e/h22e, 1/h22e] = [-78000, 400; -2000000, 10000]
[a21, a22; a23, a24] := [1, 0; 1/r2, 1]
A2d := det([a21, a22; a23, a24]) = 1
Z2 := [a21/a23, A2d/a23; 1/a23, a24/a23] = [10000, 10000; 10000, 10000]
Z12 := Z1 + Z2 = [-68000, 10400; -1990000, 20000]
Z12d := |Z12|
[z121, z122; z123, z124] := Z12
A12 := [z121/z123, Z12d/z123; 1/z123, z124/z123] = [0.0341709, -9716.58; -5.02513e-7, -0.0100503]
A3 := [1, 0; 1/r1, 1] = [1, 0; 1e-5, 1]
A45 := [Hc/h21c, -h11c/h21c; -h22c/h21c, -1/h21c]*[Hc/h21c, -h11c/h21c; -h22c/h21c, -1/h21c] = [0.926476, -9.52794; -4.76397e-7, 2.97022e-5]
[a451, a452; a453, a454] := A45
A45d := |A45|
Z45 := [a451/a453, A45d/a453; 1/a453, a454/a453] = [-1944755, -48.2356; -2099089, -62.3476]
[a61, a62; a63, a64] := [1, 0; 1/r3, 1]
A6d := det([a21, a22; a23, a24]) = 1
Z6 := [a61/a63, A6d/a63; 1/a63, a64/a63] = [10000, 10000; 10000, 10000]
Z456 := Z45 + Z6 = [-1934755, 9951.76; -2089089, 9937.65]
[z4561, z4562; z4563, z4564] := Z45
Z456d := |Z456|
A456 := [z4561/z4563, Z456d/z4563; 1/z4563, z4564/z4563] = [0.926476, -744.704; -4.76397e-7, 2.97022e-5]
A7 := [1, 0; 1/r4, 1] = [1, 0; 0.0001, 1]
A17 := A12*A3*A456*A7 = [-0.049072, 46.624; -5.09014e-7, 0.000448769]
[a171, a172; a173, a174] := A17
A17d := |A17|
Y17 := [a174/a172, -A17d/a172; -1/a172, a171/a172] = [9.62528e-6, -3.66825e-8; -0.0214482, -0.0010525]
[a81, a82; a83, a84] := [1, r5; 0, 1]
A8d := det([a81, a82; a83, a84])
Y8 := [a84/a82, -A8d/a82; -1/a82, a81/a82] = [1e-5, -1e-5; -1e-5, 1e-5]
Y := Y17 + Y8 = [1.96253e-5, -1.00367e-5; -0.0214582, -0.0010425]
[y11, y12; y21, y22] := Y
Kv := -y21/y22 = -20.5833
Ki := -y21/y11 = 1093.39
