A := [2, 3; 4, 5]
[a11, a12; a21, a22] := A
Za := [a11/a21, |A|/a21; 1/a21, a22/a21] = [0.5, -0.5; 0.25, 1.25]
[z11, z12; z21, z22] := Za
Ya := [a22/a12, -|A|/a12; -1/a12, a11/a12] = [1.66667, 0.666667; -0.333333, 0.666667]
[y11, y12; y21, y22] := Ya
Yz := [z22/|Za|, -z12/|Za|; -z21/|Za|, z11/|Za|] = [1.66667, 0.666667; -0.333333, 0.666667]
Ha := [a12/a22, |A|/a22; -1/a22, a21/a22] = [0.6, -0.4; -0.2, 0.8]
[h11, h12; h21, h22] := Ha
Hz := [|Za|/z22, z12/z22; -z21/z22, 1/z22] = [0.6, -0.4; -0.2, 0.8]
Yh := [1/h11, -h12/h11; h21/h11, |Ha|/h11] = [1.66667, 0.666667; -0.333333, 0.666667]
Hy := [1/y11, -y12/y11; y21/y11, |Ya|/y11] = [0.6, -0.4; -0.2, 0.8]
Zy := [y22/|Ya|, -y12/|Ya|; -y21/|Ya|, y11/|Ya|] = [0.5, -0.5; 0.25, 1.25]
Zh := [|Ha|/h22, h12/h22; -h21/h22, 1/h22] = [0.5, -0.5; 0.25, 1.25]
Ay := [-y22/y21, -1/y21; -|Ya|/y21, -y11/y21] = [2, 3; 4, 5]
Az := [z11/z21, |Za|/z21; 1/z21, z22/z21] = [2, 3; 4, 5]
Ah := [-|Ha|/h21, -h11/h21; -h22/h21, -1/h21] = [2, 3; 4, 5]
