x_imin := 1
x_imax := 4
k := 2
y_11 := 1.1
y_12 := 1.3
y_13 := 1.5
y_14 := 1.2
y_15 := 1.4
S_ад := 0.275
y_21 := 2.3
y_22 := 2.2
y_23 := 2.4
y_24 := 2.5
y_25 := 2.1
N := 4
y_31 := 3.5
y_32 := 3.2
y_33 := 3.4
y_34 := 3.3
y_35 := 3.1
m := 5
y_41 := 4.1
y_42 := 4.4
y_43 := 4.3
y_44 := 4.2
y_45 := 4.5
p := 0.950
b := 0.00375  # S^2ад := 0.275
d := 2
m_x := 1
m_y := 2
a_2 := -1
a_3 := -1
a_4 := -1
a_11 := 8
a_21 := -2
b_0 := 1
b_1 := -3
b_11 := -4
# Хід роботи
# Завдання №1
# Визначити абсолютне значення x_i0 та кодоване значення x_i0 основного рівня
# фактора x_i при заданих значеннях x_imin та x_imax.
# Значення x_imin та x_imax узяти з таблиці варіантів.
# Абсолютні значення
x_i
x_imin := -1
x_imax := 4
x_i0 := (x_imin + x_imax)/2 = 1.5
# _ | _ | _
# Кодовані значення
conj(x_i)
x_iminK := -1
x_imaxK := 1
x_i0K := 0
# Завдання №2
# Визначити значення (розмір) зоряного плеча l, від'ємне кодоване значення x_il та відповідне абсолютне значення x_il фактора x_i для зоряної точки при використанні рототабельного композиційного плану для k факторів.
# Значення k та x_imax узяти з таблиці варіантів, а значеня x_i0 – результат розрахунків по п.1.
l1 := sqrt(k)
# _
# Кодоване значення
x_ilK := -l1 = -1.41421
# Абсолютне значення знаходимо з формули  x_ilK=(x_il - x_i0)/ΔX_i де ΔX_i = (x_imax - x_i0)
# –
# _
# Абсолютне значення
x_il := x_ilK*(x_imax - x_i0) + x_i0 = -2.03553
# Завдання №3
# Визначити значення (розмір) зоряного плеча l, додатнє кодоване значення x_il та відповідне абсолютне значення x_il фактора x_i для зоряної точки при використанні центрального ортогонального композиційного плану для двох факторів.
# Значення x_imax узяти з таблиці варіантів, а значеня x_i0 – результат розрахунків по п.1.
# Розмір зоряного плеча визначаємо з біквадратного рівняння 4*l^4 + 4*2^k*l^2 - 2^k*(2*k + 1)= 0
l2 := 1
# _
# Кодоване значення
x_ilK := l2 = 1
# Абсолютне значення знаходимо з формули  x_ilK=(x_il - x_i0)/ΔX_i де ΔX_i = (x_imax - x_i0)
# –
# _
# Абсолютне значення
x_il := x_ilK*(x_imax - x_i0) + x_i0 = 4
# Завдання №4
# Визначити середньоарифметичне значення y_m(m=1,4) для п'яти повторень вимірювань функції відгуку y_ms(m=1,4;s=1,5) у кожній m-ій точці факторного простору (m=5), значення статистичних оцінок дисперсій S^2m(m=1,4) та середнє значення статистичної оцінки дисперсії S^2.
# Значення y_ms(m=1,4;s=1,5) узяти з таблиці варіантів.
# Cередньоарифметичні значення
y_1C := 1/5*(y_11 + y_12 + y_13 + y_14 + y_15) = 1.3
y_2C := 1/5*(y_21 + y_22 + y_23 + y_24 + y_25) = 2.3
y_3C := 1/5*(y_31 + y_32 + y_33 + y_34 + y_35) = 3.3
y_4C := 1/5*(y_41 + y_42 + y_43 + y_44 + y_45) = 4.3
# Значення статистичних оцінок дисперсій S^2m
S2_1 := 1/(5 - 1)*((y_11 - y_1C)^2 + (y_12 - y_1C)^2 + (y_13 - y_1C)^2 + (y_14 - y_1C)^2 + (y_15 - y_1C)^2) = 0.025
S2_2 := 1/(5 - 1)*((y_21 - y_2C)^2 + (y_22 - y_2C)^2 + (y_23 - y_2C)^2 + (y_24 - y_2C)^2 + (y_25 - y_2C)^2) = 0.025
S2_3 := 1/(5 - 1)*((y_31 - y_3C)^2 + (y_32 - y_3C)^2 + (y_33 - y_3C)^2 + (y_34 - y_3C)^2 + (y_35 - y_3C)^2) = 0.025
S2_4 := 1/(5 - 1)*((y_41 - y_4C)^2 + (y_42 - y_4C)^2 + (y_43 - y_4C)^2 + (y_44 - y_4C)^2 + (y_45 - y_4C)^2) = 0.025
# Середнє значення статистичної оцінки дисперсії S^2.
S2 := 1/4*(S2_1 + S2_2 + S2_3 + S2_4) = 0.025
# Завдання №5
# Визначити значення параметра G, кількість ступенів вільності f_1 і f_2та рівень значущості q, що використовуються для перевірки однорідності дисперсії {σ^2[y_m]=σ^2=const(m=1,4)} по критерію Кохрена для заданих значень статистичних оцінок дисперсії S^2m(m=1,4) при m=5 для двох факторів (k=2). Підтвердити (чи не підтвердити) гіпотезу про однорідність дисперсії по критерію Кохрена з ймовірністю p.
# Значення ймовірності p підтвердження (чи не підтвердження) гіпотези про однорідність дисперсії по критерію Кохрена взяти з таблиці варіантів, а значення S^2m(m=1,4) – результати розрахунків по п.4.
G := S2_1/(S2_1 + S2_2 + S2_3 + S2_4) = 0.25
# f_1:=m-1
f_1 := 5 - 1 = 4
# m = 5 – кількість повторень комбінації
# N = 4 – кількість комбінацій
# f_2:=N
f_2 := 4
q := 1 - p
q = 0.05
# За даними визначаємо G_кр:
G_кр := 0.62
# Оскільки G ≤ G_кр тоді з ймовірністю p гіпотеза про одорідність дисперсії підтверджується.
# Отже, кількість повторень правильна – ми отримали нормальний розподіл.
# Завдання №6
# Визначити значення статистичної оцінки дисперсії похибки розрахунку будь-якого коефіцієнта рівняння регресії S^2{b}, значення параметра t та кількість ступенів вільності f_3, що використовуються при перевірці значущості коєфіцієнтів лінійної регресії по критерію Стьюдента (повний факторний експеримент) при m=5 для двох факторів (k=2). Визначити з ймовірністю p незначущі коефіцієнти лінійної регресії та кількість значущих коефіцієнтів d лінійної регресії.
# Значення b узяти з таблиці варіантів, значення f_3 розраховується за формулою f_3=f_1f_2 (значення f_1 та f_2 узяти з п.5), а значення S^2– результати розрахунків по п.4.
# m = 5 – кількість повторень комбінації
# N = 4 – кількість комбінацій
S2_b := 1/(5*4)*S2 = 0.00125
t_i := |b|/S2_b = 3
f_3 := f_1*f_2
f_3 = 16
q := 1 - p
q = 0.05
# За даними визначаємо  t_кр
t_кр := 2.1199
# Оскільки t > t_кр тоді з ймовірністю p заданий по варіанту коєфицієнт b є значимим.
# Отже, кількість повторень правильна – ми отримали нормальний розподіл.
# Завдання №7
# Визначити значення параметра F, кількість ступенів вільності f_4, що використовується при перевірці адекватності моделі (рівняння регресіі) оригіналу (усім експериментальним даним) по критерію Фішера. Визначити чи адекватна статистична математична модель оригіналу з ймовірність p чи ні.
# Значення статистичної оцінки дисперсії адекватності S^2ад  та кількість значущих коефіцієнтів рівняння регресії d узяти з таблиці варіантівю
S2_ад := 0.275
F := S2_ад/S2
F = 11
# Ступені вільності:
f_3 := f_1*f_2
f_3 = 16
f_4 := N - d
f_4 = 2
q := 1 - p
q = 0.05
# За даними визначаємо  F_кр
F_кр := 19.43
# Оскільки F < F_кр, тоді з ймовірністю p рівняння регресії адекватне усім експерементальним даним по критерію Фішера.
# Це означає, що кількість членів ряду обрано  достатньо.
# Завдання №8
# Для лінійної форми рівняння регресії (один фактор) y=b_0+b_1*x визначити значення коефіцієнтів b_0 та b_1, якщо відомі наступні значення  статистичних  моментів  m_x=(1/n)sum(x_i) та  m_y=(1/n)sum(y_i) і значення статистичних коефіцієнтів a_2=(1/n)sum(x_i^2) та a_11=(1/n)sum(x_i*y_i) .
# Значення m_x, m_y, a_2 та a_11 узяти з таблиці варіантів.
# Для лінійної форми рівняння регресії y=b_0+b_1*x маємо таку систему рівнянь з якої можемо обчислити невідомі коефіцієнти b_0 і b_1:
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# Розв'язки невідомих b_0 та b_1 знайдемо методом Крамера:
# b_0:=[m_y, m_x; a_11, a_2]/[1, m_x; m_x, a_2]
b_0 := (m_y*a_2 - m_x*a_11)/(a_2 - m_x^2)
b_0 = 5
# b_1:=[m_y, m_x; a_11, a_2]/[1, m_x; m_x, a_2]
b_1 := (a_11 - m_x*m_y)/(a_2 - m_x^2)
b_1 = -3
