# Значення, задані за варіантом:
x_imin := -2
k := 4
b := 1*10^-2
S2_ад := 0.900
x_imax := 0
p := 0.900
d := 3
y_11 := 5.1
y_21 := 6.3
y_31 := 7.5
y_41 := 8.1
y_12 := 5.2
y_22 := 6.1
y_32 := 7.1
y_42 := 8.4
y_13 := 5.4
y_23 := 6.2
y_33 := 7.4
y_43 := 8.2
y_14 := 5.3
y_24 := 6.4
y_34 := 7.2
y_44 := 8.3
y_15 := 5.5
y_25 := 6.5
y_35 := 7.3
y_45 := 8.5
# Кодовані значення | Абсолютні значення
x_kimin := -1
x_imin := -2
x_kimax := 1
x_imax := 0
x_ki0 := (x_kimax + x_kimin)/2 = 0
x_i0 := (x_imax + x_imin)/2 = -1
x_kil1 := sqrt(k) = 2
x_il1 := x_kil1*(x_i0 - x_imax) = -2
x_kil2 := -sqrt(k) = -2
x_il2 := -x_kil1*(x_i0 - x_imax) = 2
# Знаходимо середньоарифметичне значення Ym (m=1, 4)
y_1 := (y_11 + y_12 + y_13 + y_14 + y_15)/5 = 5.3
y_2 := (y_21 + y_22 + y_23 + y_24 + y_25)/5 = 6.3
y_3 := (y_31 + y_32 + y_33 + y_34 + y_35)/5 = 7.3
y_4 := (y_41 + y_42 + y_43 + y_44 + y_45)/5 = 8.3
# Знаходимо значення статистичних оцінок дисперсії
m := 5  # -> кількість повторень одної комбінації
N := 4  # -> кількість комбінацій
S2_y1 := ((y_11 - y_1)^2 + (y_12 - y_1)^2 + (y_13 - y_1)^2 + (y_14 - y_1)^2 + (y_15 - y_1)^2)/(m - 1) = 0.025
S2_y2 := ((y_21 - y_2)^2 + (y_22 - y_2)^2 + (y_23 - y_2)^2 + (y_24 - y_2)^2 + (y_25 - y_2)^2)/(m - 1) = 0.025
S2_y3 := ((y_31 - y_3)^2 + (y_32 - y_3)^2 + (y_33 - y_3)^2 + (y_34 - y_3)^2 + (y_35 - y_3)^2)/(m - 1) = 0.025
S2_y4 := ((y_41 - y_4)^2 + (y_42 - y_4)^2 + (y_43 - y_4)^2 + (y_44 - y_4)^2 + (y_45 - y_4)^2)/(m - 1) = 0.025
# Середнє значення статистичної оцінки дисперсії:
S2 := (S2_y1 + S2_y2 + S2_y3 + S2_y4)/4 = 0.025
# Розраховуємо критерій Кохрена
S2_max := max(S2_y1, S2_y2, S2_y3, S2_y4) = 0.025
G := S2_max/(S2_y1 + S2_y2 + S2_y3 + S2_y4) = 0.25
# Степені свободи:
f1 := m - 1 = 4
f2 := N = 4
# Рівень значимості:
q := 1 - p = 0.1
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# З таблиці обираємо
G_кр := 0.628
# Так як
G ≤ G_кр  # , то з імовірністю
p = 0.9  # однорідність дисперсії підтверджується.
# Розраховуємо критерій Стьюдента
m := 5
k := 2
N := 4
S2_b := S2/(N*m) = 0.00125
t := |b|/S2_b = 8
# Кількість ступенів вільності:
f3 := f1*f2 = 16
q = 0.1
p = 0.9
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# З таблиці
t_кр := 1.7459
t > t_кр  # , отже коефіцієнт рівняння регресії значимий з  імовірністю
p = 0.9
d_коеф := 4  # -> кількість значущих коефіцієнтів лінійної регресії
# Розраховуємо критерій Фішера
F := S2_ад/S2 = 36
# Кількість ступенів вільності:
f3 := f1*f2 = 16
f4 := N - d = 1
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# З таблиці
F_кр := 4.49
F > F_кр  # , отже модель не адеквадна оригіналу
# Розраховуємо коефіцієнти рівняння регресії
y == b_0 + b_1*x
# Дано:
m_x := -1
a_2 := -1
m_y := -2
a_11 := 3
# Розрахунки:
b_0 + m_x*b_1 == m_y
m_x*b_0 + a_2*b_1 == a_11
b_0 := det([m_y, m_x; a_11, a_2])/det([1, m_x; m_x, a_2]) = -2.5
b_1 := det([1, m_y; m_x, a_11])/det([1, m_x; m_x, a_2]) = -0.5
