f(x) :=
    -(x^2 + 3*x + 0.5) if x ≤ 0
    -1 + 1/(2 + x^2) if x ≥ 0
x_min := -1
x_max := 1
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d2f(x) :=
    d^2/dx^2(-(x^2 + 3*x + 0.5)) if x ≤ 0
    d^2/dx^2(-1 + 1/(2 + x^2)) if x ≥ 0
d^2/dx^2(-(x^2 + 3*x + 0.5)) → -2
d^2/dx^2(-1 + 1/(2 + x^2)) → 8*x^2/(x^2 + 2)^3 - 2/(x^2 + 2)^2
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Given
d^2/dx^2(-1 + 1/(2 + x^2)) == 0
x > 0
Find(x) → sqrt(6)/3
# Фунція опукла на інтервалі (-1;0) оскільки її друга похідна дорівнює -2 (<0) на всьому інтервалі
# На інтервалі (0;sqrt(6)/3) функція опукла оскільки її друга похідна дорівнює <0 на інтервалі
# sqrt(6)/3 - точка перегину
# На інтервалі (sqrt(6)/3;1) функція вгнута оскільки її друга похідна дорівнює >0 на інтервалі
# Точка x=0 - розрив 1-го роду
x1_0 := x_min = -1
x2_0 := 0
x3_0 := x_max = 1
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.  # error: emission failure
.  # error
. ← .
# Поділимо ліву частину на інтервали
Δf_max := 0.005545
X[0] := x1_0 = -1
A[1] := |d2f(X[0])| = 2
h[1] := sqrt(16*Δf_max/A[1]) = 0.210618
X[1] := X[0] + h[1] = -0.789382
A[2] := |d2f(X[1])| = 2
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h[2] := sqrt(16*Δf_max/A[2]) = 0.210618
X[2] := X[1] + h[2] = -0.578764
A[3] := |d2f(X[2])| = 2
.  # error
h[3] := sqrt(16*Δf_max/A[3]) = 0.210618
X[3] := X[2] + h[3] = -0.368146
A[4] := |d2f(X[3])| = 2
h[4] := sqrt(16*Δf_max/A[4]) = 0.210618
X[4] := X[3] + h[4] = -0.157527
A[5] := |d2f(X[4])| = 2
h[5] := sqrt(16*Δf_max/A[5]) = 0.210618
.  # error
h[5] := h[5] - 0.053 - 9.0689*10^-5 - 3.5209*10^-10 - 4.1911*10^-15 = 0.157527
X[5] := X[4] + h[5] = 0
A[6] := |d2f(X[5])| = 0.5
. ← .
# Поділимо праву частину на інтервали
h[6] := sqrt(16*Δf_max/A[6]) = 0.421236
X[6] := X[5] + h[6] = 0.421236
A[7] := |d2f(X[6])| = 0.28433
h[7] := sqrt(8*Δf_max/A[7]) = 0.394988
X[7] := X[6] + h[7] = 0.816225  # X_7
# співпадає з х=
sqrt(6)/3 = 0.816497
X[8] := x3_0 = 1
A[8] := |d2f(X[8])| = 0.0740741
h[8] := sqrt(8*Δf_max/A[8]) = 0.77386
h[8] := h[8] - 0.59 = 0.18386
X[7] := X[8] - h[8] = 0.81614
# 9. Здійснити розрахунок абсцис x_i(1, n), починаючи з x_0, початкових ординат y_i^p(0,n), вузлів апроксимації(вершин ломаної лінії), що належать функції y=f(x), та кінцевих ординат y_i^k(0,n), вузлів апроксимації з урахуванням корекції, яку здійснюють для отримання знакозмінної похибки апроксимації.
# Виходячи з 8-го завдання, шукаємо ординати вершин ломаної лінії:
j := 0 .. 8
k := 0 .. 6
Yp[j] := f(X[j])
Yk[k] := Yp[k] + Δf_max
Yk[7] := Yp[7]
Yk[8] := Yp[8] - Δf_max
X = [-1; -0.789382; -0.578764; -0.368146; -0.157527; 0; 0.421236; 0.81614; 1]
Yp = [1.5; 1.24502; 0.901324; 0.468906; -0.0522326; -0.5; -0.540745; -0.624918; -0.666667]
Yk = [1.50554; 1.25057; 0.906869; 0.474451; -0.0466876; -0.494455; -0.5352; -0.624918; -0.672212]
# 10. Побудувати графік апроксимуючої функції (ломаної лінії) y=φ(x), використовуючи отримані значення x_i(1, n) та y_i^k(0,n).
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# 11. Здійснити розрахунок значень кутових коефіцієнтів (значень тангенсів кутів нахилу), k_i(i=1,n) лінійних частин ломаної лінії.
# Знаходимо кутові коефіцієнти шляхом ділення різниці ординат на різницю абсцис:
i := 1 .. 8
k[i] := (Yk[i - 1] - Yk[i])/(X[i - 1] - X[i])
k[i] = [-1.21062; -1.63185; -2.05309; -2.47433; -2.84247; -0.0967274; -0.22719; -0.257226]
k == tg(α)
# 12. Виконати розкладання апроксимуючої функції (ломаної лінії) y=φ(x) на окремі доданки (лінійні та елементарні нелінійні {лінійні з обмеженням на нульовому рівні)}, починаючи з точки, яка має абсцису x_0^a. Значення x_0^a узяти з таблиці варіантів.
# 13. Над кожним елементарним нелінійним доданком зазначити його квадрант (І, ІІ, ІІІ, IV) та режим {на відкривання (на В) чи на закривання (на З)}
# x_0^a = x_0
X[0] = -1
y_0(x) := f(X[0])
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b[0] := k[1]
b[1] := k[2] - k[1]
# 2 )
y01(x) := b[0]*(x - X[0])
# 3 )
y12(x) := b[1]*(x - X[1])
y_12(x) :=
    y12(x) if X[1] ≤ x
    0 otherwise
y_01(x) :=
    y01(x) if X[0] ≤ x
    0 otherwise
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# ІV квадрант, на закривання | ІV квадрант, на закривання
b[3] := k[4] - k[3]
b[2] := k[3] - k[2]
# 5 )
y34(x) := b[3]*(x - X[3])
# 4 )
y23(x) := b[2]*(x - X[2])
y_34(x) :=
    y34(x) if X[3] ≤ x
    0 otherwise
y_23(x) :=
    y23(x) if X[2] ≤ x
    0 otherwise
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# ІV квадрант, на закривання | ІV квадрант, на закривання
b[5] := k[6] - k[5] = 2.74575
b[4] := k[5] - k[4] = -0.368146
# 7 )
y56(x) := b[5]*(x - X[5])
# 6 )
y45(x) := b[4]*(x - X[4])
y_56(x) :=
    y56(x) if X[5] ≤ x
    0 otherwise
y_45(x) :=
    y45(x) if X[4] ≤ x
    0 otherwise
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# ІV квадрант, на закривання | І квадрант, на відкривання
b[6] := k[7] - k[6] = -0.130462
b[7] := k[8] - k[7] = -0.0300362
# 8 )
y67(x) := b[6]*(x - X[6])
# 9 )
y78(x) := b[7]*(x - X[7])
y_67(x) :=
    y67(x) if X[6] ≤ x
    0 otherwise
y_78(x) :=
    y78(x) if X[7] ≤ x
    0 otherwise
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# ІV квадрант, на вікривання | ІV квадрант, на відкривання
# 14. Здійснити розрахунок наступних значень:
# - значення φ(x_0^a) для першого лінійного доданку
# - значення b_0=k_0 та x_0 для другого лінійного доданку
# - значення b_i=k_i-k_(i-1) та X_REFi для кожного елементарного нелінійного доданку
# 1) значення φ(x_0^a) для першого лінійного доданку:
# φ(x_0^a)=f(X[0]) = 1.5
# 2) значення b_0=k_0 та х_0 для другого лінійного доданку:
b[0] = -1.21062
# 3) значення b_i=k_i-k_(i-1) та X_REFi для кожного елементарного нелінійного доданку:
Xref[i] := X[i] - Yk[i]/k[i]
Xref[i] = [0.243617; -0.0230348; -0.137055; -0.176396; -0.173952; -5.11184; -1.93451; -1.61331]
b = [-1.21062; -0.421236; -0.421236; -0.421236; -0.368146; 2.74575; -0.130462; -0.0300362]
y_m(x) := y_0(x) + y_01(x) + y_12(x) + y_23(x) + y_34(x) + (y_45(x) + y_56(x) + y_67(x) + y_78(x))
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