f(x) :=
    log(1 - x) + 2 if x ≤ 0
    -(x^2 + 3*x + 2) if x ≥ 0
x_min := -1
x_max := 1
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d2f(x) :=
    d^2/dx^2(log(1 - x) + 2) if x ≤ 0
    d^2/dx^2(-(x^2 + 3*x + 2)) if x ≥ 0
d^2/dx^2(log(1 - x) + 2) → -1/(ln(10)*(x - 1)^2)
d^2/dx^2(-(x^2 + 3*x + 2)) → -2
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# Фунція опукла на інтервалі (-1;0) оскільки її друга похідна <0 на всьому інтервалі
# На інтервалі (0;1) функція опукла оскільки її друга похідна дорівнює -2 <0 на інтервалі
# Точка x=0 - розрив 1-го роду
x1_0 := 0
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.  # error: emission failure
. ← .
# Поділимо ліву частину на інтервали
Δf_max := 0.00347
X[3] := x1_0 + (-10)^-11
A[4] := |d2f(X[3])| = 0.434294
h[3] := sqrt(16*Δf_max/A[4]) = 0.357547
X[2] := X[3] - h[3] = -0.357547
A[3] := |d2f(X[2])| = 0.235654
h[2] := sqrt(16*Δf_max/A[4]) = 0.357547
X[1] := X[2] - h[2] = -0.715093
A[2] := |d2f(X[1])| = 0.147642
h[1] := sqrt(16*Δf_max/A[3]) = 0.485386
h[1] := h[1] - 0.2 = 0.285386
X[0] := X[1] - h[1] = -1.00048
# Поділимо праву частину на інтервали | ∞
X[4] := x1_0 = 0
A[5] := |d2f(X[4])| = 2
h[4] := sqrt(16*Δf_max/A[5]) = 0.166613
X[5] := X[4] + h[4] = 0.166613
A[6] := |d2f(X[5])| = 2
h[5] := sqrt(16*Δf_max/A[6]) = 0.166613
X[6] := X[5] + h[5] = 0.333227
A[7] := |d2f(X[6])| = 2
h[6] := sqrt(16*Δf_max/A[7]) = 0.166613
X[7] := X[6] + h[6] = 0.49984
A[8] := |d2f(X[7])| = 2
h[7] := sqrt(16*Δf_max/A[8]) = 0.166613
X[8] := X[7] + h[7] = 0.666453
A[9] := |d2f(X[8])| = 2
h[8] := sqrt(16*Δf_max/A[9]) = 0.166613
X[9] := X[8] + h[8] = 0.833067
A[10] := |d2f(X[9])| = 2
h[9] := sqrt(16*Δf_max/A[10]) = 0.166613
X[10] := X[9] + h[9] = 0.99968  # X_10  # співпадає з х=1
# 9. Здійснити розрахунок абсцис x_i(1, n), починаючи з x_0, початкових ординат y_i^p(0,n), вузлів апроксимації(вершин ломаної лінії), що належать функції y=f(x), та кінцевих ординат y_i^k(0,n), вузлів апроксимації з урахуванням корекції, яку здійснюють для отримання знакозмінної похибки апроксимації.
# Виходячи з 8-го завдання, шукаємо ординати вершин ломаної лінії:
j := 0 .. 10
Yp[j] := f(X[j])
Yk[j] := Yp[j] + Δf_max
X = [-1.00048; -0.715093; -0.357547; -1e-11; 0; 0.166613; 0.333227; 0.49984; 0.666453; 0.833067; 0.99968]
Yp = [2.30113; 2.23429; 2.13275; 2; -2; -2.5276; -3.11072; -3.74936; -4.44352; -5.1932; -5.9984]
Yk = [2.3046; 2.23776; 2.13622; 2.00347; -1.99653; -2.52413; -3.10725; -3.74589; -4.44005; -5.18973; -5.99493]
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# 10. Побудувати графік апроксимуючої функції (ломаної лінії) y=φ(x), використовуючи отримані значення x_i(1, n) та y_i^k(0,n).
# 11. Здійснити розрахунок значень кутових коефіцієнтів (значень тангенсів кутів нахилу), k_i(i=1,n) лінійних частин ломаної лінії.
# Знаходимо кутові коефіцієнти шляхом ділення різниці ординат на різницю абсцис:
i := 1 .. 9
k[i] := (Yk[i - 1] - Yk[i])/(X[i - 1] - X[i])
k[i] = [-0.234231; -0.283971; -0.371294; -4e11; -3.16661; -3.49984; -3.83307; -4.16629; -4.49952]
k == tg(α)
# 12. Виконати розкладання апроксимуючої функції (ломаної лінії) y=φ(x) на окремі доданки (лінійні та елементарні нелінійні {лінійні з обмеженням на нульовому рівні)}, починаючи з точки, яка має абсцису x_0^a. Значення x_0^a узяти з таблиці варіантів.
# 13. Над кожним елементарним нелінійним доданком зазначити його квадрант (І, ІІ, ІІІ, IV) та режим {на відкривання (на В) чи на закривання (на З)}
# x_0^a = x_0
y_0 := f(X[0])
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b[0] := k[1]
b[1] := k[2] - k[1]
# 2 )
y01(x) := f(X[0]) + b[0]*(x - X[0])
# 3 )
y12(x) := y01(x) + b[1]*(x - X[1])
y_12(x) :=
    y12(x) if y12(x) ≥ 0
    0 if y12(x) ≤ 0
y_01(x) :=
    y01(x) if y01(x) ≥ 0
    0 if y01(x) ≤ 0
y(x) :=
    y_01(x) if x ≤ X[1]
    y_12(x) if x ≥ X[1]
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# ІІ квадрант, на закривання | ІІ квадрант, відкривання
b[2] := k[3] - k[2]
# 4 )
y23(x) := y12(x) + b[2]*(x - X[2])
y_23(x) :=
    y23(x) if y23(x) ≥ 0
    0 if y23(x) ≤ 0
y(x) :=
    y_01(x) if x ≤ X[1]
    y_12(x) if X[1] ≤ x ≤ X[2]
    y_23(x) if x ≥ X[2]
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# ІІ квадрант, на відкривання
b[3] := k[4] - k[3]
# 5 )
y34(x) := y23(x) + b[3]*(x - X[3])
y_34(x) := y34(x)
y(x) :=
    y_01(x) if x ≤ X[1]
    y_12(x) if X[1] ≤ x ≤ X[2]
    y_23(x) if X[2] ≤ x ≤ X[3]
    y_34(x) if x ≥ X[3]
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b[4] := k[5] - k[4] = 4e11
# 6 )
y45(x) := y34(x) + b[4]*(x - X[4])
y_45(x) :=
    y45(x) if y45(x) ≤ 0
    0 if y45(x) ≥ 0
y(x) :=
    y_01(x) if x ≤ X[1]
    y_12(x) if X[1] ≤ x ≤ X[2]
    y_23(x) if X[2] ≤ x ≤ X[3]
    y_34(x) if X[3] ≤ x ≤ X[4]
    y_45(x) if x ≥ X[4]
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# ІV квадрант, на закривання
b[5] := k[6] - k[5] = -0.333227
# 7 )
y56(x) := y45(x) + b[5]*(x - X[5])
y_56(x) :=
    y56(x) if y56(x) ≤ 0
    0 if y56(x) ≥ 0
y(x) :=
    y_01(x) if x ≤ X[1]
    y_12(x) if X[1] ≤ x ≤ X[2]
    y_23(x) if X[2] ≤ x ≤ X[3]
    y_34(x) if X[3] ≤ x ≤ X[4]
    y_45(x) if X[4] ≤ x ≤ X[5]
    y_56(x) if x ≥ X[5]
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# ІV квадрант, на закривання
b[6] := k[7] - k[6] = -0.333227
# 8 )
y67(x) := y56(x) + b[6]*(x - X[6])
y_67(x) :=
    y67(x) if y67(x) ≤ 0
    0 if y67(x) ≥ 0
y(x) :=
    y_01(x) if x ≤ X[1]
    y_12(x) if X[1] ≤ x ≤ X[2]
    y_23(x) if X[2] ≤ x ≤ X[3]
    y_34(x) if X[3] ≤ x ≤ X[4]
    y_45(x) if X[4] ≤ x ≤ X[5]
    y_56(x) if X[5] ≤ x ≤ X[6]
    y_67(x) if x ≥ X[6]
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# ІV квадрант, на закривання
b[7] := k[8] - k[7] = -0.333227
# 9 )
y78(x) := y67(x) + b[7]*(x - X[7])
y_78(x) :=
    y78(x) if y78(x) ≤ 0
    0 if y78(x) ≥ 0
y(x) :=
    y_01(x) if x ≤ X[1]
    y_12(x) if X[1] ≤ x ≤ X[2]
    y_23(x) if X[2] ≤ x ≤ X[3]
    y_34(x) if X[3] ≤ x ≤ X[4]
    y_45(x) if X[4] ≤ x ≤ X[5]
    y_56(x) if X[5] ≤ x ≤ X[6]
    y_67(x) if X[6] ≤ x ≤ X[7]
    y_78(x) if x ≥ X[7]
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# ІV квадрант, на закривання
b[8] := k[9] - k[8] = -0.333227
# 10)
y89(x) := y78(x) + b[8]*(x - X[8])
y_89(x) :=
    y89(x) if y89(x) ≤ 0
    0 if y89(x) ≥ 0
y(x) :=
    y_01(x) if x ≤ X[1]
    y_12(x) if X[1] ≤ x ≤ X[2]
    y_23(x) if X[2] ≤ x ≤ X[3]
    y_34(x) if X[3] ≤ x ≤ X[4]
    y_45(x) if X[4] ≤ x ≤ X[5]
    y_56(x) if X[5] ≤ x ≤ X[6]
    y_67(x) if X[6] ≤ x ≤ X[7]
    y_78(x) if X[7] ≤ x ≤ X[8]
    y_89(x) if x ≥ X[8]
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# ІV квадрант, на закривання
# 14. Здійснити розрахунок наступних значень:
# - значення φ(x_0^a) для першого лінійного доданку
# - значення b_0=k_0 та x_0 для другого лінійного доданку
# - значення b_i=k_i-k_(i-1) та X_REFi для кожного елементарного нелінійного доданку
# 1) значення φ(x_0^a) для першого лінійного доданку:
# φ(x_0^a)=f(X[0]) = 2.30113
# 2) значення b_0=k_0 та х_0 для другого лінійного доданку:
b[0] = -0.234231
# 3) значення b_i=k_i-k_(i-1) та X_REFi для кожного елементарного нелінійного доданку:
Xref[i] := X[i] - Yk[i]/k[i]
Xref[i] = [8.83853; 7.16513; 5.39592; -4.99132e-12; -0.630494; -0.5546; -0.477417; -0.399254; -0.32033]
b = [-0.234231; -0.0497401; -0.0873222; -4e11; 4e11; -0.333227; -0.333227; -0.333227; -0.333227]
