# Міністерство освіти і науки України
# Національний технічний університет України
# "Київський політехнічний інститут ім. Ігоря Сікорського"
# Розрахункова графічна робота
# "Виконання кусочно-лінійної апроксимації"
# Варіант №23
Виконав
# студент групи ІО-61,
# Проботюк Анатолій
# Київ - 2018
# 1. Побудувати графік функції y=f(x) для діапазону зміни аргументу x_min<=x<=x_max. Значення y=f(x), x_min та x_max узяти з таблиці варіантів.
x_min := -2
x_max := 2
f(x) :=
    e^(-x) if x ≤ 0
    e^(-x) if x ≥ 0
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# 2. Визначити другу похідну функції | d^2*y/dx^2 | та побудувати її графік для діапазону зміни аргументу
# x_min<=x<=x_max.
d2f(x) :=
    d^2/dx^2(e^(-x)) if x ≤ 0
    d^2/dx^2(e^(-x)) if x ≥ 0
d^2/dx^2(e^(-x)) → e^(-x)
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# 3. Побудувати графік модулю другої похідної функції | |d^2*y/dx^2| | для діапазону зміни аргументу
# x_min<=x<=x_max.
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xa := 1
x0 := 1
# 4. Проаналізувати графік нелініної залежності функції y=f(x), з'ясувавши характер опуклості та вгнутості функції по частинам, наявність точок перегинання та наявність точок розриву першого роду другої похідної функції.
Given
# 4.1 Точки перегину
d2f(xa) == 0
x0 := Find(xa)
x0 = 75.0001  # - нуль функції d^2*y/dx^2, але він не належить відрізку [x_min ; x_max]. Отже функція f(x) не має
# точок перегину.
# 4.2 Опуклість та вгнутість
# З графіка видно, що функція знаходиться вище осі абсцис, тому ми робимо висновок, що d^2*y/dx^2 приймає додатнє значення. Отже f(x) вгнута на відрізку [x_min ; x_max].
# 4.3 Точки розриву першого роду другої похідної функції
# З графіка видно, що функція не має точок розриву на відрізку [x_min ; x_max].
# 5. Обрати початкову точку(або початкові точки) апроксимації для подальших розрахунків, зазначивши її (або їх) на графіках y == f(x) та |d^2*y/dx^2| , визначивши абсцису цієї початкової точки
# x_0^1 | (або абсциси початкових точок x_0^1,x_0^2 тощо).
x_01 := -2
y_01 := f(x_01) = 7.38906
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# 6. По графіку |d^2*y/dx^2| обрати напрямок (або напрямки) розрахунків значень h[i] == x[i] - x[i - 1] (i=1,n) від початкової точки(або від початкових точок) та зазначити його(або їх) на цьому графіку у вигляді стрілок над графіком |d^2*y/dx^2|.
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# 7. Визначити методику розрахунку значень h_i (i=1,n) та обрати формулу для розрахунку значень: h[i] == sqrt(8*Δf_max/A[i]) або h[i] == sqrt(16*Δf_max/A[i]), де A[i] - максимальне по модулю значення другої похідної на і-й частині ломаної лінії, що розраховується.
# Для розрахунку h_i (i=1,n) обираємо формулу sqrt(16*Δf_max/A[1]), тому що функція не має точки перегину. . Ми обрали початкову точку X[1] = x_min, тому що у обраному напрямку функція спадає і ми знатимемо максимальне значення другої похідної на і-ій частині ломаної лінії, що розраховується для подальших розрахунків. Знаючи крок h[i], ми зможемо порахувати A[i + 1].
# 8. Підібрати таке значення похибки Δf_max, при якому в результаті розрахунків h_i (i=1,n) отримаємо n=8 або n=9, тобто отримаємо апроксимуючу ломану лінію з 8 або з 9 частин. Виконати розрахунок усіх значень h_i (i=1,n) та здійснити нумерацію вузлів (вершин ломаної лінії), починаючи з номера 0.
Δf_max := 0.0274245
X[0] := x_min = -2
A[1] := d2f(X[0]) = 7.38906
h[1] := sqrt(16*Δf_max/A[1]) = 0.243688
X[1] := X[0] + h[1] = -1.75631
A[2] := d2f(X[1]) = 5.79104
h[2] := sqrt(16*Δf_max/A[2]) = 0.275265
X[2] := X[1] + h[2] = -1.48105
A[3] := d2f(X[2]) = 4.39755
h[3] := sqrt(16*Δf_max/A[3]) = 0.315881
X[3] := X[2] + h[3] = -1.16517
A[4] := d2f(X[3]) = 3.20645
h[4] := sqrt(16*Δf_max/A[4]) = 0.369928
X[4] := X[3] + h[4] = -0.795237
A[5] := d2f(X[4]) = 2.21497
h[5] := sqrt(16*Δf_max/A[5]) = 0.445088
X[5] := X[4] + h[5] = -0.350149
A[6] := d2f(X[5]) = 1.41928
h[6] := sqrt(16*Δf_max/A[6]) = 0.556026
X[6] := X[5] + h[6] = 0.205877
A[7] := d2f(X[6]) = 0.813933
h[7] := sqrt(16*Δf_max/A[7]) = 0.734235
X[7] := X[6] + h[7] = 0.940112
A[8] := d2f(X[7]) = 0.390584
h[8] := sqrt(16*Δf_max/A[8]) = 1.05992
X[8] := X[7] + h[8] = 2.00003
A[9] := d2f(X[8]) = 0.135331
# 9. Здійснити розрахунок абсцис x_i(1, n), починаючи з x_0, початкових ординат y_i^p(0,n), вузлів апроксимації(вершин ломаної лінії), що належать функції y=f(x), та кінцевих ординат y_i^k(0,n), вузлів апроксимації з урахуванням корекції, яку здійснюють для отримання знакозмінної похибки апроксимації.
# Виходячи з 8-го завдання, шукаємо ординати вершин ломаної лінії:
j := 0 .. 8
Yp[j] := f(X[j])
Yk[j] := Yp[j] - Δf_max
X = [-2; -1.75631; -1.48105; -1.16517; -0.795237; -0.350149; 0.205877; 0.940112; 2.00003]
Yp = [7.38906; 5.79104; 4.39755; 3.20645; 2.21497; 1.41928; 0.813933; 0.390584; 0.135331]
Yk = [7.36163; 5.76361; 4.37012; 3.17903; 2.18754; 1.39185; 0.786509; 0.36316; 0.107907]
# 10. Побудувати графік апроксимуючої функції (ломаної лінії) y=φ(x), використовуючи отримані значення x_i(1, n) та y_i^k(0,n).
x_max := x_max + 0.01
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# 11. Здійснити розрахунок значень кутових коефіцієнтів (значень тангенсів кутів нахилу), k_i(i=1,n) лінійних частин ломаної лінії.
# Знаходимо кутові коефіцієнти шляхом ділення різниці ординат на різницю абсцис:
i := 0 .. 7
k[i] := (Yk[i] - Yk[i + 1])/(X[i] - X[i + 1])
k[i] = [-6.55763; -5.06237; -3.7707; -2.68021; -1.78771; -1.0887; -0.576585; -0.240823]
# 12. Виконати розкладання апроксимуючої функції (ломаної лінії) y=φ(x) на окремі доданки (лінійні та елементарні нелінійні {лінійні з обмеженням на нульовому рівні)}, починаючи з точки, яка має абсцису x_0^a. Значення x_0^a узяти з таблиці варіантів.
# 13. Над кожним елементарним нелінійним доданком зазначити його квадрант (І, ІІ, ІІІ, IV) та режим {на відкривання (на В) чи на закривання (на З)}
x_a[0] := X[4]
y_e0(x) := Yk[4]
y(x) := y_e0(x)
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b[4] := k[4]
y_e1(x) := b[4]*(x - X[4])
y(x) := y(x) + y_e1(x)
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b[5] := k[5] - k[4]
y_e2(x) :=
    b[5]*(x - X[5]) if b[5]*(x - X[5]) ≥ 0
    0 if b[5]*(x - X[5]) ≤ 0
y(x) := y(x) + y_e2(x)
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# І квадрант, на закривання
b[6] := k[6] - k[5]
y_e3(x) :=
    b[6]*(x - X[6]) if b[6]*(x - X[6]) ≥ 0
    0 if b[6]*(x - X[6]) ≤ 0
y(x) := y(x) + y_e3(x)
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# І квадрант, на відкривання
b[7] := k[7] - k[6]
# 5 )
y_e4(x) :=
    b[7]*(x - X[7]) if b[7]*(x - X[7]) ≥ 0
    0 if b[7]*(x - X[7]) ≤ 0
y(x) := y(x) + y_e4(x)
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# І квадрант, на відкривання
b[3] := k[3] - k[4]
y_e5(x) :=
    b[3]*(x - X[4]) if b[3]*(x - X[4]) ≥ 0
    0 if b[3]*(x - X[4]) ≤ 0
y(x) := y(x) + y_e5(x)
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# ІІ квадрант, на відкривання
b[2] := k[2] - k[3]
y_e6(x) :=
    b[2]*(x - X[3]) if b[2]*(x - X[3]) ≥ 0
    0 if b[2]*(x - X[3]) ≤ 0
y(x) := y(x) + y_e6(x)
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# ІІ квадрант, на відкривання
b[1] := k[1] - k[2]
y_e7(x) :=
    b[1]*(x - X[2]) if b[1]*(x - X[2]) ≥ 0
    0 if b[1]*(x - X[2]) ≤ 0
y(x) := y(x) + y_e7(x)
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# ІІ квадрант, на відкривання
b[0] := k[0] - k[1]
y_e8(x) :=
    b[0]*(x - X[1]) if b[0]*(x - X[1]) ≥ 0
    0 if b[0]*(x - X[1]) ≤ 0
φ(x) := y(x) + y_e8(x)
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# ІІ квадрант, на відкривання
# 14. Здійснити розрахунок наступних значень:
# - значення φ(x_0^a) для першого лінійного доданку
# - значення b_0=k_0 та x_0 для другого лінійного доданку
# - значення b_i=k_i-k_(i-1) та X_REFi для кожного елементарного нелінійного доданку
# 1) значення φ(x_0^a) для першого лінійного доданку:
φ(x_a[0]) = 2.18754
k1 := 0 .. 3
# 2) значення b_0=k_0 та х_0 для другого лінійного доданку:
k2 := 5 .. 7
b[4] = -1.78771
k[4] = -1.78771
X[4] = -0.795237
i := 0 .. 7
# 3) значення b_i=k_i-k_(i-1) та X_REFi для кожного елементарного нелінійного доданку:
j := 0 .. 8
Xref[j] := X[j]
b[k1] = [-1.49526; -1.29167; -1.09048; -0.892506]
b[k2] = [0.699007; 0.512115; 0.335762]
Xref[j] = [-2; -1.75631; -1.48105; -1.16517; -0.795237; -0.350149; 0.205877; 0.940112; 2.00003]
