# Міністерство освіти і науки України
# Національний технічний університет України
# "Київський політехнічний інститут ім. Ігоря Сікорського"
# Розрахункова графічна робота
# "Виконання кусочно-лінійної апроксимації"
# Варіант №81
Виконав
# студент групи ІО-63
# Пилип'юк Дмитро
# Київ - 2018
# 1. Побудувати графік функції y=f(x) для діапазону зміни аргументу x_min<=x<=x_max. Значення y=f(x), x_min та x_max узяти з таблиці варіантів.
x_min := -1
x_max := 1
f(x) :=
    e^(-x) + x - 2 if x ≤ 0
    -1 - sqrt(x) if x ≥ 0
f2(x) := -1 - sqrt(x)
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# 2. Визначити другу похідну функції | d^2*y/dx^2 | та побудувати її графік для діапазону зміни аргументу
# x_min<=x<=x_max.
d2f(x) :=
    d^2/dx^2(e^(-x) + x - 2) if x ≤ 0
    d^2/dx^2(-1 - sqrt(x)) if x ≥ 0
d^1/dx^1(-1 - sqrt(x)) → -1/(2*sqrt(x))
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# 3. Побудувати графік модулю другої похідної функції | |d^2*y/dx^2| | для діапазону зміни аргументу
# x_min<=x<=x_max.
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xa := 1
x0 := 1
# 4. Проаналізувати графік нелініної залежності функції y=f(x), з'ясувавши характер опуклості та вгнутості функції по частинам, наявність точок перегинання та наявність точок розриву першого роду другої похідної функції.
Given
# 4.1 Точки перегину
|d2f(xa)| == 0
x0 := Find(xa)
x0 = 1.9849e21
# - нуль функції d^2*y/dx^2, але він не належить відрізку [x_min ; x_max].
# Отже функція f(x) не має точок перегину.
# 4.2 Опуклість та вгнутість
# З графіка видно, що функція знаходиться нище осі абсцис, тому ми робимо висновок, що d^2*y/dx^2 приймає від'ємне значення. Отже f(x) опукла на відрізку [x_min ; x_max].
# 4.3 Точки розриву першого роду другої похідної функції
# З графіка видно, що функція не має точок розриву на відрізку [x_min ; x_max].
# 5. Обрати початкову точку(або початкові точки) апроксимації для подальших розрахунків, зазначивши її (або їх) на графіках y == f(x) та |d^2*y/dx^2| , визначивши абсцису цієї початкової точки
# x_0^1 | (або абсциси початкових точок x_0^1,x_0^2 тощо).
x_01 := 0
y_01 := f(x_01) = -1
y_11 := 0
x_02 := x_min
y_02 := f(x_02) = -0.281718
y_12 := |d2f(x_02)|
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# 6. По графіку |d^2*y/dx^2| обрати напрямок (або напрямки) розрахунків значень h[i] == x[i] - x[i - 1] (i=1,n) від початкової точки(або від початкових точок) та зазначити його(або їх) на цьому графіку у вигляді стрілок над графіком |d^2*y/dx^2|.
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# 7. Визначити методику розрахунку значень h_i (i=1,n) та обрати формулу для розрахунку значень: h[i] == sqrt(8*Δf_max/A[i]) або h[i] == sqrt(16*Δf_max/A[i]), де A[i] - максимальне по модулю значення другої похідної на і-й частині ломаної лінії, що розраховується.
# Для розрахунку h_i (i=1,n) обираємо формулу sqrt(16*Δf_max/A[1]), тому що функція не має точки перегину.
# 8. Підібрати таке значення похибки Δf_max, при якому в результаті розрахунків h_i (i=1,n) отримаємо n=8 або n=9, тобто отримаємо апроксимуючу ломану лінію з 8 або з 9 частин. Виконати розрахунок усіх значень h_i (i=1,n) та здійснити нумерацію вузлів (вершин ломаної лінії), починаючи з номера 0.
hm := 0.014014
xm := 0
g(x) := d/dx(f2(x)) - (f(xm + hm) - f(xm))/hm
xa := 1
xk := 1
g(x) → 8.4473199427 - 1/(2*sqrt(x))
Given
g(xa) == 0
F(x) := f(xm) + (x - xm)*(f(xm + hm) - f(xm))/hm
xk := Find(xa)
xk = 0.0035035
Δf_max := |f(xk) - F(xk)| = 0.0295952
X[3] := 0
X[4] := xk = 0.0035035
A[2] := |d2f(X[4])| = 1205.55
h[6] := sqrt(16*Δf_max/A[2]) = 0.0198188
X[5] := X[4] + h[6] = 0.0233223
A[3] := |d2f(X[5])| = 70.1913
h[7] := sqrt(16*Δf_max/A[3]) = 0.0821351
X[6] := X[5] + h[7] = 0.105457
A[4] := |d2f(X[6])| = 7.30003
h[8] := sqrt(16*Δf_max/A[4]) = 0.254688
X[7] := X[6] + h[8] = 0.360145
A[5] := |d2f(X[7])| = 1.15671
h[9] := sqrt(16*Δf_max/A[5]) = 0.639822
X[8] := X[7] + h[9] = 0.999967
A[5] := |d2f(X[8])| = 0.250012
X[0] := x_min
A[6] := |d2f(X[0])| = 2.71828
h[1] := sqrt(16*Δf_max/A[6]) = 0.417372
X[1] := X[0] + h[1] = -0.582628
A[1] := |d2f(X[1])| = 1.79074
h[2] := sqrt(16*Δf_max/A[1]) = 0.514227
X[2] := X[1] + h[2] = -0.0684015
A[2] := d2f(X[2]) = 1.0708
# 9. Здійснити розрахунок абсцис x_i(1, n), починаючи з x_0, початкових ординат y_i^p(0,n), вузлів апроксимації(вершин ломаної лінії), що належать функції y=f(x), та кінцевих ординат y_i^k(0,n), вузлів апроксимації з урахуванням корекції, яку здійснюють для отримання знакозмінної похибки апроксимації.
# Виходячи з 8-го завдання, шукаємо ординати вершин ломаної лінії:
i := 0 .. 8
Yp[i] := f(X[i])
Yk[i] := Yp[i] - Δf_max/2
Yk[8] := Yp[8]
X = [-1; -0.582628; -0.0684015; 0; 0.0035035; 0.0233223; 0.105457; 0.360145; 0.999967]
Yp = [-0.281718; -0.79189; -0.997606; -1; -1.05919; -1.15272; -1.32474; -1.60012; -1.99998]
Yk = [-0.296516; -0.806687; -1.0124; -1.0148; -1.07399; -1.16751; -1.33954; -1.61492; -1.99998]
# 10. Побудувати графік апроксимуючої функції (ломаної лінії) y=φ(x), використовуючи отримані значення x_i(1, n) та y_i^k(0,n).
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# 11. Здійснити розрахунок значень кутових коефіцієнтів (значень тангенсів кутів нахилу), k_i(i=1,n) лінійних частин ломаної лінії.
# Знаходимо кутові коефіцієнти шляхом ділення різниці ординат на різницю абсцис:
i := 1 .. 8
k[i] := (Yk[i - 1] - Yk[i])/(X[i - 1] - X[i])
k[i] = [-1.22234; -0.400051; -0.0349941; -16.8946; -4.71906; -2.09442; -1.08124; -0.601831]
# 12. Виконати розкладання апроксимуючої функції (ломаної лінії) y=φ(x) на окремі доданки (лінійні та елементарні нелінійні {лінійні з обмеженням на нульовому рівні)}, починаючи з точки, яка має абсцису x_0^a. Значення x_0^a узяти з таблиці варіантів.
# 13. Над кожним елементарним нелінійним доданком зазначити його квадрант (І, ІІ, ІІІ, IV) та режим {на відкривання (на В) чи на закривання (на З)}
x_a[0] := x_max
y_e0(x) := Yk[8]
y(x) := y_e0(x)
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b[8] := k[8]
y_e1(x) := b[8]*(x - X[8])
y(x) := y(x) + y_e1(x)
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b[7] := k[7] - k[8]
y_e2(x) :=
    b[7]*(x - X[7]) if b[7]*(x - X[7]) ≥ 0
    0 if b[7]*(x - X[7]) ≤ 0
y(x) := y(x) + y_e2(x)
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# ІІ квадрант, на закривання
b[6] := k[6] - k[7]
y_e3(x) :=
    b[6]*(x - X[6]) if b[6]*(x - X[6]) ≥ 0
    0 if b[6]*(x - X[6]) ≤ 0
y(x) := y(x) + y_e3(x)
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# ІІ квадрант, на закривання
b[5] := k[5] - k[6]
# 5 )
y_e4(x) :=
    b[5]*(x - X[5]) if b[5]*(x - X[5]) ≥ 0
    0 if b[5]*(x - X[5]) ≤ 0
y(x) := y(x) + y_e4(x)
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# ІІ квадрант, на закривання
b[4] := k[4] - k[5]
y_e5(x) :=
    b[4]*(x - X[4]) if b[4]*(x - X[4]) ≥ 0
    0 if b[4]*(x - X[4]) ≤ 0
y(x) := y(x) + y_e5(x)
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# ІІ квадрант, на закривання
b[3] := k[3] - k[4]
y_e6(x) :=
    b[3]*(x - X[3]) if b[3]*(x - X[3]) ≤ 0
    0 if b[3]*(x - X[3]) ≥ 0
y(x) := y(x) + y_e6(x)
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# ІІІ квадрант, на відкривання
b[2] := k[2] - k[3]
y_e7(x) :=
    b[2]*(x - X[2]) if b[2]*(x - X[2]) ≥ 0
    0 if b[2]*(x - X[2]) ≤ 0
y(x) := y(x) + y_e7(x)
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# ІІ квадрант, на відкривання
b[1] := k[1] - k[2]
y_e8(x) :=
    b[1]*(x - X[1]) if b[1]*(x - X[1]) ≥ 0
    0 if b[1]*(x - X[1]) ≤ 0
φ(x) := y(x) + y_e8(x)
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# ІІ квадрант, на відкривання
# 14. Здійснити розрахунок наступних значень:
# - значення φ(x_0^a) для першого лінійного доданку
# - значення b_0=k_0 та x_0 для другого лінійного доданку
# - значення b_i=k_i-k_(i-1) та X_REFi для кожного елементарного нелінійного доданку
# 1) значення φ(x_0^a) для першого лінійного доданку:
φ(x_a[0]) = -2
k1 := 1 .. 6
# 2) значення b_0=k_0 та х_0 для другого лінійного доданку:
k2 := 5 .. 7
b[8] = -0.601831
k[8] = -0.601831
X[8] = 0.999967
i := 1 .. 7
# 3) значення b_i=k_i-k_(i-1) та X_REFi для кожного елементарного нелінійного доданку:
j := 1 .. 7
Xref[j] := X[j]
b[k1] = [-0.822292; -0.365057; 16.8596; -12.1756; -2.62463; -1.01318]
Xref[j] = [-0.582628; -0.0684015; 0; 0.0035035; 0.0233223; 0.105457; 0.360145]
