# Міністерство освіти і науки України
# Національний технічний університет України
# «Київський Політехнічний Інститут ім. Ігоря Сікорського»
#
# Факультет інформатики та обчислювальної техніки
# Кафедра обчислювальної техніки
# Методи оптимізації та планування
# Розрахунково-графічна робота
# Тема: Виконання кусочно-лінійної апроксимації
#
# Варіант 95
# Виконав:
# студент групи ІО-64
# Номер у списку групи 5
# ІІ курсу ФІОТ
# Гаврилюк О.В.
#
# Перевірив:
# доц. Селіванов В.Л.
x_min := -1.0001
x_max := 1.0001
f(x) :=
    if x_min ≤ x ≤ 0
        e^(-x) - 1
    if 0 ≤ x ≤ x_max
        -x^2
# Київ 2018
# Варіант 95
#
# Номер у списку  - 5  y=f(x)
# Номер варіанту - 95  для x ≤ 0  -  (e^(-x) - 1)
# x_min= -1  для x ≥ 0  -  (-x^2)
# x_max=  1
# x_0^a = x_4
x_min := -1.0001
x_max := 1.0001
# Хід роботи
#
# Завдання №1
# Побудувати графік функції y=f(x) для діапазону зміни аргументу x_min ≤ x ≤ x_max
# [plot: f(x) vs x]
x_min == -1
# y
x_max == 1
f(x) :=
    if x_min ≤ x ≤ 0
        e^(-x) - 1
    if 0 ≤ x ≤ x_max
        -x^2
# x
f(x)
# Завдання №2
# Визначити другу похідну функції d^2/dx^2(y) та побудувати її графік для діапазону зміни аргументу x_min ≤ x ≤ x_max.
d2f(x) :=
    if x_min ≤ x ≤ x_max
        d^2/dx^2(f(x))
# [plot: d2f(x) vs x]
# для
x_min ≤ x ≤ 0  # y
# d^2/dx^2(y)=e^(-x)
d2f(x)
# для
0 ≤ x ≤ x_max
# d^2/dx^2(y)=-2
# x
d2f(x) :=
    if x_min ≤ x ≤ x_max
        d^2/dx^2(f(x))
# Завдання №3
# Побудувати графік модулю другої похідної функції |d^2/dx^2(y)| для діапазону зміни аргументу x_min ≤ x ≤ x_max.
x_min := -1.0001
x_max := 1.0001
d3f(x) :=
    if x_min ≤ x ≤ x_max
        |d^2/dx^2(f(x))|
# [plot: d3f(x) vs x]
# для
x_min ≤ x ≤ 0  # y
# d^2/dx^2(y)=e^(-x)
# для
0 ≤ x ≤ x_max
# d^2/dx^2(y)=-2
|d2f(x)|
# |d2f(x)|=if x_min ≤ x ≤ x_max |d^2/dx^2(f(x))|
# x
# Завдання №4
# Проаналізувати графік нелінійної залежності функції y=f(x), з'ясувавши характер опуклості та вгнутості функції по частинам, наявність точок перегинання та наявність точок розриву першого роду другої похідної функції.
x_min := -1
x_max := 1
d3f(x) :=
    if x_min ≤ x ≤ x_max
        |d^2/dx^2(f(x))|
# - Функця опукла на проміжку 0 ≤ x ≤ 1
# - Функця увігнута на проміжку -1 ≤ x ≤ 0
# - Точокою перегибу є т. x=0
# - Точокою розриву першого роду (стрибок) другої похідної функції є т. x=0.
# Завдання №5
# Обрати початкову точку (або початкові точки) апроксимації для подальших рохрахунків, зазначивши її (або їх) га графіках y=f(x) та |d^2/dx^2(y)|, визначити абсцису цієї початкової точки x_0^1(або абсциси початкових точок x_0^1, x_0^2 тощо).
# x_0^1:=x_min = -1
# x_0^2:=x_max = 1
# [plot: f(x) vs x]
# [plot: d3f(x) vs x]
# y | y
f(x_min) = 1.71828
|d3f(x_min)| = 2.71828
f(x_max) = -1
|d3f(x_max)| = 2
|d2f(x)|
# x
f(x)
# x
# Завдання №6
# По графіку |d^2/dx^2(y)| обрати напрямок (або напрямки) розрахунків значень h_i=x[i] - x[i + 1] (i=1,n) від початкової точки (або від початкових точок) та зазначити його (або їх) на цьому графіку у вигляді стрілок над графіком |d^2/dx^2(y)|.
# [plot: d3f(x) vs x]
# y
|d2f(x)|
# x
# Завдання №7
# Визначити методику розрахунків значень h_i(i=1,n) та  обрати формули  для  розрахунку  значень: h_i=sqrt(8*Δ_maxf/A_i) або h_i=sqrt(16*Δ_maxf/A_i) , де A_i - максимальне по модулю значення другої похідної на i-ій частині ломаної лінії, що розраховується.
f(x) :=
    if x ≤ 0
        e^(-x) - 1
    if 0 ≤ x
        -x^2
mdf(x) := |d^2/dx^2(f(x))|
# Завдання №8
# Підібрати таке значення похбки Δ_maxf, при якому в результаті розрахунків h_i(i=1,n) отримаємо n=8 або n=9, тобто отримаємо апроксимуючу лінію з 8 або 9 частин. Виконати розрахунок усіх значень h_i(i=1,n) та здійснити нумерацію вузлів (вершин ломаної лінії), починаючи з номера 0.
Δ_max1f := 0.0086697
x_0 := x_min = -1  # A_1:=|d2f(x_0)| = 2.71828
A_1 := mdf(x_0) = 2.71828
h_1 := sqrt(16*Δ_max1f/A_1)
x_1 := x_0 + h_1 = -0.774101  # A_2:=|d2f(x_1)| = 2.16864
A_2 := mdf(x_1) = 2.16864
h_2 := sqrt(16*Δ_max1f/A_2)
x_2 := x_1 + h_2 = -0.521189  # A_3:=|d2f(x_2)| = 1.68403
A_3 := mdf(x_2) = 1.68403
h_3 := sqrt(16*Δ_max1f/A_3)
x_3 := x_2 + h_3 = -0.234186  # A_4:=|d2f(x_3)| = 1.26388
A_4 := mdf(x_3) = 1.26388
# Оскільки у точці x_4 наявна точка перегибу
h_4 := sqrt(8*Δ_max1f/A_4)
x_4 := x_3 + h_4 = 7.18698e-5  # A_5:=|d2f(x_4)| = 2
A_5 := mdf(x_4) = 2
# Оскільки в точці x=0 на графіку модуля другої похідної наявна точка розриву (стрибок), тоді h_5 := 0
x_9 := x_max = 1  # A_9:=|d2f(x_9)| = 2
A_9 := mdf(x_9) = 2
h_9 := sqrt(16*Δ_max1f/A_9)
x_8 := x_9 - h_9 = 0.736642  # A_8:=|d2f(x_8)| = 2
A_8 := mdf(x_8) = 2
h_8 := sqrt(16*Δ_max1f/A_8)
x_7 := x_8 - h_8 = 0.473283  # A_7:=|d2f(x_7)| = 2
A_7 := mdf(x_7) = 2
h_7 := sqrt(16*Δ_max1f/A_7)
x_6 := x_7 - h_7 = 0.209925  # A_6:=|d2f(x_6)| = 2
A_6 := mdf(x_6) = 2
h_6 := sqrt(16*Δ_max1f/A_6)
x_5 := x_6 - h_6 = -0.0534332
x_min := -1.0001
x_max := 1.0001
f(x) :=
    if x_min ≤ x ≤ 0
        e^(-x) - 1
    if 0 ≤ x ≤ x_max
        -x^2
x_5 := 0.000000001
# Завдання №9
# Здійснити розрахунок абсцис x_i(1,n), починаючи з x_0, початкових ординат y_i^p(0,n), вузлів апроксимації (вершин ломаної лінії), що належать функції y=f(x), та кінцевих ординат y_i^k(0,n), вузлів апроксимації з урахуванням корекції, яку здійснюють для отримання знакозмінної похибки апроксимації.
y_p0 := f(x_0)
y_p1 := f(x_1)
y_p2 := f(x_2)
y_p3 := f(x_3)
y_p4 := f(x_4)
y_p5 := f(x_5)
y_p6 := f(x_6)
y_p7 := f(x_7)
y_p8 := f(x_8)
y_p9 := f(x_9)
x1[0] := x_0
x1[1] := x_1
x1[2] := x_2
x1[3] := x_3
x1[4] := x_4
x1[5] := x_5
x1[6] := x_6
x1[7] := x_7
x1[8] := x_8
x1[9] := x_9
# Обмежуємо пряму x_5x_6 для 0 ≤ x так що вона перетне вісь ординат в точці (0,8.4099*10^-5)
# x_5 := 0.000000001, y_p5 := 8.4099*10^-5
i := 0 .. 9
y_p[i] := f(x1[i])
y_k[i] :=
    if x1[i] ≤ 0
        y_p[i] - Δ_max1f
    also if 0 < x1[i]
        y_p[i] + Δ_max1f
# Значення ординат
x_0 = -1
x_5 = 1e-9
x_1 = -0.774101
x_6 = 0.209925
x_2 = -0.521189
x_7 = 0.473283
x_3 = -0.234186
x_8 = 0.736642
x_4 = 7.18698e-5
x_9 = 1
y_k = [1.70961; 1.15997; 0.67536; 0.25521; 0.00866969; 0.0086697; -0.0353988; -0.215327; -0.533971; -0.99133]
# Значення абсцис
# y_pi=f(x_i)
y_p0 = 1.71828
y_p5 = 8.4099e-5
y_p1 = 1.16864
y_p6 = -0.0440685
y_p2 = 0.68403
y_p7 = -0.223997
y_p3 = 0.26388
y_p8 = -0.542641
y_k0 := y_k[0]
y_k1 := y_k[1]
y_k2 := y_k[2]
y_k3 := y_k[3]
y_k4 := y_k[4]
y_p4 = -5.16527e-9
y_p9 = -1
# Значення абсцис після корекції
#
# y_ki=if x_i ≤ 0 y_pi - Δ_max1f also if 0 ≤ x_i y_pi + Δ_max1f
y_k5 := y_k[5]
y_k6 := y_k[6]
y_k7 := y_k[7]
y_k8 := y_k[8]
y_k9 := y_k[9]
y_k0 = 1.70961
y_k5 := y_p5 = 8.4099e-5
y_k1 = 1.15997
y_k6 = -0.0353988
y_k2 = 0.67536
y_k7 = -0.215327
y_k3 = 0.25521
y_k8 = -0.533971
y_k4 := y_p4 = -5.16527e-9
y_k9 = -0.99133
y_k = [1.70961; 1.15997; 0.67536; 0.25521; 0.00866969; 0.0086697; -0.0353988; -0.215327; -0.533971; -0.99133]
# Завдання №10
# Побудувати графік апроксимуючої функції (ломаної лінії) y=f(x), використовуючи отримані значення x_i(1,n) та y_i^k(0,n) .
# [plot: y_k, f(x) vs x1, x]
# y
y_k(x)
y_k6 := y_p6
i := 1 .. 9
k1[i] := (y_k[i - 1] - y_k[i])/(x1[i - 1] - x1[i])
k1 = [0; -2.43312; -1.91613; -1.46392; -1.05243; -7.18708e-5; -0.209925; -0.683208; -1.20993; -1.73664]
# x
k_1 := k1[1]
k_2 := k1[2]
k_3 := k1[3]
k_4 := k1[4]
k_5 := k1[5]
k_6 := k1[6]
k_7 := k1[7]
k_8 := k1[8]
k_9 := k1[9]
f(x)
# Завдання №11
# Здійснити розрахунок значень кутових коефіцієнтів (значень тангенсів кутів нахилу) k_i(i=1,n)  лінійних частин ломаної лінії.
# k = tg(α)
k_1 = -2.43312
k_2 = -1.91613
# k[i]=(y_k[i - 1] - y_k[i])/(x[i - 1] - x[i])
k_3 = -1.46392
k_4 = -1.05243
k_5 = -7.18708e-5
k_6 = -0.209925
k_7 = -0.683208
k_8 = -1.20993
k_9 = -1.73664
# Завдання №12
# Виконати розкладання апроксимуючої функції (ломаної лінії) y=f(x) на окремі доданки (лінійні та елементарні нелінійні (лінійні з обмеженням на нульовому рівні)), починаючи з точки, яка має абсцису x_0^a. Значення x_0^a взяти з таблиці варіантів.
# x_0^a=x_4
# Далі пункт 13 у якому зазначимо доданки (лінійні та елементарні нелінійні (лінійні з обмеженням на нульовому рівні))
# Завдання №13
# Над кожним елементарним нелінійним доданком зазначити його квадрант (I, II, III та IV) та режим (на відкривання чи на закривання)
f4(x) := f(x_4)
# a)
b_4 := k_4 - k_5 = -1.05236
f45(x) :=
    if x ≤ x_4
        b_4*(x - x_4)
    else
        0
# [plot: f4(x) vs x]
# [plot: f45(x) vs x]
x_4 = 7.18698e-5
f45(x) := b_4*(x - x_4)
# y | y
# ІІ квадрант
# На відкривання
# x | x
# б)
b_3 := k_3 - k_4 = -0.411489
# в)
b_2 := k_2 - k_3 = -0.452213
f34(x) :=
    if x ≤ x_3
        b_3*(x - x_3)
    else
        0
f23(x) :=
    if x ≤ x_2
        b_2*(x - x_2)
    else
        0
# [plot: f34(x) vs x]
x_3 = -0.234186
f34(x) := b_3*(x - x_3)
# [plot: f23(x) vs x]
x_2 = -0.521189
f23(x) := b_2*(x - x_2)
# y | y
# ІІ квадрант
# На відкривання
# ІІ квадрант
# На відкривання
# x | x
# г)
b_1 := k_1 - k_2 = -0.516991
# д)
b_5 := k_6 - k_5 = -0.209853
f12(x) :=
    if x ≤ x_1
        b_1*(x - x_1)
    else
        0
f56(x) :=
    if x ≥ x_5
        -b_5*(x_5 - x)
    else
        0
# [plot: f12(x) vs x]
x_1 = -0.774101
f12(x) := b_1*(x - x_1)
# [plot: f56(x) vs x]
x_5 = 1e-9
f56(x) := b_5*(x - x_5)
# y | y
# ІІ квадрант
# На відкривання
# ІV квадрант
# На закривання
# x | x
# е)
b_6 := k_7 - k_6 = -0.473283
# є)
b_7 := k_8 - k_7 = -0.526717
f67(x) :=
    if x ≥ x_6
        -b_6*(x_6 - x)
    else
        0
f78(x) :=
    if x ≥ x_7
        -b_7*(x_7 - x)
    else
        0
# [plot: f67(x) vs x]
x_6 = 0.209925
f67(x) := b_6*(x - x_6)
# [plot: f78(x) vs x]
x_7 = 0.473283
f78(x) := b_7*(x - x_7)
# y | y
# ІV квадрант
# На закривання
# ІV квадрант
# На закривання
# x | x
# ІІ квадрант  На Відкривання | ІІ квадрант  На Відкривання
# ж)
b_8 := k_9 - k_8 = -0.526717
# з)
b_9 := -k_9 = 1.73664
f89(x) :=
    if x ≥ x_8
        -b_8*(x_8 - x)
    else
        0
f9(x) :=
    if x ≥ x_9
        -b_9*(x_9 - x)
    else
        0
# [plot: f89(x) vs x]
x_8 = 0.736642
f89(x) := b_8*(x - x_8)
# [plot: f9(x) vs x]
x_9 = 1
f9(x) := b_9*(x - x_9)
# y | y
# ІІ квадрант
# На закривання
# ІV квадрант
# На закривання
# І квадрант
# На закривання
# ___________________________________________________________________________________
# x | x
f45(x) :=
    if x ≤ x_4
        b_4*(x - x_4)
    else
        0
f34(x) :=
    if x ≤ x_3
        b_3*(x - x_3)
    else
        0
f23(x) :=
    if x ≤ x_2
        b_2*(x - x_2)
    else
        0
# Завдання №14
# Здійснити розрахунок наступних значень:
# -значення φ(x_0^a) для першого лінійного доданку;
# φ(x_0^a)=f(x_4) = -5.16527e-9
# -значення b_0=k_0 та x_0 для другого лінійного доданку;
f12(x) :=
    if x ≤ x_1
        b_1*(x - x_1)
    else
        0
f56(x) :=
    if x ≥ x_5
        -b_5*(x_5 - x)
    else
        0
# -значення b_i=k[i + 1] - k[i] для кожного елементарного нелінійного доданку.
b_9 = 1.73664  # b
b_8 = -0.526717
b_7 = -0.526717
b_6 = -0.473283
b_5 = -0.209853
b_4 = -1.05236
b_3 = -0.411489
b_2 = -0.452213
b_1 = -0.516991
# -значення x_REFi для кожного елементарного нелінійного доданку.
f67(x) :=
    if x ≥ x_6
        -b_6*(x_6 - x)
    else
        0
f78(x) :=
    if x ≥ x_7
        -b_7*(x_7 - x)
    else
        0
x_REF[1] := x_1 - y_k1/k_1 = -0.297359
x_REF[2] := x_2 - y_k2/k_2 = -0.16873
x_REF[3] := x_3 - y_k3/k_3 = -0.0598528
x_REF[4] := x_4 - y_k4/k_4 = 7.18649e-5
x_REF[5] := x_5 - y_k5/k_5 = 1.17014
x_REF[6] := x_6 - y_k6/k_6 = 1e-9
x_REF[7] := x_7 - y_k7/k_7 = 0.158112
x_REF[8] := x_8 - y_k8/k_8 = 0.295316
x_REF[9] := x_9 - y_k9/k_9 = 0.429168
f89(x) :=
    if x ≥ x_8
        -b_8*(x_8 - x)
    else
        0
f9(x) :=
    if x ≥ x_9
        -b_9*(x_9 - x)
    else
        0
f1(x) := f12(x) + f23(x) + f34(x) + f45(x) + f4(x) + f56(x) + f67(x) + f78(x) + f89(x) + f9(x)
# [plot: f1(x), f(x) vs x]
# y
f(x)
# x
f1(x)
