# Міністерство освіти і науки України
# Національний технічний університет України
# "Київський політехнічний інститут ім. Ігоря Сікорського"
# Розрахунково-графічна робота
# "Виконання кусочно-лінійної апроксимації"
Виконала
# студентка ІІ курсу
# групи ІО-64
# ФІОТ
# Бровченко Анастасія
# Варіант №93
# Київ - 2018
# Побудуємо графік функції у(х) для діапазону значень x_min<=x<=x_maх
x_min := -0.5
y(x) :=
    -(x^2 + 2*x) if x < 0
    (-asin(x^2)) if x ≥ 0
x_max := 0.5
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# Визначимо другу похідну функції | d^2*y/dx^2 | та побудуємо її графік для діапазону зміни аргументу
# x_min<=x<=x_max.
y1''(x) := d^2/dx^2(-(x^2 + 2*x)) → -2
y2''(x) := d^2/dx^2(-asin(x^2)) → -4*x^4/(1 - x^4)^(3/2) - 2/sqrt(1 - x^4)
y''(x) :=
    y1''(x) if x < 0
    y2''(x) if x ≥ 0
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# Побудуємо графік модулю другої похідної функції | |d^2*y/dx^2| | для діапазону зміни аргументу
# x_min<=x<=x_max.
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# Аналіз функції у(х)
# Функція y(x) опукла на двох інтервалах: (-0.5; 0), (0; 0.5) так як її друга похідна на цих інтервалах приймає від'ємні значення. Не має точок перегину та точок розриву.
# Підбираємо значення Δf_max, щоб n = 9, обравши початкову точку апроксимації  x_0 := x_max, тому що у обраному напрямку функція спадає і ми знатимемо максимальне значення другої похідної на і-ій частині ломаної лінії, що розраховується для подальших розрахунків.
Δf_max := 0.001583
X[0] := x_max = 0.5
A[1] := |y''(X[0])| = 2.341
h[1] := sqrt(16*Δf_max/A[1]) = 0.104016
X[1] := X[0] - h[1] = 0.395984
A[2] := |y''(X[1])| = 2.12714
h[2] := sqrt(16*Δf_max/A[2]) = 0.109119
X[2] := X[1] - h[2] = 0.286865
A[3] := |y''(X[2])| = 2.03417
h[3] := sqrt(16*Δf_max/A[3]) = 0.111585
X[3] := X[2] - h[3] = 0.175279
A[4] := |y''(X[3])| = 2.00473
h[4] := sqrt(16*Δf_max/A[4]) = 0.112402
X[4] := X[3] - h[4] = 0.0628777
A[5] := |y''(X[4])| = 2.00008
h[5] := sqrt(16*Δf_max/A[5]) = 0.112532
X[5] := X[4] - h[5] = -0.0496545
A[6] := |y''(X[5])| = 2
h[6] := sqrt(16*Δf_max/A[6]) = 0.112534
X[6] := X[5] - h[6] = -0.162189
A[7] := |y''(X[6])| = 2
h[7] := sqrt(16*Δf_max/A[7]) = 0.112534
X[7] := X[6] - h[7] = -0.274723
A[8] := |y''(X[7])| = 2
h[8] := sqrt(16*Δf_max/A[8]) = 0.112534
X[8] := X[7] - h[8] = -0.387258
A[9] := |y''(X[8])| = 2
h[9] := sqrt(16*Δf_max/A[9]) = 0.112534
X[9] := X[8] - h[9] = -0.499792
A[9] := |y''(X[9])| = 2
# Виходячи з 8-го завдання, шукаємо ординати вершин ломаної лінії:
j := 0 .. 9
Yp[j] := y(X[j])
Yk[j] := Yp[j] + Δf_max
X[0] = 0.5
Yp[0] = -0.25268
Yk[0] = -0.251097
X[1] = 0.395984
Yp[1] = -0.157453
Yk[1] = -0.15587
X[2] = 0.286865
Yp[2] = -0.0823845
Yk[2] = -0.0808015
X[3] = 0.175279
Yp[3] = -0.0307277
Yk[3] = -0.0291447
X[4] = 0.0628777
Yp[4] = -0.00395362
Yk[4] = -0.00237062
X[5] = -0.0496545
Yp[5] = 0.0968434
Yk[5] = 0.0984264
X[6] = -0.162189
Yp[6] = 0.298073
Yk[6] = 0.299656
X[7] = -0.274723
Yp[7] = 0.473974
Yk[7] = 0.475557
X[8] = -0.387258
Yp[8] = 0.624547
Yk[8] = 0.62613
X[9] = -0.499792
Yp[9] = 0.749792
Yk[9] = 0.751375
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# Знаходимо кутові коефіцієнти шляхом ділення різниці ординат на різницю абсцис:
i := 0 .. 8
k == tg(α)
k[i] := (Yp[i] - Yp[i + 1])/(X[i] - X[i + 1])
k[0] = -0.915505
k[3] = -0.2382
k[6] = -1.56309
k[1] = -0.68795
k[4] = -0.895717
k[7] = -1.33802
k[2] = -0.462936
k[5] = -1.78816
k[8] = -1.11295
# Виконаємо розкладання апроксимуючої функції (ламаної) на окремі доданки, починаючи з точнки, яка має абсцису x_0^a = x_2
# Під кожним елементарним нелінійним доданком зазначимо його квадрант (І, ІІ, ІІІ, IV) та режим {на відкривання чи на закривання}
ye0(x) := Yk[2]
fi(x) := ye0(x)
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b[2] := k[2]
ye1(x) := b[2]*(x - X[2])
fi(x) := fi(x) + ye1(x)
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# ІІ квадрант, на закривання
b[3] := k[2] - k[3] = -0.224736
ye2(x) :=
    b[3]*(x - X[3]) if b[3]*(x - X[3]) ≥ 0
    0 if b[3]*(x - X[3]) ≤ 0
fi(x) := fi(x) + ye2(x)
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# ІІ квадрант, на закривання
b[4] := k[3] - k[4] = 0.657517
ye3(x) :=
    b[4]*(x - X[4]) if b[4]*(x - X[4]) ≤ 0
    0 if b[4]*(x - X[4]) ≥ 0
fi(x) := fi(x) + ye3(x)
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# ІІІ квадрант, на відкривання
b[5] := k[4] - k[5] = 0.89244
ye4(x) :=
    b[5]*(x - X[5]) if b[5]*(x - X[5]) ≤ 0
    0 if b[5]*(x - X[5]) ≥ 0
fi(x) := fi(x) + ye4(x)
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# ІІІ квадрант, на відкривання
b[6] := k[5] - k[6]
ye5(x) :=
    b[6]*(x - X[6]) if b[6]*(x - X[6]) ≥ 0
    0 if b[6]*(x - X[6]) ≤ 0
fi(x) := fi(x) + ye5(x)
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# ІІ квадрант, на відкривання
b[7] := k[6] - k[7]
ye6(x) :=
    b[7]*(x - X[7]) if b[7]*(x - X[7]) ≥ 0
    0 if b[7]*(x - X[7]) ≤ 0
fi(x) := fi(x) + ye6(x)
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# ІІ квадрант, на відкривання
b[8] := k[7] - k[8]
ye7(x) :=
    b[8]*(x - X[8]) if b[8]*(x - X[8]) ≥ 0
    0 if b[8]*(x - X[8]) ≤ 0
fi(x) := fi(x) + ye7(x)
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# ІІ квадрант, на відкривання
b[1] := k[1] - k[2]
ye8(x) :=
    b[1]*(x - X[2]) if b[1]*(x - X[2]) ≤ 0
    0 if b[1]*(x - X[2]) ≥ 0
fi(x) := fi(x) + ye8(x)
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# ІV квадрант, на закривання
b[0] := k[0] - k[1] = -0.227555
ye9(x) :=
    b[0]*(x - X[1]) if b[0]*(x - X[1]) ≤ 0
    0 if b[0]*(x - X[1]) ≥ 0
fi(x) := fi(x) + ye9(x)
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# ІV квадрант, на закривання
# Виконаємо розрахунок наступних значень:
# - значення φ(x_0^a) для першого лінійного доданку
fi(X[2]) = -0.0808015
# - значення b_0=k_0 та x_0 для другого лінійного доданку (y23)
b[2] = -0.462936
k[2] = -0.462936
X[2] = 0.286865
# - значення b_i=k_i-k_(i-1) та X_REFi для кожного елементарного нелінійного доданку
i := 1 .. 9
Xref[i] := X[i] - Yk[i]/k[i - 1]
b[0] = -0.227555
Xref[1] = 0.225728
b[1] = -0.225014
Xref[2] = 0.169412
b[2] = -0.462936
Xref[3] = 0.112323
b[3] = -0.224736
Xref[4] = 0.0529255
b[4] = 0.657517
Xref[5] = 0.0602311
b[5] = 0.89244
Xref[6] = 0.00538902
b[6] = -0.225069
Xref[7] = 0.0295186
b[7] = -0.225069
Xref[8] = 0.0806953
b[8] = -0.225069
Xref[9] = 0.175328
