# ЗАВДАННЯ:
# В електричному колі діє джерело періодичної несинусоїдної напруги, форма якої задана за варіантом, t_1 := 5*10^-3 s. Нелінійні ділянки є відтинками синусоїди.
#
# ПОТРІБНО:
# 1. Розкласти задану напругу в тригонометричний ряд (обмежитися постійною і трьома гармонічними складовими).
# 2. Побудувати в одній системі координат часові графіки складових і сумарну криву напруги, останню порівняти з заданою.
# 3. Розрахувати миттєві значення струмів усіх віток заданої схеми.
# 4. Побудувати амплітудні і фазові спектральні діаграми для струму і нап руги джерела.
# 5. Обчислити для змінної складової прикладеної напруги коефіцієнти форми, спотворення, амлітуди, гармонік.
# 6. Визначити покази увімкнених у схему приладів (амперметри – електромагнітної системи, вольтметри – магнітоелектричної).
# 7. Скласти баланс активних потужностей і обчислити потужності S, Q, T джерела і коефіцієнт потужності.
# 8. Показати, при якій ємності С можливий резонанс усього кола для однієї з вищих гармонік.
# 9. Вважаючи задану схему однією з фаз симетричного трифазного кола при з’єднанні генератора і навантаження зіркою з нульовим проводом, визначити діюче значення лінійної напруги і струму в нульовому проводі.
# При розрахунку вважати, що постійна складова напруги кожної фази і опір нульового проводу дорівнюють нулю.
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# Задана напруга | Задана схема кола
# Задані параметри:
Um := 50 V
R := 5 Ω
C := 200 μF
L := 4 mH
j := sqrt(-1)
t := 0, 0.00001 s .. t_1
w := 2*π/t_1 = 1256.64 1/s
# Розклад заданої ЕРС в ряд Фур'є
U(t) :=
    if 0 ≤ t ≤ t_1/12
        Um*sin(w*t + 2*π/3)
    else if t_1/12 < t < 5*t_1/12
        Um*sin(w*t)
    else if 5*t_1/12 ≤ t < 3*t_1/4
        Um*sin(w*t - 2*π/3)
    else if 3*t_1/4 ≤ t ≤ t_1
        Um*sin(w*t + 2*π/3)
U_0 := 1/t_1*integral(U(t), t = 0 .. t_1) = 41.3497 V
A_3 := 2/t_1*integral(U(t)*sin(3*w*t), t = 0 .. t_1) = -10.3374 V
A_6 := 2/t_1*integral(U(t)*sin(6*w*t), t = 0 .. t_1) = -3.31389e-15 V
A_9 := 2/t_1*integral(U(t)*sin(9*w*t), t = 0 .. t_1) = 1.03374 V
B_3 := 2/t_1*integral(U(t)*cos(3*w*t), t = 0 .. t_1) = -1.26671e-14 V
B_6 := 2/t_1*integral(U(t)*cos(6*w*t), t = 0 .. t_1) = 2.36284 V
E_p(t) := U_0
B_9 := 2/t_1*integral(U(t)*cos(9*w*t), t = 0 .. t_1) = 1.30868e-15 V
E_3(t) := A_3*sin(3*w*t) + B_3*cos(3*w*t)
E_6(t) := A_6*sin(6*w*t) + B_6*cos(6*w*t)
E_9(t) := A_9*sin(9*w*t) + B_9*cos(9*w*t)
E(t) := U_0 + A_3*sin(3*w*t) + B_3*cos(3*w*t) + A_6*sin(6*w*t) + B_6*cos(6*w*t) + A_9*sin(9*w*t) + B_9*cos(9*w*t)
# [plot: U(t), E_p(t), E_3(t), E_6(t), E_9(t), E(t) vs t]
XL_3 := 3*w*L = 15.0796 Ω
XC_3 := 1/(3*w*C) = 1.32629 Ω
XL_6 := 6*w*L = 30.1593 Ω
XC_6 := 1/(6*w*C) = 0.663146 Ω
XL_9 := 9*w*L = 45.2389 Ω
XC_9 := 1/(9*w*C) = 0.442097 Ω
Z1_3 := R - j*XC_3 = (5 - 1.32629i) Ω
Z2_3 := R = 5 Ω
Z3_3 := R + j*XL_3 = (5 + 15.0796i) Ω
Z1_6 := R - j*XC_6 = (5 - 0.663146i) Ω
Z2_6 := R = 5 Ω
Z3_6 := R + j*XL_6 = (5 + 30.1593i) Ω
Z1_9 := R - j*XC_9 = (5 - 0.442097i) Ω
Z2_9 := R = 5 Ω
Z3_9 := R + j*XL_9 = (5 + 45.2389i) Ω
# Струми гармонік у вітках
ϕ_3 := atan(A_3/B_3) = 90°
Um_3 := sqrt(A_3^2 + B_3^2)*e^(j*ϕ_3) = 10.3374i V
ϕ_6 := atan(A_6/B_6) = -8.03576e-14°
Um_6 := sqrt(A_6^2 + B_6^2)*e^(j*ϕ_6) = 2.36284 V
ϕ_9 := atan(A_9/B_9) = 90°
Um_9 := sqrt(A_9^2 + B_9^2)*e^(j*ϕ_9) = 1.03374i V
# Для постійної складової напруги: | Струми гармонік в першій вітці кола:
# -> конденсатор - розрив у колі постійного струму, через який струм не тече
I1_3 := Um_3/(Z1_3 + Z2_3*Z3_3/(Z2_3 + Z3_3)) = (-0.0211743 + 1.1188i) A
I1_0 := 0 A
I1_6 := Um_6/(Z1_6 + Z2_6*Z3_6/(Z2_6 + Z3_6)) = (0.242266 - 0.00207875i) A
I2_0 := 0 A
I3_0 := 0 A
I1_9 := Um_9/(Z1_9 + Z2_9*Z3_9/(Z2_9 + Z3_9)) = (0.000897114 + 0.104585i) A
# Струми гармонік в другій вітці кола: | Струми гармонік в третій вітці кола:
I2_3 := I1_3*Z3_3/(Z2_3 + Z3_3) = (-0.275598 + 0.943063i) A
I3_3 := I1_3*Z2_3/(Z2_3 + Z3_3) = (0.254423 + 0.175741i) A
I2_6 := I1_6*Z3_6/(Z2_6 + Z3_6) = (0.230578 + 0.0342102i) A
I3_6 := I1_6*Z2_6/(Z2_6 + Z3_6) = (0.0116878 - 0.036289i) A
I2_9 := I1_9*Z3_9/(Z2_9 + Z3_9) = (-0.0101444 + 0.102243i) A
I3_9 := I1_9*Z2_9/(Z2_9 + Z3_9) = (0.0110415 + 0.00234156i) A
# Миттєві значення струмів і напруг
ψ_3 := arg(I1_3) = 91.0842°
ψ_6 := arg(I1_6) = -0.491613°
ψ_9 := arg(I1_9) = 89.5085°
i_1(t) := I1_0 + |I1_3|*sin(3*(w*t + ψ_3)) + |I1_6|*sin(6*(w*t + ψ_6)) + |I1_9|*sin(9*(w*t + ψ_9))
i_2(t) := I2_0 + |I2_3|*sin(3*(w*t + ψ_3)) + |I2_6|*sin(6*(w*t + ψ_6)) + |I2_9|*sin(9*(w*t + ψ_9))
i_3(t) := I3_0 + |I3_3|*sin(3*(w*t + ψ_3)) + |I3_6|*sin(6*(w*t + ψ_6)) + |I3_9|*sin(9*(w*t + ψ_9))
u(t) := U_0 + |Um_3|*sin(3*(w*t + ϕ_3)) + |Um_6|*sin(6*(w*t + ϕ_6)) + |Um_9|*sin(9*(w*t + ϕ_9))
# [plot: i_1(t), i_2(t), i_3(t) vs t]
# Амплітудні і фазові спектральні діаграми
# для струму і напруги джерела.
Um_gr := [|Um_3|; |Um_6|; |Um_9|] = [10.3374; 2.36284; 1.03374] V
ϕ_gr := [ϕ_3; ϕ_6; ϕ_9] = [90; 0; 90]°
ω_gr := [3*w; 6*w; 9*w] = [3769.91; 7539.82; 11309.7] 1/s
Im_gr := [|I1_3|; |I1_6|; |I1_9|] = [1.119; 0.242274; 0.104588] A
ψ_gr := [ψ_3; ψ_6; ψ_9] = [91.0842; -0.491613; 89.5085]°
# [plot: Um_gr vs ω_gr]
# [plot: ϕ_gr (°) vs ω_gr]
# [plot: Im_gr vs ω_gr]
# [plot: ψ_gr (°) vs ω_gr]
# Діючі значення напруг і струмів
A1 := sqrt(I1_0^2 + |I1_3|^2 + |I1_6|^2 + |I1_9|^2) = 1.1497 A
A2 := sqrt(I2_0^2 + |I2_3|^2 + |I2_6|^2 + |I2_9|^2) = 1.015 A
V1 := sqrt(|I1_3*Z1_3|^2 + |I1_6*Z1_6|^2 + |I1_9*Z1_9|^2) = 5.93934 V
V2 := sqrt(|I2_3*Z2_3|^2 + |I2_6*Z2_6|^2 + |I2_9*Z2_9|^2) = 5.07498 V
# Розрахунок потужностей
U_3 := |Um_3/sqrt(2)| = 7.30966 V
U_6 := |Um_6/sqrt(2)| = 1.67078 V
U_9 := |Um_9/sqrt(2)| = 0.730966 V
U := sqrt(U_0^2 + U_3^2 + U_6^2 + U_9^2) = 42.0304 V
P := U_0*I1_0 + |U_3|*|I1_3|*cos(ψ_3 - ϕ_3) + |U_6|*|I1_6|*cos(ψ_6 - ϕ_6) + |U_9|*|I1_9|*cos(ψ_9 - ϕ_9) = 8.65929 W
Q := |U_3|*|I1_3|*sin(ψ_3 - ϕ_3) + |U_6|*|I1_6|*sin(ψ_6 - ϕ_6) + |U_9|*|I1_9|*sin(ψ_9 - ϕ_9) = 0.150648 W
S := U*A1 = 48.3222 W
T := sqrt(S^2 - P^2 - Q^2) = 47.5398 W
# Коефіцієнт потужності:
K_p := P/S = 0.179199
# Коефіцієнти для змінної складової напруги
U_сер_по_мод := (U_3 + U_6 + U_9)/1.11 = 8.74901 V
K_f := sqrt(U_3^2 + U_6^2 + U_9^2)/U_сер_по_мод = 0.861094
K_sp := U_3/sqrt(U_3^2 + U_6^2 + U_9^2) = 0.970259
K_a := |Um_3|/sqrt(U_3^2 + U_6^2 + U_9^2) = 1.37215
K_g := (U_6 + U_9)/U_3 = 0.328571
# Ємність, при якій відбудеться резонанс:
C_r := 1/(w^2*L) = 0.000158314 F
# Вважаючи задану схему однією з фаз симетричного трифазного кола при з’єднанні генератора і навантаження зіркою з нульовим проводом, визначимо діюче значення лінійної напруги і струму в нульовому проводі:
U0_діюча := sqrt(3)*sqrt(U_3^2 + U_6^2 + U_9^2) = 13.0488 V
I_ф := sqrt(|I1_3|^2 + |I1_6|^2 + |I1_9|^2) = 1.1497 A
a := e^(j*120°)
I0_діючий := I_ф + I_ф*a + I_ф*a^2 = (-1.11022e-16 + 3.33067e-16i) A
