# ЗАВДАННЯ:
# В електричному колі діє джерело періодичної несинусоїдної напруги, форма якої зображена на рис.4, t_1 := 5*10^-3 s. Нелінійні ділянки є відтинками синусоїди.
#
# ПОТРІБНО:
# 1. Розкласти задану напругу в тригонометричний ряд (обмежитися постійною і трьома гармонічними складовими).
# 2. Побудувати в одній системі координат часові графіки складових і сумарну криву напруги, останню порівняти з заданою.
# 3. Розрахувати миттєві значення струмів усіх віток заданої схеми.
# 4. Побудувати амплітудні і фазові спектральні діаграми для струму і напруги джерела.
# 5. Обчислити для змінної складової прикладеної напруги коефіцієнти форми, спотворення, амлітуди, гармонік.
# 6. Визначити покази увімкнених у схему приладів (амперметри – електромагнітної системи, вольтметри – магнітоелектричної).
# 7. Скласти баланс активних потужностей і обчислити потужності S, Q, T джерела і коефіцієнт потужності.
# 8. Показати, при якій ємності С можливий резонанс усього кола для однієї з вищих гармонік.
# 9. Вважаючи задану схему однією з фаз симетричного трифазного кола при з’єднанні генератора і навантаження зіркою з нульовим проводом, визначити діюче значення лінійної напруги і струму в нульовому проводі.
# При розрахунку вважати, що постійна складова напруги кожної фази і опір нульового проводу дорівнюють нулю.
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# Задана напруга | Задана схема кола
# Задані параметри:
Um := 90 V
R := 9 Ω
C := 120 μF
L := 4.5 mH
j := sqrt(-1)
t := 0, 0.00001 s .. t_1
w := 2*π/t_1 = 1256.64 1/s
# Розклад заданої ЕРС в ряд Фур'є
U(t) :=
    if 0 ≤ t < t_1/6
        0
    else if t_1/6 ≤ t ≤ t_1/2
        Um*sin(w*t)
    else if t_1/2 < t < 4*t_1/6
        0
    else if 4*t_1/6 ≤ t ≤ t_1
        -Um*sin(w*t)
U_0 := 1/t_1*integral(U(t), t = 0 .. t_1) = 42.9718 V
A_2 := 2/t_1*integral(U(t)*sin(2*w*t), t = 0 .. t_1) = -24.8098 V
A_4 := 2/t_1*integral(U(t)*sin(4*w*t), t = 0 .. t_1) = -4.96196 V
A_6 := 2/t_1*integral(U(t)*sin(6*w*t), t = 0 .. t_1) = 8.50622 V
B_2 := 2/t_1*integral(U(t)*cos(2*w*t), t = 0 .. t_1) = -42.9718 V
B_4 := 2/t_1*integral(U(t)*cos(4*w*t), t = 0 .. t_1) = 8.59437 V
B_6 := 2/t_1*integral(U(t)*cos(6*w*t), t = 0 .. t_1) = -2.45553 V
E_p(t) := U_0
E_2(t) := A_2*sin(2*w*t) + B_2*cos(2*w*t)
E_4(t) := A_4*sin(4*w*t) + B_4*cos(4*w*t)
E_8(t) := A_6*sin(6*w*t) + B_6*cos(6*w*t)
E(t) := U_0 + A_2*sin(2*w*t) + B_2*cos(2*w*t) + A_4*sin(4*w*t) + B_4*cos(4*w*t) + A_6*sin(6*w*t) + B_6*cos(6*w*t)
# [plot: U(t), E_p(t), E_2(t), E_4(t), E_8(t), E(t) vs t]
XL_2 := 2*w*L = 11.3097 Ω
XC_2 := 1/(2*w*C) = 3.31573 Ω
XL_4 := 4*w*L = 22.6195 Ω
XC_4 := 1/(4*w*C) = 1.65786 Ω
XL_6 := 6*w*L = 33.9292 Ω
XC_6 := 1/(6*w*C) = 1.10524 Ω
Z1_2 := j*XL_2 = 11.3097i Ω
Z2_2 := R = 9 Ω
Z3_2 := R - j*XC_2 = (9 - 3.31573i) Ω
Z1_4 := j*XL_4 = 22.6195i Ω
Z2_4 := R = 9 Ω
Z3_4 := R - j*XC_4 = (9 - 1.65786i) Ω
Z1_6 := j*XL_6 = 33.9292i Ω
Z2_6 := R = 9 Ω
Z3_6 := R - j*XC_6 = (9 - 1.10524i) Ω
# Струми гармонік у вітках
ϕ_2 := atan(A_2/B_2) = 30°
Um_2 := sqrt(A_2^2 + B_2^2)*e^(j*ϕ_2) = (42.9718 + 24.8098i) V
ϕ_4 := atan(A_4/B_4) = -30°
Um_4 := sqrt(A_4^2 + B_4^2)*e^(j*ϕ_4) = (8.59437 - 4.96196i) V
ϕ_6 := atan(A_6/B_6) = -73.8979°
Um_6 := sqrt(A_6^2 + B_6^2)*e^(j*ϕ_6) = (2.45553 - 8.50622i) V
# Для постійної складової напруги: | Струми гармонік в першій вітці кола:
I1_0 := U_0/R = 4.77465 A
I1_2 := Um_2/(Z1_2 + Z2_2*Z3_2/(Z2_2 + Z3_2)) = (3.48753 - 2.5469i) A
I2_0 := U_0/R = 4.77465 A
I1_4 := Um_4/(Z1_4 + Z2_4*Z3_4/(Z2_4 + Z3_4)) = (-0.138568 - 0.415299i) A
I3_0 := 0 A  # -> конденсатор - розрив у колі постійного струму, через який струм не тече
I1_6 := Um_6/(Z1_6 + Z2_6*Z3_6/(Z2_6 + Z3_6)) = (-0.238663 - 0.104997i) A
# Струми гармонік в другій вітці кола: | Струми гармонік в третій вітці кола:
I2_2 := I1_2*Z3_2/(Z2_2 + Z3_2) = (1.57412 - 1.62592i) A
I3_2 := I1_2*Z2_2/(Z2_2 + Z3_2) = (1.91342 - 0.920986i) A
I2_4 := I1_4*Z3_4/(Z2_4 + Z3_4) = (-0.0888314 - 0.203069i) A
I3_4 := I1_4*Z2_4/(Z2_4 + Z3_4) = (-0.049737 - 0.212231i) A
I2_6 := I1_6*Z3_6/(Z2_6 + Z3_6) = (-0.122991 - 0.0453958i) A
I3_6 := I1_6*Z2_6/(Z2_6 + Z3_6) = (-0.115672 - 0.0596009i) A
# Миттєві значення струмів і напруг
ψ_2 := arg(I1_2) = -36.1402°
ψ_4 := arg(I1_4) = -108.452°
ψ_6 := arg(I1_6) = -156.254°
i_1(t) := I1_0 + |I1_2|*sin(2*(w*t + ψ_2)) + |I1_4|*sin(4*(w*t + ψ_4)) + |I1_6|*sin(6*(w*t + ψ_6))
i_2(t) := I2_0 + |I2_2|*sin(2*(w*t + ψ_2)) + |I2_4|*sin(4*(w*t + ψ_4)) + |I2_6|*sin(6*(w*t + ψ_6))
i_3(t) := I3_0 + |I3_2|*sin(2*(w*t + ψ_2)) + |I3_4|*sin(4*(w*t + ψ_4)) + |I3_6|*sin(6*(w*t + ψ_6))
u(t) := U_0 + |Um_2|*sin(2*(w*t + ϕ_2)) + |Um_4|*sin(4*(w*t + ϕ_4)) + |Um_6|*sin(6*(w*t + ϕ_6))
# [plot: i_1(t), i_2(t), i_3(t) vs t]
# Амплітудні і фазові спектральні діаграми
# для струму і напруги джерела.
Um_gr := [0; |Um_2|; 0; |Um_4|; 0; |Um_6|] = [0; 49.6196; 0; 9.92392; 0; 8.85355] V
ϕ_gr := [0; ϕ_2; 0; ϕ_4; 0; ϕ_6] = [0; 30; 0; -30; 0; -73.8979]°
ω_gr := [0; 2*w; 0; 4*w; 0; 6*w] = [0; 2513.27; 0; 5026.55; 0; 7539.82] 1/s
Im_gr := [0; |I1_2|; 0; |I1_4|; 0; |I1_6|] = [0; 4.31852; 0; 0.437807; 0; 0.260738] A
ψ_gr := [0; ψ_2; 0; ψ_4; 0; ψ_6] = [0; -36.1402; 0; -108.452; 0; -156.254]°
# [plot: Um_gr vs ω_gr]
# [plot: ϕ_gr (°) vs ω_gr]
# [plot: Im_gr vs ω_gr]
# [plot: ψ_gr (°) vs ω_gr]
# Діючі значення напруг і струмів
A1 := sqrt(I1_0^2 + |I1_2|^2 + |I1_4|^2 + |I1_6|^2) = 6.45806 A
A2 := sqrt(I2_0^2 + |I2_2|^2 + |I2_4|^2 + |I2_6|^2) = 5.29009 A
V1 := sqrt((I1_0*R)^2 + |I1_2*Z1_2|^2 + |I1_4*Z1_4|^2 + |I1_6*Z1_6|^2) = 66.3957 V
V2 := sqrt((I2_0*R)^2 + |I2_2*Z2_2|^2 + |I2_4*Z2_4|^2 + |I2_6*Z2_6|^2) = 47.6108 V
# Розрахунок потужностей
U_2 := |Um_2/sqrt(2)| = 35.0864 V
U_4 := |Um_4/sqrt(2)| = 7.01727 V
U_6 := |Um_6/sqrt(2)| = 6.26041 V
U := sqrt(U_0^2 + U_2^2 + U_4^2 + U_6^2) = 56.2678 V
P := U_0*I1_0 + |U_2|*|I1_2|*cos(ψ_2 - ϕ_2) + |U_4|*|I1_4|*cos(ψ_4 - ϕ_4) + |U_6|*|I1_6|*cos(ψ_6 - ϕ_6) = 267.298 W
Q := |U_2|*|I1_2|*sin(ψ_2 - ϕ_2) + |U_4|*|I1_4|*sin(ψ_4 - ϕ_4) + |U_6|*|I1_6|*sin(ψ_6 - ϕ_6) = -143.2 W
S := U*A1 = 363.381 W
T := sqrt(S^2 - P^2 - Q^2) = 200.228 W
# Коефіцієнт потужності:
K_p := P/S = 0.735586
# Коефіцієнти для змінної складової напруги
U_сер_по_мод := (U_2 + U_4 + U_6)/1.11 = 43.5712 V
K_f := sqrt(U_2^2 + U_4^2 + U_6^2)/U_сер_по_мод = 0.833687
K_sp := U_2/sqrt(U_2^2 + U_4^2 + U_6^2) = 0.965908
K_a := |Um_2|/sqrt(U_2^2 + U_4^2 + U_6^2) = 1.366
K_g := (U_4 + U_6)/U_2 = 0.378428
# Ємність, при якій відбудеться резонанс:
C_r := 1/(w^2*L) = 0.000140724 F
# Вважаючи задану схему однією з фаз симетричного трифазного кола при з’єднанні генератора і навантаження зіркою з нульовим проводом, визначимо діюче значення лінійної напруги і струму в нульовому проводі:
I_ф := sqrt(|I1_2|^2 + |I1_4|^2 + |I1_6|^2) = 4.34848 A
a := e^(j*120°)
I0_д := I_ф + I_ф*a + I_ф*a^2 = (-4.44089e-16 + 1.77636e-15i) A
U0_д := sqrt(3)*sqrt(U_2^2 + U_4^2 + U_6^2) = 62.9163 V
