# ЗАВДАННЯ:
# В електричному колі діє джерело періодичної несинусоїдної напруги, форма якої зображена на рис.4, t_1 := 5*10^-3 s. Нелінійні ділянки є відтинками синусоїди.
#
# ПОТРІБНО:
# 1. Розкласти задану напругу в тригонометричний ряд (обмежитися постійною і трьома гармонічними складовими).
# 2. Побудувати в одній системі координат часові графіки складових і сумарну криву напруги, останню порівняти з заданою.
# 3. Розрахувати миттєві значення струмів усіх віток заданої схеми.
# 4. Побудувати амплітудні і фазові спектральні діаграми для струму і нап руги джерела.
# 5. Обчислити для змінної складової прикладеної напруги коефіцієнти форми, спотворення, амлітуди, гармонік.
# 6. Визначити покази увімкнених у схему приладів (амперметри – електромагнітної системи, вольтметри – магнітоелектричної).
# 7. Скласти баланс активних потужностей і обчислити потужності S, Q, T джерела і коефіцієнт потужності.
# 8. Показати, при якій ємності С можливий резонанс усього кола для однієї з вищих гармонік.
# 9. Вважаючи задану схему однією з фаз симетричного трифазного кола при з’єднанні генератора і навантаження зіркою з нульовим проводом, визначити діюче значення лінійної напруги і струму в нульовому проводі.
# При розрахунку вважати, що постійна складова напруги кожної фази і опір нульового проводу дорівнюють нулю.
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# Задана напруга | Задана схема кола
# Задані параметри:
Um := 100 V
R := 4.5 Ω
C := 220 μF
L := 3.5 mH
w := 2*π/t_1 = 1256.64 1/s
j := sqrt(-1)
t := 0, 0.00001 s .. t_1
# Розклад заданої ЕРС в ряд Фур'є
U(t) := Um*(1 - 2*t/t_1)
U0 := 1/t_1*integral(U(t), t = 0 .. t_1) = 3.91757e-16 V
A_1 := 2/t_1*integral(U(t)*sin(w*t), t = 0 .. t_1) = 63.662 V
B_1 := 2/t_1*integral(U(t)*cos(w*t), t = 0 .. t_1) = -7.54115e-16 V
A_2 := 2/t_1*integral(U(t)*sin(2*w*t), t = 0 .. t_1) = 31.831 V
B_2 := 2/t_1*integral(U(t)*cos(2*w*t), t = 0 .. t_1) = 3.41989e-15 V
A_3 := 2/t_1*integral(U(t)*sin(3*w*t), t = 0 .. t_1) = 21.2207 V
B_3 := 2/t_1*integral(U(t)*cos(3*w*t), t = 0 .. t_1) = 9.81505e-15 V
E_1(t) := A_1*sin(w*t) + B_1*cos(w*t)
E_2(t) := A_2*sin(2*w*t) + B_2*cos(2*w*t)
E_3(t) := A_3*sin(3*w*t) + B_3*cos(3*w*t)
E(t) := U0 + A_1*sin(w*t) + B_1*cos(w*t) + A_2*sin(2*w*t) + B_2*cos(2*w*t) + A_3*sin(3*w*t) + B_3*cos(3*w*t)
# [plot: U(t), E_1(t), E_2(t), E_3(t), E(t) vs t]
XL_1 := w*L = 4.39823 Ω
XC_1 := 1/(w*C) = 3.61716 Ω
XL_2 := 2*w*L = 8.79646 Ω
XL_3 := 3*w*L = 13.1947 Ω
XC_2 := 1/(2*w*C) = 1.80858 Ω
Z1_1 := j*XL_1 = 4.39823i Ω
XC_3 := 1/(3*w*C) = 1.20572 Ω
Z1_2 := j*XL_2 = 8.79646i Ω
Z1_3 := j*XL_3 = 13.1947i Ω
Z3_1 := R - j*XC_1 = (4.5 - 3.61716i) Ω
Z2_1 := R = 4.5 Ω
Z3_2 := R - j*XC_2 = (4.5 - 1.80858i) Ω
Z2_2 := R = 4.5 Ω
Z3_3 := R - j*XC_3 = (4.5 - 1.20572i) Ω
Z2_3 := R = 4.5 Ω
# Струми гармонік у вітках
ϕ_1 := 0°
Um_1 := sqrt(A_1^2 + B_1^2)*e^(j*ϕ_1) = 63.662 V
ϕ_2 := 0°
Um_2 := sqrt(A_2^2 + B_2^2)*e^(j*ϕ_2) = 31.831 V
ϕ_3 := 0°
Um_3 := sqrt(A_3^2 + B_3^2)*e^(j*ϕ_3) = 21.2207 V
# Струми гармонік в першій вітці кола:
I1_1 := Um_1/(Z1_1 + Z2_1*Z3_1/(Z2_1 + Z3_1)) = (8.29455 - 11.7148i) A
I1_2 := Um_2/(Z1_2 + Z2_2*Z3_2/(Z2_2 + Z3_2)) = (0.986943 - 3.53081i) A
I1_3 := Um_3/(Z1_3 + Z2_3*Z3_3/(Z2_3 + Z3_3)) = (0.283123 - 1.59494i) A
# Струми гармонік в другій вітці кола: | Струми гармонік в третій вітці кола:
I2_1 := I1_1*Z3_1/(Z2_1 + Z3_1) = (2.69728 - 8.10696i) A
I3_1 := I1_1*Z2_1/(Z2_1 + Z3_1) = (5.59727 - 3.6078i) A
I2_2 := I1_2*Z3_2/(Z2_2 + Z3_2) = (0.171632 - 1.92925i) A
I3_2 := I1_2*Z2_2/(Z2_2 + Z3_2) = (0.815312 - 1.60157i) A
I2_3 := I1_3*Z3_3/(Z2_3 + Z3_3) = (0.039105 - 0.830159i) A
I3_3 := I1_3*Z2_3/(Z2_3 + Z3_3) = (0.244018 - 0.764777i) A
# Миттєві значення струмів і напруг
ψ_1 := arg(I1_1) = -54.6999°
ψ_2 := arg(I1_2) = -74.3831°
ψ_3 := arg(I1_3) = -79.9341°
i_1(t) := |I1_1|*sin(w*t + ψ_1) + |I1_2|*sin(2*(w*t + ψ_2)) + |I1_3|*sin(3*(w*t + ψ_3))
i_2(t) := |I2_1|*sin(w*t + ψ_1) + |I2_2|*sin(2*(w*t + ψ_2)) + |I2_3|*sin(3*(w*t + ψ_3))
i_3(t) := |I3_1|*sin(w*t + ψ_1) + |I3_2|*sin(2*(w*t + ψ_2)) + |I3_3|*sin(3*(w*t + ψ_3))
u(t) := |Um_1|*sin(w*t + ϕ_1) + |Um_2|*sin(2*(w*t + ϕ_2)) + |Um_3|*sin(3*(w*t + ϕ_3))
# [plot: i_1(t), i_2(t), i_3(t) vs t]
# Амплітудні і фазові спектральні діаграми
# для струму і напруги джерела.
Um_gr := [|Um_1|; |Um_2|; |Um_3|] = [63.662; 31.831; 21.2207] V
ϕ_gr := [ϕ_1; ϕ_2; ϕ_3] = [0; 0; 0]°
ω_gr := [w; 2*w; 3*w] = [1256.64; 2513.27; 3769.91] 1/s
Im_gr := [|I1_1|; |I1_2|; |I1_3|] = [14.3539; 3.66615; 1.61987] A
ψ_gr := [ψ_1; ψ_2; ψ_3] = [-54.6999; -74.3831; -79.9341]°
# [plot: Um_gr vs ω_gr]
# [plot: ϕ_gr (°) vs ω_gr]
# [plot: Im_gr vs ω_gr]
# [plot: ψ_gr (°) vs ω_gr]
# Діючі значення напруг і струмів
A1 := sqrt(|I1_1|^2 + |I1_2|^2 + |I1_3|^2) = 14.903 A
A2 := sqrt(|I2_1|^2 + |I2_2|^2 + |I2_3|^2) = 8.80002 A
V1 := sqrt(|I1_1*Z1_1|^2 + |I1_2*Z1_2|^2 + |I1_3*Z1_3|^2) = 74.0438 V
V2 := sqrt(|I2_1*Z2_1|^2 + |I2_2*Z2_2|^2 + |I2_3*Z2_3|^2) = 39.6001 V
# Розрахунок потужностей
U_1 := |Um_1/sqrt(2)| = 45.0158 V
U_2 := |Um_2/sqrt(2)| = 22.5079 V
U_3 := |Um_3/sqrt(2)| = 15.0053 V
U := sqrt(U_1^2 + U_2^2 + U_3^2) = 52.5185 V
P := |U_1|*|I1_1|*cos(ψ_1) + |U_2|*|I1_2|*cos(ψ_2) + |U_3|*|I1_3|*cos(ψ_3) = 399.848 W
Q := |U_1|*|I1_1|*sin(ψ_1) + |U_2|*|I1_2|*sin(ψ_2) + |U_3|*|I1_3|*sin(ψ_3) = -630.753 W
S := U*A1 = 782.684 W
T := sqrt(S^2 - P^2 - Q^2) = 234.233 W
# Коефіцієнт потужності:
K_p := P/S = 0.510868
# Коефіцієнти для змінної складової напруги
U_сер_по_мод := (U_1 + U_2 + U_3)/1.11 = 74.3504 V
K_f := U/U_сер_по_мод = 0.706364
K_sp := U_1/U = 0.857143
K_a := |Um_1|/U = 1.21218
K_g := (U_2 + U_3)/U_1 = 0.833333
# Ємність, при якій відбудеться резонанс:
C_r := 1/(w^2*L) = 0.000180931 F
# Вважаючи задану схему однією з фаз симетричного трифазного кола при з’єднанні генератора і навантаження зіркою з нульовим проводом, визначимо діюче значення лінійної напруги і струму в нульовому проводі:
U0_діюча := sqrt(3)*U = 90.9646 V
I_ф := sqrt(|I1_1|^2 + |I1_2|^2 + |I1_3|^2) = 14.903 A
a := e^(j*120°)
I0_діючий := I_ф + I_ф*a + I_ф*a^2 = (-1.77636e-15 + 3.55271e-15i) A
