# ЗАВДАННЯ:
# В електричному колі діє джерело періодичної несинусоїдної напруги, форма якої зображена на рис.4, t_1 := 5*10^-3 s. Нелінійні ділянки є відтинками синусоїди.
#
# ПОТРІБНО:
# 1. Розкласти задану напругу в тригонометричний ряд (обмежитися постійною і трьома гармонічними складовими).
# 2. Побудувати в одній системі координат часові графіки складових і сумарну криву напруги, останню порівняти з заданою.
# 3. Розрахувати миттєві значення струмів усіх віток заданої схеми.
# 4. Побудувати амплітудні і фазові спектральні діаграми для струму і напруги джерела.
# 5. Обчислити для змінної складової прикладеної напруги коефіцієнти форми, спотворення, амлітуди, гармонік.
# 6. Визначити покази увімкнених у схему приладів (амперметри – електромагнітної системи, вольтметри – магнітоелектричної).
# 7. Скласти баланс активних потужностей і обчислити потужності S, Q, T джерела і коефіцієнт потужності.
# 8. Показати, при якій ємності С можливий резонанс усього кола для однієї з вищих гармонік.
# 9. Вважаючи задану схему однією з фаз симетричного трифазного кола при з’єднанні генератора і навантаження зіркою з нульовим проводом, визначити діюче значення лінійної напруги і струму в нульовому проводі.
# При розрахунку вважати, що постійна складова напруги кожної фази і опір нульового проводу дорівнюють нулю.
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# Графік напруги | Схема кола
# Параметри за варіантом:
Um := 100 V
R := 4.5 Ω
C := 220 μF
L := 3.5 mH
j := sqrt(-1)
t := 0, 0.00001 s .. t_1
w := 2*π/t_1 = 1256.64 1/s
# Розклад заданої ЕРС в ряд Фур'є
U(t) :=
    if 0 ≤ t < t_1/12
        0
    else if t_1/12 ≤ t ≤ t_1/3
        Um*sin(w*t)
    else if t_1/3 < t < 7*t_1/12
        0
    else if 7*t_1/12 ≤ t ≤ 5*t_1/6
        Um*sin(w*t)
    else if 5*t_1/6 < t ≤ t_1
        0
U0 := 1/t_1*integral(U(t), t = 0 .. t_1) = 1.94466e-14 V
A_1 := 2/t_1*integral(U(t)*sin(w*t), t = 0 .. t_1) = 77.5664 V
A_3 := 2/t_1*integral(U(t)*sin(3*w*t), t = 0 .. t_1) = -27.566 V
A_5 := 2/t_1*integral(U(t)*sin(5*w*t), t = 0 .. t_1) = 2.86498e-8 V
B_1 := 2/t_1*integral(U(t)*cos(w*t), t = 0 .. t_1) = 15.9155 V
B_3 := 2/t_1*integral(U(t)*cos(3*w*t), t = 0 .. t_1) = -15.9141 V
B_5 := 2/t_1*integral(U(t)*cos(5*w*t), t = 0 .. t_1) = -10.6103 V
E_1(t) := A_1*sin(w*t) + B_1*cos(w*t)
E_3(t) := A_3*sin(3*w*t) + B_3*cos(3*w*t)
E_5(t) := A_5*sin(5*w*t) + B_5*cos(5*w*t)
E(t) := U0 + A_1*sin(w*t) + B_1*cos(w*t) + A_3*sin(3*w*t) + B_3*cos(3*w*t) + A_5*sin(5*w*t) + B_5*cos(5*w*t)
# [plot: U(t), E_1(t), E_3(t), E_5(t), E(t) vs t]
XC_1 := 1/(w*C) = 3.61716 Ω
XL_1 := w*L = 4.39823 Ω
XC_3 := 1/(3*w*C) = 1.20572 Ω
XL_3 := 3*w*L = 13.1947 Ω
XC_5 := 1/(5*w*C) = 0.723432 Ω
XL_5 := 5*w*L = 21.9911 Ω
Z1_1 := R - j*XC_1 = (4.5 - 3.61716i) Ω
Z2_1 := R = 4.5 Ω
Z3_1 := R + j*XL_1 = (4.5 + 4.39823i) Ω
Z1_3 := R - j*XC_3 = (4.5 - 1.20572i) Ω
Z2_3 := R = 4.5 Ω
Z3_3 := R + j*XL_3 = (4.5 + 13.1947i) Ω
Z1_5 := R - j*XC_5 = (4.5 - 0.723432i) Ω
Z2_5 := R = 4.5 Ω
Z3_5 := R + j*XL_5 = (4.5 + 21.9911i) Ω
# Струми гармонік у вітках
ϕ_1 := atan(A_1/B_1) = 78.4047°
Um_1 := sqrt(A_1^2 + B_1^2)*e^(j*ϕ_1) = (15.9155 + 77.5664i) V
ϕ_3 := atan(A_3/B_3) = 60.0018°
Um_3 := sqrt(A_3^2 + B_3^2)*e^(j*ϕ_3) = (15.9141 + 27.566i) V
ϕ_5 := atan(A_5/B_5) = -1.54709e-7°
Um_5 := sqrt(A_5^2 + B_5^2)*e^(j*ϕ_5) = (10.6103 - 2.86498e-8i) V
# В першій вітці кола:
I1_1 := Um_1/(Z1_1 + Z2_1*Z3_1/(Z2_1 + Z3_1)) = (-1.64909 + 10.1709i) A
I1_3 := Um_3/(Z1_3 + Z2_3*Z3_3/(Z2_3 + Z3_3)) = (1.85645 + 3.36246i) A
I1_5 := Um_5/(Z1_5 + Z2_5*Z3_5/(Z2_5 + Z3_5)) = (1.22271 - 0.00920011i) A
# В другій вітці кола:
I2_1 := I1_1*Z3_1/(Z2_1 + Z3_1) = (-2.98962 + 5.74054i) A
I2_3 := I1_3*Z3_3/(Z2_3 + Z3_3) = (0.779085 + 3.26074i) A
I2_5 := I1_5*Z3_5/(Z2_5 + Z3_5) = (1.13662 + 0.205766i) A
# В третій вітці кола:
I3_1 := I1_1*Z2_1/(Z2_1 + Z3_1) = (1.34053 + 4.43034i) A
I3_3 := I1_3*Z2_3/(Z2_3 + Z3_3) = (1.07737 + 0.101728i) A
I3_5 := I1_5*Z2_5/(Z2_5 + Z3_5) = (0.0860936 - 0.214967i) A
# Миттєві значення струмів і напруг
ψ_1 := arg(I1_1) = 99.2097°
ψ_3 := arg(I1_3) = 61.0964°
ψ_5 := arg(I1_5) = -0.431105°
i_1(t) := |I1_1|*sin(w*t + ψ_1) + |I1_3|*sin(3*(w*t + ψ_3)) + |I1_5|*sin(5*(w*t + ψ_5))
i_2(t) := |I2_1|*sin(w*t + ψ_1) + |I2_3|*sin(3*(w*t + ψ_3)) + |I2_5|*sin(5*(w*t + ψ_5))
i_3(t) := |I3_1|*sin(w*t + ψ_1) + |I3_3|*sin(3*(w*t + ψ_3)) + |I3_5|*sin(5*(w*t + ψ_5))
u(t) := |Um_1|*sin(w*t + ϕ_1) + |Um_3|*sin(3*(w*t + ϕ_3)) + |Um_5|*sin(5*(w*t + ϕ_5))
# [plot: i_1(t), i_2(t), i_3(t) vs t]
# Амплітудні і фазові спектральні діаграми
# для струму і напруги джерела.
Um_gr := [|Um_1|; 0; |Um_3|; 0; |Um_5|] = [79.1824; 0; 31.8299; 0; 10.6103] V
ϕ_gr := [ϕ_1; 0; ϕ_3; 0; ϕ_5] = [78.4047; 0; 60.0018; 0; -1.54709e-7]°
ω_gr := [w; 0; 3*w; 0; 5*w] = [1256.64; 0; 3769.91; 0; 6283.19] 1/s
Im_gr := [|I1_1|; 0; |I1_3|; 0; |I1_5|] = [10.3037; 0; 3.84091; 0; 1.22275] A
ψ_gr := [ψ_1; 0; ψ_3; 0; ψ_5] = [99.2097; 0; 61.0964; 0; -0.431105]°
# [plot: Um_gr vs ω_gr]
# [plot: ϕ_gr (°) vs ω_gr]
# [plot: Im_gr vs ω_gr]
# [plot: ψ_gr (°) vs ω_gr]
# Діючі значення напруг і струмів
A1 := sqrt(|I1_1|^2 + |I1_3|^2 + |I1_5|^2) = 11.0641 A
A2 := sqrt(|I2_1|^2 + |I2_3|^2 + |I2_5|^2) = 7.38006 A
V1 := sqrt(|I1_1*Z1_1|^2 + |I1_3*Z1_3|^2 + |I1_5*Z1_5|^2) = 62.3713 V
V2 := sqrt(|I2_1*Z2_1|^2 + |I2_3*Z2_3|^2 + |I2_5*Z2_5|^2) = 33.2103 V
# Розрахунок потужностей
U_1 := |Um_1/sqrt(2)| = 55.9904 V
U_3 := |Um_3/sqrt(2)| = 22.5072 V
U_5 := |Um_5/sqrt(2)| = 7.50264 V
U := sqrt(U_1^2 + U_3^2 + U_5^2) = 60.8095 V
P := |U_1|*|I1_1|*cos(ψ_1 - ϕ_1) + |U_3|*|I1_3|*cos(ψ_3 - ϕ_3) + |U_5|*|I1_5|*cos(ψ_5 - ϕ_5) = 634.897 W
Q := |U_1|*|I1_1|*sin(ψ_1 - ϕ_1) + |U_3|*|I1_3|*sin(ψ_3 - ϕ_3) + |U_5|*|I1_5|*sin(ψ_5 - ϕ_5) = 206.494 W
S := U*A1 = 672.801 W
T := sqrt(S^2 - P^2 - Q^2) = 83.2308 W
# Коефіцієнт потужності:
K_p := P/S = 0.943662
# Коефіцієнти для змінної складової напруги
U_сер_по_мод := (U_1 + U_3 + U_5)/1.11 = 77.4777 V
K_f := U/U_сер_по_мод = 0.784864
K_sp := U_1/U = 0.920752
K_a := |Um_1|/U = 1.30214
K_g := (U_3 + U_5)/U_1 = 0.535981
# Ємність, при якій відбудеться резонанс:
C_r := 1/(w^2*L) = 0.000180931 F
# Вважаючи задану схему однією з фаз симетричного трифазного кола при з’єднанні генератора і навантаження зіркою з нульовим проводом, визначимо діюче значення лінійної напруги і струму в нульовому проводі:
U0_діюча := sqrt(3)*U = 105.325 V
I_ф := sqrt(|I1_1|^2 + |I1_3|^2 + |I1_5|^2) = 11.0641 A
a := e^(j*120°)
I0_діючий := I_ф + I_ф*a + I_ф*a^2 = (-8.88178e-16 + 3.55271e-15i) A
