Um := 10 V
T := 10^-3 s
w := 2*π/T = 6283.19 1/s
j := sqrt(-1)
R := 100 ohm
C1 := 0.5*10^-6 F
L := 0.005 H
C2 := 10^-6 F
k := 1, 3 .. 5 = [1; 3; 5]
U(t) := sum(8*Um*(-1)^((k - 1)/2)/(π^2*k^2)*sin(k*w*t), k)
k := 1
U1m_1 := 8*Um*(-1)^((k - 1)/2)/(π^2*k^2) = 8.10569 V
XL_1 := k*w*L = 31.4159 Ω
XC1_1 := 1/(k*w*C1) = 318.31 Ω
XC2_1 := 1/(k*w*C2) = 159.155 Ω
Z1_1 := R - j*XC1_1 = (100 - 318.31i) Ω
Z2_1 := j*XL_1 = 31.4159i Ω
Z3_1 := -j*XC2_1 = -159.155i Ω
I1m_1 := U1m_1/(Z1_1 + Z2_1*Z3_1/(Z2_1 + Z3_1)) = (0.00921787 + 0.0257333i) A
U2m_1 := Z2_1*Z3_1/(Z2_1 + Z3_1)*I1m_1 = (-1.00726 + 0.360809i) V
I2m_1 := U2m_1/Z2_1 = (0.0114849 + 0.0320621i) A
I3m_1 := U2m_1/Z3_1 = (-0.00226703 - 0.00632881i) A
k := 3
U1m_3 := 8*Um*(-1)^((k - 1)/2)/(π^2*k^2) = -0.900633 V
XL_3 := k*w*L = 94.2478 Ω
XC1_3 := 1/(k*w*C1) = 106.103 Ω
XC2_3 := 1/(k*w*C2) = 53.0516 Ω
Z1_3 := R - j*XC1_3 = (100 - 106.103i) Ω
Z2_3 := j*XL_3 = 94.2478i Ω
Z3_3 := -j*XC2_3 = -53.0516i Ω
I1m_3 := U1m_3/(Z1_3 + Z2_3*Z3_3/(Z2_3 + Z3_3)) = (-0.00145865 - 0.00331804i) A
U2m_3 := Z2_3*Z3_3/(Z2_3 + Z3_3)*I1m_3 = (-0.402713 + 0.177037i) V
I2m_3 := U2m_3/Z2_3 = (0.00187842 + 0.00427292i) A
I3m_3 := U2m_3/Z3_3 = (-0.00333707 - 0.00759096i) A
k := 5
U1m_5 := 8*Um*(-1)^((k - 1)/2)/(π^2*k^2) = 0.324228 V
XL_5 := k*w*L = 157.08 Ω
XC1_5 := 1/(k*w*C1) = 63.662 Ω
XC2_5 := 1/(k*w*C2) = 31.831 Ω
Z1_5 := R - j*XC1_5 = (100 - 63.662i) Ω
Z2_5 := j*XL_5 = 157.08i Ω
Z3_5 := -j*XC2_5 = -31.831i Ω
I1m_5 := U1m_5/(Z1_5 + Z2_5*Z3_5/(Z2_5 + Z3_5)) = (0.0015641 + 0.00162014i) A
U2m_5 := Z2_5*Z3_5/(Z2_5 + Z3_5)*I1m_5 = (0.0646768 - 0.0624398i) V
I2m_5 := U2m_5/Z2_5 = (-0.000397504 - 0.000411745i) A
I3m_5 := U2m_5/Z3_5 = (0.0019616 + 0.00203188i) A
# Діючі значення
I1_1 := |I1m_1/sqrt(2)| = 0.0193284 A
U2_1 := |U2m_1/sqrt(2)| = 0.756557 V
I1_3 := |I1m_3/sqrt(2)| = 0.00256291 A
U2_3 := |U2m_3/sqrt(2)| = 0.311062 V
I1_5 := |I1m_5/sqrt(2)| = 0.00159236 A
U2_5 := |U2m_5/sqrt(2)| = 0.0635681 V
I1 := sqrt(I1_1^2 + I1_3^2 + I1_5^2) = 0.0195625 A
U2 := sqrt(U2_1^2 + U2_3^2 + U2_5^2) = 0.820475 V
U2_сер_по_мод := (U2_1 + U2_3 + U2_5)/1.11 = 1.01909 V
K_f := U2/U2_сер_по_мод = 0.805107
K_sp := U2_1/U2 = 0.922096
K_a := |U2m_1|/U2 = 1.30404
K_g := (U2_3 + U2_5)/U2_1 = 0.495178
w := 2000*π
U_1(t) := 8.11*sin(w*t) - 0.901*sin(3*w*t) + 0.324*sin(5*w*t)
U_11(t) := 8.11*sin(w*t)
U_12(t) := -0.901*sin(3*w*t)
U_13(t) := 0.324*sin(5*w*t)
# [plot: U_11(x), U_12(x), U_13(x), U_1(x) vs x]
i_1(t) := 0.027*sin(w*t + 70.305°) - 0.004*sin(3*(w*t + 66.295°)) + 0.002*sin(3*(w*t + 46.026°))
U_2(t) := 1.069*sin(w*t + 160.305°) - 0.44*sin(3*(w*t - 23.705°)) + 0.09*sin(3*(w*t - 43.974°))
i1(t) := 0.027*sin(w*t + 70.3)
i3(t) := -0.00383*sin(3*(w*t + 66.3))
i5(t) := 0.00225*sin(5*(w*t + 48))
# [plot: i1(x), i3(x), i5(x), i_1(x) vs x]
u_21(t) := 1.07*sin(w*t + 160.3)
u_23(t) := -0.44*sin(3*(w*t - 23.7))
u_25(t) := 0.09*sin(5*(w*t - 44))
# [plot: u_21(x), u_23(x), u_25(x), U_2(x) vs x]
