U_m := 10  # Федосов  # Андрій
ІО - 64
T := 10^-3  # Задача  # №2
R := 100
j := sqrt(-1)
L := 0.005
w := 100*π
C_1 := 0.5*10^-6
C_2 := 1*10^-6
U_1(t) := sum(8*U_m*(-1)^((k - 1)/2)/(π^2*k^2)*sin(k*w*t), k = 1 .. 5)
U_1(t) := 8.11*sin(w*t) - 0.901*sin(3*w*t) + 0.324*sin(5*w*t)
U_11(t) := 8.11*sin(w*t)
U_12(t) := -0.901*sin(3*w*t)
U_13(t) := 0.324*sin(5*w*t)
# [plot: U_11(x), U_12(x), U_13(x) vs x]
w := 6280
X_L1 := w*L = 31.4
X_C11 := 1/(w*C_1) = 318.471
X_C21 := 1/(w*C_2) = 159.236
Z_121 := j*X_L1*(-j*X_C21)/(j*X_L1 - j*X_C21) = 39.1127i
I_1m1 := 8.11/(R - j*X_C11 + Z_121) = 0.00921159 + 0.0257334i
U_2m1 := I_1m1*Z_121 = -1.0065 + 0.36029i
I_2m1 := U_2m1/(j*X_L1) = 0.0114742 + 0.0320542i
I_3m1 := U_2m1/(-j*X_C21) = -0.00226262 - 0.00632083i
X_L3 := 3*w*L = 94.2
X_C13 := 1/(3*w*C_1) = 106.157
X_C23 := 1/(3*w*C_2) = 53.0786
Z_123 := j*X_L3*(-j*X_C23)/(j*X_L3 - j*X_C23) = -121.591i
I_1m3 := 0.901/(R - j*X_C13 + Z_123) = 0.0014563 + 0.00331669i
U_2m3 := I_1m3*Z_123 = 0.40328 - 0.177073i
I_2m3 := U_2m3/(j*X_L3) = -0.00187975 - 0.0042811i
I_3m3 := U_2m3/(-j*X_C23) = 0.00333605 + 0.00759779i
X_L5 := 5*w*L = 157
X_C15 := 1/(5*w*C_1) = 63.6943
X_C25 := 1/(5*w*C_2) = 31.8471
Z_125 := j*X_L5*(-j*X_C25)/(j*X_L5 - j*X_C25) = -39.9511i
I_1m5 := 0.324/(R - j*X_C15 + Z_125) = 0.00156202 + 0.00161896i
U_2m5 := I_1m5*Z_125 = 0.0646794 - 0.0624045i
I_2m5 := U_2m5/(j*X_L5) = -0.000397481 - 0.000411971i
I_3m5 := U_2m5/(-j*X_C25) = 0.0019595 + 0.00203093i
i_1(t) := 0.027*sin(w*t + 70.305°) - 0.004*sin(3*(w*t + 66.295°)) + 0.002*sin(3*(w*t + 46.026°))
U_2(t) := 1.069*sin(w*t + 160.305°) - 0.44*sin(3*(w*t - 23.705°)) + 0.09*sin(3*(w*t - 43.974°))
I_11 := |I_1m1|/sqrt(2) = 0.0193269
I_13 := |I_1m3|/sqrt(2) = 0.00256137
I_15 := |I_1m5|/sqrt(2) = 0.00159075
I_1 := sqrt(I_11^2 + I_13^2 + I_15^2) = 0.0195607
U_21 := |U_2m1|/sqrt(2) = 0.755929
U_23 := |U_2m3|/sqrt(2) = 0.31144
U_25 := |U_2m5|/sqrt(2) = 0.0635521
U_2 := sqrt(U_21^2 + U_23^2 + U_25^2) = 0.820038
U_2середнє := (U_21 + U_23 + U_25)/1.11 = 1.01885
K_ф := U_2/U_2середнє = 0.804868
K_а := 1.07/U_2 = 1.30482
K_сп := U_21/U_2 = 0.921822
K_г := sqrt(U_23^2 + U_25^2)/U_21 = 0.420487
i1(t) := 0.027*sin(w*t + 70.3)
i3(t) := -0.00383*sin(3*(w*t + 66.3))
i5(t) := 0.00225*sin(5*(w*t + 48))
# [plot: i1(x), i3(x), i5(x) vs x]
u_21(t) := 1.07*sin(w*t + 160.3)
u_23(t) := -0.44*sin(3*(w*t - 23.7))
u_25(t) := 0.09*sin(5*(w*t - 44))
# [plot: u_21(x), u_23(x), u_25(x) vs x]
