# Нелінійні електричні кола постійного струму
E1 := 40 V
R1 := 30 Ω
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E2 := 30 V
R2 := 35 Ω
J := 3 A
R3 := 40 Ω
R4 := 45 Ω
U := [0; 25; 40; 58; 80; 111; 150] V
I := [0; 1; 1.5; 2; 2.5; 3; 3.5] A
# Вилучимо Rн з схеми і розрахуємо напругу неробочого ходу двополюсника
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Unx == R2*I2 - R3*I3
Ik1 := J = 3 A
Ek2 := E1 = 40 V
Ek3 := E2 = 30 V
R11 := R1 = 30 Ω
R12 := -R1 = -30 Ω
R22 := R1 + R2 + R4 = 110 Ω
R13 := 0 Ω
R33 := R3 + R4 = 85 Ω
R23 := -R4 = -45 Ω
[Ik2; Ik3] := [R22, R23; R23, R33]^-1*[Ek2 - Ik1*R12; Ek3 - Ik1*R13] = [1.69283; 1.24915] A
I1 := -Ik1 + Ik2 = -1.30717 A
I2 := Ik2 = 1.69283 A
I3 := -Ik3 = -1.24915 A
I4 := Ik2 - Ik3 = 0.443686 A
Unx := R2*I2 - R3*I3 = 109.215 V
# Вилучимо зі схеми джерела струму і напруги і розрахуємо вхідний опір
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Rvx := (R2 + R3*R4/(R3 + R4))*R1/(R1 + R2 + R3*R4/(R3 + R4)) = 19.5563 Ω
# Струм короткого замикання:
Ikz := Unx/Rvx = 5.58464 A
Ue := [Unx; 0 V]
Ie := [0 A; Ikz]
# [plot: U, Ue vs I, Ie]
# Точка перетину характеристик - значення напруги та струму на нелінійному елементі: напруга 68В, струм 2.3А.
# Магнітні кола постійного струму
w2 := 150
Δ1 := 0.01 cm
a := 32 cm
B1 := 1.4 T
Δ3 := 0.025 cm
h := 24 cm
c := 6.5 cm
b1 := 3 cm
d := 2 cm
b2 := 1.5 cm
e := 7.5 cm
b3 := 2 cm
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B := [0.2; 0.5; 0.8; 0.9; 1; 1.1; 1.15; 1.2; 1.24; 1.3; 1.35; 1.4; 1.5; 1.54; 1.57; 1.6] T
H := [200; 300; 420; 500; 600; 700; 800; 900; 1000; 1150; 1200; 1600; 2000; 2500; 3000; 4100] A/m
# Основна крива намагнічування
# [plot: B vs H]
# Побудуємо еквівалентну схему
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# За заданим значенням В1 знаходимо з таблиці Н1 та Нр1
H1 := 1600 A/m
Hp1 := B1/μ_0 = 1114085 A/m
# Через отримані значення знаходимо магнітну напругу між вузлами та потік у 1 вітці
U1mab := H1*(h - Δ1) + Hp1*Δ1 = 495.248 A
Φ1 := B1*b1*d = 0.00084 Wb
# Знайдемо значення Н3 та В3
Hp3 := B/μ_0
U3mabf := H*(h - Δ3) + Hp3*Δ3
Φ3f := B*b3*d
Φbuf := [0; 0.7*10^-3] Wb
Ubuf := [U1mab; U1mab]
# [plot: Φbuf, Φ3f vs Ubuf, U3mabf]
Φ3 := 0.0005 Wb
# Через І правило Кірхгофа знайдемо величину магнітного потоку
Φ2 := Φ3 + Φ1 = 0.00134 Wb
# Знайдемо індукцію В2 та напруженість H2 у 2й вітці (Прим. У разі використання табличних даних величина B3 досягала режиму насичення (1.6 Тл) тому за величину H2 приймаємо 4100):
B2 := Φ2/(b2*d) = 4.46667 T
H2 := 4100 A/m
# Знаходимо намагнічуючу силу F2
F2 := U1mab + H2*h = 1479.25 A
# Сила струму в обмотці:
I2 := F2/w2 = 9.86166 A
