# Національний технічний університет України
# «Київський політехнічний інститут імені Ігоря Сікорського»
# Факультет інформатики та обчислювальної техніки
# Кафедра обчислювальної техніки
# Теорія електричних та магнітних кіл
#
# Розрахунково-графічна робота №5
# «Перехідні процеси у лінійних електричних колах із зосередженим ипараметрами»
#
# Варіант 180
# Виконала:
# студентка ІІ курсу ФІОТ
# групи ІО-64
# Кішка М. І.
# Київ
# 2018 р.
# Вхідні параметри:
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L := 200*10^-3
ψ := 120 °
C := 170*10^-6
ω := 250
R := 80
T := 0.85
E1 := 180
t1 := 0.4
E2 := 70
t2 := 1.3
# Класичний метод
# Розраховуємо УРДК (t<0): | Розраховуємо УРПК (t>0):
i1_дк := E1/(2*R) = 1.125
i1_пк := E1/(2*R) = 1.125
i2_дк := i1_дк = 1.125
i2_пк := i1_пк = 1.125
i3_пк := 0
i3_дк := 0
iL_пк := i2_пк = 1.125
iL_дк := i2_дк = 1.125
uL_пк := 0
uC_дк := 0
uC_пк := E1 + E2 - i1_пк*R = 160
uL_дк := 0
# Незалежні початкові умови:
i10 := i1_дк = 1.125
uC0 := uC_дк = 0
# Залежні початкові умови:
Given
i10 == i20 + i30
E1 == uL0 + i10*R + i20*R
E2 == -i20*R + uC0
[i20; i30; uL0] := Find(i20, i30, uL0) → [-0.875; 2; 160]
# Незалежні початкові умови:
di10 := uL0/L = 800
duC0 := i30/C = 11764.7
# Залежні початкові умови:
Given
di10 == di20 + di30
0 == duL0 + di10*R + di20*R
0 == di20*R + duC0
[di20; di30; duL0] := Find(di20, di30, duL0) float, 7 → [-147.059; 947.059; -52235.29]
# Обчислимо вільний режим після комутаації (t=0).
# Складаємо характеристичне рівняння схеми:
Z(p) == 1/(p*C)*R/(R + 1/(p*C)) + R + p*L == (1/(p*C)*R + (R + p*L)*(R + 1/(p*C)))/(R + 1/(p*C))
[p1; p2] := 1/(p*C)*R + (R + p*L)*(R + 1/(p*C)) solve, p; float, 7 → [-236.765 + 52.593j; -236.765 - 52.593j]
# Коефіцієнт затухання та кутова частота вільних коливань:
δ := |Re(p1)| = 236.765
ω_0 := |Im(p1)| = 52.5928
# Вільні складові повних струмів і напруг матимуть вигляд:
i1_вільна == A1*e^(-δ*t)*sin(ω_0*t + v1)
i2_вільна == A2*e^(-δ*t)*sin(ω_0*t + v2)
i3_вільна == A3*e^(-δ*t)*sin(ω_0*t + v3)
uC_вільна == A4*e^(-δ*t)*sin(ω_0*t + vC)
uL_вільна == A5*e^(-δ*t)*sin(ω_0*t + vL)
# Визначаємо сталі інтегрування:
i20 - i2_пк == A2*sin(v2)
i30 - i3_пк == A3*sin(v3)
i10 - i1_пк == A1*sin(v1)
di20 == -A2*δ*sin(v2) + A2*ω_0*cos(v2)
di30 == -A3*δ*sin(v3) + A3*ω_0*cos(v3)
di10 == -A1*δ*sin(v1) + A1*ω_0*cos(v1)
v3 := atan((i30 - i3_пк)*ω_0/(δ*(i30 - i3_пк) + di30)) = 0.0739088
v1 := atan((i10 - i1_пк)*ω_0/(δ*(i10 - i1_пк) + di10)) = 0
v2 := atan((i20 - i2_пк)*ω_0/(δ*(i20 - i2_пк) + di20)) = 0.167898
A3 := (i30 - i3_пк)/sin(v3) = 27.085
A1 := di10/(-δ*sin(v1) + ω_0*cos(v1)) = 15.2112
A2 := di20/(-δ*sin(v2) + ω_0*cos(v2)) = -11.9682
uC0 - uC_пк == A4*sin(vC)
uL0 - uL_пк == A5*sin(vL)
duC0 == -A4*δ*sin(vC) + A4*ω_0*cos(vC)
duL0 == A5*δ*sin(vL) + A*ω_0*cos(vL)
vC := atan((uC0 - uC_пк)*ω_0/(δ*(uC0 - uC_пк) + duC0)) = 0.311688
vL := atan((uL0 - uL_пк)*ω_0/(δ*(uL0 - uL_пк) + duL0)) = -0.530271
A4 := (uC0 - uC_пк)/sin(vC) = -521.74
A5 := (uL0 - uL_пк)/sin(vL) = -316.351
# Отже вільні складові матимуть вигляд: | Повні формули:
i1_вільна(t) := A1*e^(-δ*t)*sin(ω_0*t + v1)
i1_вільна(0 s) = 0
i1(t) := i1_пк + i1_вільна(t)
i1(0 s) = 1.125
i2_вільна(t) := A2*e^(-δ*t)*sin(ω_0*t + v2)
i2_вільна(0 s) = -2
i2(t) := i2_пк + i2_вільна(t)
i2(0 s) = -0.875
i3_вільна(t) := A3*e^(-δ*t)*sin(ω_0*t + v3)
i3_вільна(0 s) = 2
i3(t) := i3_пк + i3_вільна(t)
i3(0 s) = 2
uC_вільна(t) := A4*e^(-δ*t)*sin(ω_0*t + vC)
uC_вільна(0 s) = -160
uC(t) := uC_пк + uC_вільна(t)
uC(0 s) = 0
uL_вільна(t) := A5*e^(-δ*t)*sin(ω_0*t + vL)
uL_вільна(0 s) = 160
uL(t) := uL_пк + uL_вільна(t)
uL(0 s) = 160
t := 0, 0.0002 .. 0.1
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# Операторний метод
# Розраховуємо УРДК (t<0):
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i1_дк := E1/(2*R) = 1.125
i2_дк := i1_дк = 1.125
i3_дк := 0
iL_дк := i2_дк = 1.125
uC_дк := 0
uL_дк := 0
# Початкові умови:
uC0 := 0
iL0 := iL_дк = 1.125
# Знаходимо струми в колі методом контурних струмів:
Z11(p) := 2*R + p*L
Z12(p) := R
Z22(p) := R + 1/(p*C)
Z21(p) := R
Ek1(p) := E1/p + L*iL0
Ek2(p) := E2/p - uC0/p
Ik1(p)*Z11(p) - Ik2(p)*Z12(p) == Ek1(p)
-Ik1(p)*Z21(p) + Ik2(p)*Z22(p) == Ek2(p)
Δ(p) := det([Z11(p), -Z12(p); -Z21(p), Z22(p)]) → (272*p^2 + 128.8*10^3*p + 16*10^6)/(17*p)
Δ1(p) := det([Ek1(p), -Z12(p); Ek2(p), Z22(p)]) → 58.824*10^-3*(306*p^2 + 362.5*10^3*p + 18*10^6)/p^2
Δ2(p) := det([Z11(p), Ek1(p); -Z21(p), Ek2(p)]) → (32*p + 25.6*10^3)/p
Ik1(p) := Δ1(p)/Δ(p) → 17*(21.324*10^3*p + 18*p^2 + 1.059*10^6)/(p*(272*p^2 + 128.8*10^3*p + 16*10^6))
Ik2(p) := Δ2(p)/Δ(p) → 17*(32*p + 25.6*10^3)/(272*p^2 + 128.8*10^3*p + 16*10^6)
I1(p) := Ik1(p) → (362.5*10^3*p + 306*p^2 + 18*10^6)/(p*(272*p^2 + 128.8*10^3*p + 16*10^6))
I2(p) := Ik1(p) - Ik2(p) simplify → -1*(2.38*10^21*p^2 + 727*10^21*p - 180*10^24)/(p*(2.72*10^21*p^2 + 1.288*10^24*p + 160*10^24))
I3(p) := Ik2(p) → (544*p + 435.2*10^3)/(272*p^2 + 128.8*10^3*p + 16*10^6)
uC(p) := uC0/p + I3(p)/(p*C) simplify → 160/p - (160*p + 64*10^3)/(p^2 + 473.529*p + 58.824*10^3)
uL(p) := L*p*I1(p) - L*i1_дк simplify → (160*p + 0)/(p^2 + 473.529*p + 58.824*10^3) - 0
# Перейдемо від зображення до функції часу:
I1(t) := I1(p) invlaplace, p; factor → (34.1*10^30 + (-230.537j*10^30)*e^((-236.765 + 52.593j)*t) + (230.537j*10^30)*e^((-236.765 - 52.593j)*t))/(30.311*10^30)
I2(t) := I2(p) invlaplace, p; factor → -(511.6*10^18*e^(-4.025*10^3*t/17)*cos(25*sqrt(1.279*10^3)*t/17) + 44.4*10^18*sqrt(1.279*10^3)*e^(-4.025*10^3*t/17)*sin(25*sqrt(1.279*10^3)*t/17) - 287.775*10^18)/(255.8*10^18)
I3(t) := I3(p) invlaplace, p; factor → 2*e^(-4.025*10^3*t/17)*(1.279*10^3*cos(25*sqrt(1.279*10^3)*t/17) + 383*sqrt(1.279*10^3)*sin(25*sqrt(1.279*10^3)*t/17))/(1.279*10^3)
uLt(t) := uL(p) invlaplace, p; simplify → 160*cos(52.593*t)*e^(-236.765*t) - 0*Δ(t) - 720.295*sin(52.593*t)*e^(-236.765*t)
uCt(t) := uC(p) invlaplace, p; simplify → 160 - 496.601*sin(52.593*t)*e^(-236.765*t) - 160*cos(52.593*t)*e^(-236.765*t)
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# Визначимо чому повинен дорівнювати активний опір вітки з джерелом Е1, щоб аперіодичний процес переходив у коливальний
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Z_ab(p) == 1/(p*C)*R/(R + 1/(p*C)) + R' + p*L
Z_ab(p) == (1/(p*C)*R + (R' + p*L)*(R + 1/(p*C)))/(R + 1/(p*C))
1/(p*C)*R + (R' + p*L)*(R + 1/(p*C)) == 0
(R*L)*p^2 + (R*R' + L/C)*p + (R/C + R'/C) == 0
D == (R*R' + L/C)^2 - 4*(R*L)*(R/C + R'/C) == 0
((R*R' + L/C)^2 - 4*(R*L)*(R/C + R'/C)) solve, R'; float → [83.305; -53.894]
