# Національний технічний університет України
# «Київський політехнічний інститут імені Ігоря Сікорського»
# Факультет інформатики та обчислювальної техніки
# Кафедра обчислювальної техніки
# Теорія електричних та магнітних кіл
#
# Розрахунково-графічна робота №5
# «Перехідні процеси у лінійних електричних колах із зосередженим ипараметрами»
#
# Варіант 726
# Виконала:
# студентка ІІ курсу ФІОТ
# групи ІО-64
# Невмержицька А. В.
# Київ
# 2018 р.
# Вхідні параметри:
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L := 180*10^-3
ψ := 135 °
C := 150*10^-6
ω := 150
R := 60
T := 1
E1 := 80
t1 := 0.7
E2 := 130
t2 := 1.6
# Класичний метод
# Розраховуємо УРДК (t<0): | Розраховуємо УРПК (t>0):
Given
i1_пк := (E1 - E2)/R = -0.833333
i1_дк == i3_дк + i2_дк
i3_пк := i1_пк = -0.833333
i3_дк*R == E1 - E2
i2_пк := 0 A
E2 == -i3_дк*R + i2_дк*R
iL_пк := i1_пк = -0.833333
uL_пк := 0
uC_пк := E1 = 80
[i1_дк; i2_дк; i3_дк] := Find(i1_дк, i2_дк, i3_дк) → [1/2; 4/3; -5/6]
uL_дк := 0
uC_дк := 0
# Незалежні початкові умови:
i10 := i1_дк = 0.5
uC0 := uC_дк = 0
# Залежні початкові умови:
Given
i20 == i10 - i30
E1 - E2 == uL0 + i30*R
E2 == i20*2*R - i30*R + uC0
[i20; i30; uL0] := Find(i20, i30, uL0) → [0.889; -0.389; -26.667]
# Незалежні початкові умови:
di10 := uL0/L = -148.148
duC0 := i20/C = 5925.93
# Залежні початкові умови:
Given
di20 == di10 - di30
0 == duL0 + di30*R
0 == di20*2*R - di30*R + duC0
[di20; di30; duL0] := Find(di20, di30, duL0) float, 7 → [-82.305; -65.844; 3950.617]
# Обчислимо вільний режим після комутаації (t=0).
# Складаємо характеристичне рівняння схеми:
Z(p) == R*(2*R + 1/(p*C))/(3*R + 1/(p*C)) + R == (R*(2*R + 1/(p*C)) + p*L*(3*R + 1/(p*C)))/(3*R + 1/(p*C))
[p1; p2] := R*(2*R + 1/(p*C)) + p*L*(3*R + 1/(p*C)) solve, p; float, 7 → [-62.86; -196.399]
# Вільні складові повних струмів і напруг матимуть вигляд:
i1_вільна == A1*e^(p1*t) + A2*e^(p2*t)
uC_вільна == D1*e^(p1*t) + D2*e^(p2*t)
i2_вільна == B1*e^(p1*t) + B2*e^(p2*t)
uL_вільна == F1*e^(p1*t) + F2*e^(p2*t)
i3_вільна == C1*e^(p1*t) + C2*e^(p2*t)
# Визначаємо сталі інтегрування:
Given
i10 - i1_пк == A1 + A2
di10 - 0 A == p1*A1 + p2*A2
[A1; A2] := Find(A1, A2) → [0.851566730412; 0.481766602921]
[A1; A2] = [0.851567; 0.481767]
Given
i20 - i2_пк == B1 + B2
di20 - 0 A == p1*B1 + p2*B2
[B1; B2] := Find(B1, B2) → [0.690977835961; 0.197911052927]
[B1; B2] = [0.690978; 0.197911]
Given
i30 - i3_пк == C1 + C2
di30 - 0 A == p1*C1 + p2*C2
[C1; C2] := Find(C1, C2) → [0.160588880583; 0.283855563861]
[C1; C2] = [0.160589; 0.283856]
Given
uC0 - uC_пк == D1 + D2
duC0 - 0*V/s == p1*D1 + p2*D2
[D1; D2] := Find(D1, D2) → [-73.2820110304; -6.71798896955]
[D1; D2] = [-73.282; -6.71799]
Given
uL0 - uL_пк == F1 + F2
duL0 - 0*V/s == p1*F1 + p2*F2
[F1; F2] := Find(F1, F2) → [-9.63533433269; -17.031332334]
[F1; F2] = [-9.63533; -17.0313]
# Отже вільні складові матимуть вигляд: | Повні формули:
i1_вільна(t) := A1*e^(p1*t) + A2*e^(p2*t)
i1_вільна(0 s) = 1.33333
i1(t) := i1_пк + i1_вільна(t)
i1(0 s) = 0.5
i2_вільна(t) := B1*e^(p1*t) + B2*e^(p2*t)
i2_вільна(0 s) = 0.888889
i2(t) := i2_пк + i2_вільна(t)
i2(0 s) = 0.888889
i3_вільна(t) := C1*e^(p1*t) + C2*e^(p2*t)
i3_вільна(0 s) = 0.444444
i3(t) := i3_пк + i3_вільна(t)
i3(0 s) = -0.388889
uC_вільна(t) := D1*e^(p1*t) + D2*e^(p2*t)
uC_вільна(0 s) = -80
uC(t) := uC_пк + uC_вільна(t)
uC(0 s) = 0
uL_вільна(t) := F1*e^(p1*t) + F2*e^(p2*t)
uL_вільна(0 s) = -26.6667
uL(t) := uL_пк + uL_вільна(t)
uL(0 s) = -26.6667
t := 0, 0.0002 .. 0.1
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# Операторний метод
# Розраховуємо УРДК (t<0):
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Given
i1_дк == i3_дк + i2_дк
i3_дк*R == E1 - E2
E2 == -i3_дк*R + i2_дк*R
[i1_дк; i2_дк; i3_дк] := Find(i1_дк, i2_дк, i3_дк) → [1/2; 4/3; -5/6]
uL_дк := 0
uC_дк := 0
iL_дк := i1_дк = 0.5
# Початкові умови:
iL0 := iL_дк = 0.5
uC0 := uC_дк = 0
# Знаходимо струми в колі методом контурних струмів:
Z11(p) := R + p*L
Z12(p) := R
Z22(p) := 3*R + 1/(p*C)
Z21(p) := R
Ek1(p) := E1/p - E2/p + L*iL0
Ek2(p) := E2/p - uC0/p
Ik1(p)*Z11(p) - Ik2(p)*Z12(p) == Ek1(p)
-Ik1(p)*Z21(p) + Ik2(p)*Z22(p) == Ek2(p)
Δ(p) := det([Z11(p), -Z12(p); -Z21(p), Z22(p)]) → (162*p^2 + 42*10^3*p + 2*10^6)/(5*p)
Δ1(p) := det([Ek1(p), -Z12(p); Ek2(p), Z22(p)]) → -66.667*10^-3*(9*10^3*p - 243*p^2 + 5*10^6)/p^2
Δ2(p) := det([Z11(p), Ek1(p); -Z21(p), Ek2(p)]) → 200*10^-3*(144*p + 24*10^3)/p
Ik1(p) := Δ1(p)/Δ(p) → -5*(600*p + (-16.2*p^2) + 333.333*10^3)/(p*(162*p^2 + 42*10^3*p + 2*10^6))
Ik2(p) := Δ2(p)/Δ(p) → 5*(28.8*p + 4.8*10^3)/(162*p^2 + 42*10^3*p + 2*10^6)
I1(p) := Ik1(p) → -(3*10^3*p + (-81*p^2) + 1.667*10^6)/(p*(162*p^2 + 42*10^3*p + 2*10^6))
I2(p) := Ik1(p) - Ik2(p) simplify → -1*(3.15*10^20*p^2 + 1.35*10^23*p + 8.333*10^24)/(p*(8.1*10^20*p^2 + 2.1*10^23*p + 1*10^25))
I3(p) := Ik2(p) → (144*p + 24*10^3)/(162*p^2 + 42*10^3*p + 2*10^6)
uC(p) := uC0/p + I2(p)/(p*C) simplify → -(2.593*10^3*p^2 + 1.111*10^6*p + 68.587*10^6)/(p^2*(p + 196.399)*(p + 62.86))
uL(p) := L*p*I2(p) - L*i2_дк simplify → -1.003*10^1/(p + 1.964*10^2) - 1.817*10^0/(p + 6.286*10^1) - 3.1*10^-1
# Перейдемо від зображення до функції часу:
I1(t) := I1(p) invlaplace, p → 481.767*10^-3*e^(-196.399*t) + 851.567*10^-3*e^(-62.86*t) - 833.333*10^-3
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I2(t) := I2(p) invlaplace, p; simplify → 200*10^18*e^(-3.5*10^3*t/27)*(e^(-500*sqrt(13)*t/27)/2 + e^(500*sqrt(13)*t/27)/2)/(450*10^18) + 200*10^18*sqrt(13)*e^(-3.5*10^3*t/27)*(e^(-500*sqrt(13)*t/27)/2 - e^(500*sqrt(13)*t/27)/2)/(5.85*10^21) - 41.667*10^18/(50*10^18)
I3(t) := I3(p) invlaplace, p → 8*cosh(500*sqrt(13)*t/27)*e^(-3.5*10^3*t/27)/9 + 16*sqrt(13)*sinh(500*sqrt(13)*t/27)*e^(-3.5*10^3*t/27)/117
uC(t) := uC(p) invlaplace, p → 26.667 - 9.635*e^(-196.399*t) - 17.031*e^(-62.86*t) - 5.556*10^3*t
uL(t) := uL(p) invlaplace, p → -10.035*e^(-196.399*t) - 310*10^-3*Δ(t) - 1.817*e^(-62.86*t)
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# Визначимо чому повинен дорівнювати активний опір вітки з джерелом Е1, щоб аперіодичний процес переходив у коливальний
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Z_ab(p) == R*(2*R + 1/(p*C))/(3*R + 1/(p*C)) + R' + p*L
Z_ab(p) == (R*(2*R + 1/(p*C)) + (R' + p*L)*(3*R + 1/(p*C)))/(3*R + 1/(p*C))
R*(2*R + 1/(p*C)) + (R' + p*L)*(3*R + 1/(p*C)) == 0
3*R*L*p^2 + (3*R*R' + L/C + 2*R^2)*p + (R/C + R'/C) == 0
D == (3*R*R' + L/C + 2*R^2)^2 - 4*(3*R*L)*(R/C + R'/C) == 0
((3*R*R' + L/C + 2*R^2)^2 - 4*(3*R*L)*(R/C + R'/C)) solve, R'; float → [-10.239; -56.427]
