# Національний технічний університет України
# «Київський політехнічний інститут імені Ігоря Сікорського»
# Факультет інформатики та обчислювальної техніки
# Кафедра обчислювальної техніки
# Теорія електричних та магнітних кіл
#
# Розрахунково-графічна робота №5
# «Перехідні процеси у лінійних електричних колах із зосередженим ипараметрами»
#
# Варіант 322
# Виконав:
# студент ІІ курсу ФІОТ
# групи ІО-64
# Потапенко Д. О.
# Київ
# 2018 р.
# Вхідні параметри:
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L := 100*10^-3
ψ := 135 °
C := 200*10^-6
ω := 150
R := 50
T := 1
E1 := 80
t1 := 0.7
E2 := 130
t2 := 1, 6
# Класичний метод
# Розраховуємо УРДК (t<0): | Розраховуємо УРПК (t>0):
i1_дк := E1/(2*R) = 0.8
i1_пк := E1/(2*R) = 0.8
i2_дк := i1_дк = 0.8
i2_пк := i1_пк = 0.8
i3_пк := 0
i3_дк := 0
iL_пк := i2_пк = 0.8
iL_дк := i2_дк = 0.8
uL_пк := 0
uC_дк := 0
uC_пк := E1 + E2 - i1_пк*R = 170
# Незалежні початкові умови:
i20 := i2_дк = 0.8
uC0 := uC_дк = 0
# Залежні початкові умови:
Given
i10 == i20 + i30
E1 + E2 == uC0 + i10*R
-E2 == i20*R - uC0 + uL0
[i10; i30; uL0] := Find(i10, i30, uL0) → [4.2; 3.4; -170]
# Незалежні початкові умови:
di20 := uL0/L = -1700
duC0 := i30/C = 17000
# Залежні початкові умови:
Given
di10 == di20 + di30
0 == duC0 + di10*R
0 == di20*R - duC0 + duL0
[di10; di30; duL0] := Find(di10, di30, duL0) float, 7 → [-340; 1360; 102000]
# Обчислимо вільний режим після комутаації (t=0).
# Складаємо характеристичне рівняння схеми:
Z(p) == 1/(p*C)*(R + p*L)/(R + p*L + 1/(p*C)) + R == (1/(p*C)*(R + p*L) + R*(R + p*L + 1/(p*C)))/(R + p*L + 1/(p*C))
[p1; p2] := 1/(p*C)*(R + p*L) + R*(R + p*L + 1/(p*C)) solve, p; float, 7 → [-300 + 100j; -300 - 100j]
# Коефіцієнт затухання та кутова частота вільних коливань:
δ := |Re(p1)| = 300
ω_0 := |Im(p1)| = 100
# Вільні складові повних струмів і напруг матимуть вигляд:
i1_вільна == A1*e^(-δ*t)*sin(ω_0*t + v1)
i2_вільна == A2*e^(-δ*t)*sin(ω_0*t + v2)
i3_вільна == A3*e^(-δ*t)*sin(ω_0*t + v3)
uC_вільна == A4*e^(-δ*t)*sin(ω_0*t + vC)
uL_вільна == A5*e^(-δ*t)*sin(ω_0*t + vL)
# Визначаємо сталі інтегрування:
i20 - i2_пк == A2*sin(v2)
i30 - i3_пк == A3*sin(v3)
i10 - i1_пк == A1*sin(v1)
di20 == -A2*δ*sin(v2) + A2*ω_0*cos(v2)
di30 == -A3*δ*sin(v3) + A3*ω_0*cos(v3)
di10 == -A1*δ*sin(v1) + A1*ω_0*cos(v1)
v3 := atan((i30 - i3_пк)*ω_0/(δ*(i30 - i3_пк) + di30)) = 0.141897
v1 := atan((i10 - i1_пк)*ω_0/(δ*(i10 - i1_пк) + di10)) = 0.463648
v2 := atan((i20 - i2_пк)*ω_0/(δ*(i20 - i2_пк) + di20)) = 0
A3 := (i30 - i3_пк)/sin(v3) = 24.0416
A1 := (i10 - i1_пк)/sin(v1) = 7.60263
A2 := di20/(-δ*sin(v2) + ω_0*cos(v2)) = -17
uC0 - uC_пк == A4*sin(vC)
uL0 - uL_пк == A5*sin(vL)
duC0 == -A4*δ*sin(vC) + A4*ω_0*cos(vC)
duL0 == A5*δ*sin(vL) + A*ω_0*cos(vL)
vC := atan((uC0 - uC_пк)*ω_0/(δ*(uC0 - uC_пк) + duC0)) = 0.463648
vL := atan((uL0 - uL_пк)*ω_0/(δ*(uL0 - uL_пк) + duL0)) = -0.321751
A4 := (uC0 - uC_пк)/sin(vC) = -380.132
A5 := (uL0 - uL_пк)/sin(vL) = 537.587
# Отже вільні складові матимуть вигляд: | Повні формули:
i1_вільна(t) := A1*e^(-δ*t)*sin(ω_0*t + v1)
i1_вільна(0 s) = 3.4
i1(t) := i1_пк + i1_вільна(t)
i1(0 s) = 4.2
i2_вільна(t) := A2*e^(-δ*t)*sin(ω_0*t + v2)
i2_вільна(0 s) = 0
i2(t) := i2_пк + i2_вільна(t)
i2(0 s) = 0.8
i3_вільна(t) := A3*e^(-δ*t)*sin(ω_0*t + v3)
i3_вільна(0 s) = 3.4
i3(t) := i3_пк + i3_вільна(t)
i3(0 s) = 3.4
uC_вільна(t) := A4*e^(-δ*t)*sin(ω_0*t + vC)
uC_вільна(0 s) = -170
uC(t) := uC_пк + uC_вільна(t)
uC(0 s) = 0
uL_вільна(t) := A5*e^(-δ*t)*sin(ω_0*t + vL)
uL_вільна(0 s) = -170
uL(t) := uL_пк + uL_вільна(t)
uL(0 s) = -170
t := 0, 0.0002 .. 0.1
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# Операторний метод
# Розраховуємо УРДК (t<0):
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i1_дк := E1/(2*R) = 0.8
i2_дк := i1_дк = 0.8
i3_дк := 0
iL_дк := i2_дк = 0.8
uC_дк := E1 + E2 - i1_дк*R = 170
# Початкові умови:
i20 := i2_дк = 0.8
uC0 := 0
iL0 := iL_дк = 0.8
# Знаходимо струми в колі методом контурних струмів:
Z11(p) := R + 1/(p*C)
Z12(p) := 1/(p*C)
Z22(p) := R + p*L + 1/(p*C)
Z21(p) := 1/(p*C)
Ek1(p) := E1/p + E2/p + uC0/p
Ek2(p) := -E2/p - uC0/p + L*iL0
Ik1(p)*Z11(p) - Ik2(p)*Z12(p) == Ek1(p)
-Ik1(p)*Z21(p) + Ik2(p)*Z22(p) == Ek2(p)
Δ(p) := det([Z11(p), -Z12(p); -Z21(p), Z22(p)]) → (5*p^2 + 3*10^3*p + 500*10^3)/p
Δ1(p) := det([Ek1(p), -Z12(p); Ek2(p), Z22(p)]) → (21*p^2 + 10.9*10^3*p + 400*10^3)/p^2
Δ2(p) := det([Z11(p), Ek1(p); -Z21(p), Ek2(p)]) → (4*p^2 - 6.1*10^3*p + 400*10^3)/p^2
Ik1(p) := Δ1(p)/Δ(p) → (10.9*10^3*p + 21*p^2 + 400*10^3)/(p*(5*p^2 + 3*10^3*p + 500*10^3))
Ik2(p) := Δ2(p)/Δ(p) → (-6.1*10^3*p + 4*p^2 + 400*10^3)/(p*(5*p^2 + 3*10^3*p + 500*10^3))
I1(p) := Ik1(p) → (10.9*10^3*p + 21*p^2 + 400*10^3)/(p*(5*p^2 + 3*10^3*p + 500*10^3))
I2(p) := Ik2(p) → (-6.1*10^3*p + 4*p^2 + 400*10^3)/(p*(5*p^2 + 3*10^3*p + 500*10^3))
I3(p) := Ik1(p) - Ik2(p) simplify → (3.4*p + 3.4*10^3)/(p^2 + 600*p + 100*10^3)
uC(p) := uC0/p + I3(p)/(p*C) simplify → (17*10^3*p + 17*10^6)/(p*(p^2 + 600*p + 100*10^3))
uL(p) := L*p*I2(p) - L*i2_дк simplify → -170*p/(p^2 + 600*p + 100*10^3)
# Перейдемо від зображення до функції часу:
I1(t) := I1(p) invlaplace, p; factor → (17*cos(100*t)*e^(-300*t) + 34*sin(100*t)*e^(-300*t) + 4)/5
I2(t) := I2(p) invlaplace, p; factor → -(85*sin(100*t)*e^(-300*t) - 4)/5
I3(t) := I3(p) invlaplace, p; factor → 17*((1 - 7j)*e^((-300 + 100j)*t) + (1 + 7j)*e^((-300 - 100j)*t))/10
uLt(t) := uL(p) invlaplace, p; simplify → -170*e^(-300*t)*(cos(100*t) - 3*sin(100*t))
uCt(t) := uC(p) invlaplace, p; simplify → 170 - 340*sin(100*t)*e^(-300*t) - 170*cos(100*t)*e^(-300*t)
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# Визначимо чому повинен дорівнювати активний опір вітки з джерелом Е1, щоб аперіодичний процес переходив у коливальний
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Z_ab(p) == 1/(p*C)*(R + p*L)/(R + p*L + 1/(p*C)) + R'
Z_ab(p) == (1/(p*C)*(R + p*L) + R'*(R + p*L + 1/(p*C)))/(R + p*L + 1/(p*C))
1/(p*C)*(R + p*L) + R'*(R + p*L + 1/(p*C)) == 0
(R'*L)*p^2 + (R*R' + L/C)*p + (R/C + R'/C) == 0
D == (R*R' + L/C)^2 - 4*(R'*L)*(R/C + R'/C) == 0
((R*R' + L/C)^2 - 4*(R'*L)*(R/C + R'/C)) solve, R'; float → [94.721; 5.279]
