# Вхідні параметри:
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L := 180*10^-3
ψ := 135 °
C := 150*10^-6
ω := 150
R := 60
T := 1
E1 := 80
t1 := 0.7
E := 1
t2 := 1.6
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R' := 2*R = 120
# Усталений режим до комутації
i_1дк := 0
i_3дк := i_1дк = 0
i_2дк := 0
u_Cдк := 0
# Усталений режим після комутації
i'_1 := E/(R + R) = 0.00833333
i'_3 := i'_1 = 0.00833333
i'_2 := 0
u'_C := E - i'_1*R = 0.5
# Незалежні початкові умови
u_C0 := u_Cдк = 0
# Залежні початкові умови
i_10 := 0.01
i_20 == i_10 - i_30
E == i_30*R + i_10*R
i_20 := 3.333*10^-3
0 == u_C0 - i_30*R + i_20*R'
i_30 := 6.667*10^-3
# Вільний режим після комутації
Z_vx(p) := (R*(R' + 1/(p*C)) + R*(R + R' + 1/(p*C)))/(R + R' + 1/(p*C))
p := R*(R' + 1/(p*C)) + R*(R + R' + 1/(p*C)) solve; float, 5 → -44.444
T := T/|p| = 0.0225002
# Вільна складова струму:
i''_1(t) == A1*e^(p*t)
A1 := i_10 - i'_1 = 0.00166667
i''_1(t) := A1*e^(p*t) float, 5 → 0.0016667*e^(-44.444*t)
# Повне значення струму
g_11(t) := i'_1 + i''_1(t) float, 5 → 0.0016667*e^(-44.444*t) + 0.0083333
h_cU(t) := E*R/(R + R)*(1 - e^(p*t)) float, 5 → -0.5*e^(-44.444*t) + 0.5
# Визначимо закони зміни напруги на всіх проміжках часу
U_0 := E1 = 80
U_1(t) := U_0 - 3*E1/T*t float, 5 → -10667.0*t + 80.0
U_2 := 0
U'_1 := d/dt(U_1(t)) float, 5 → -10667.0
# Струм на цих проміжках буде мати вигляд
i_1(t) := U_0*g_11(t) + integral(U'_1*g_11(t - τ), τ = 0 .. t) float, 5; factor → -(44445000*t + (-266683.0*e^(-44.444*t)) - 133317.0)/500000
i_2(t) := U_0*g_11(t) + integral(U'_1*g_11(t - τ), τ = 0 .. T) + (U_2 + 2*E1)*g_11(t - T)
i_2(t) float, 5; factor → -(-533340000*e^(-44.444*t + 1.0) + 1108000000*e^(-44.444*t) + 165001.0)/2000000000
# Напруга на індуктивності на цих проміжках буде мати вигляд
u_C1(t) := U_0*h_cU(t) + integral(U'_1*h_cU(t - τ), τ = 0 .. t) float, 5 → -5333.5*t + (-160.0*e^(-44.444*t)) + 160.0
u_C2(t) := U_0*h_cU(t) + integral(U'_1*h_cU(t - τ), τ = 0 .. t) + (U_2 + 2*E1)*h_cU(t - T)
u_C2(t) float, 5; factor → -(1066700*t + 16000.0*e^(-44.444*t + 1.0) + 32001.0*e^(-44.444*t) - 48001.0)/200
t1 := 0, 0.0001 .. T
t2 := T, 0.0231 .. 0.06
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