# Національний технічний університет України
# «Київський політехнічний інститут імені Ігоря Сікорського»
# Факультет інформатики та обчислювальної техніки
# Кафедра обчислювальної техніки
# Теорія електричних та магнітних кіл
#
# Розрахунково-графічна робота №5
# «Перехідні процеси у лінійних електричних колах із зосередженим ипараметрами»
#
# Варіант 928
# Виконав:
# студент ІІ курсу ФІОТ
# групи ІО-64
# Фельдман М. Г.
# Київ
# 2018 р.
# Вхідні параметри:
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L := 190*10^-3
ψ := 135 °
C := 250*10^-6
ω := 150
R := 70
T := 1
E1 := 80
t1 := 0.7
E2 := 130
t2 := 1, 6
# Класичний метод
# Розраховуємо УРДК (t<0): | Розраховуємо УРПК (t>0):
i1_дк := 0
i1_пк := E1/(2*R) = 0.571429
i2_дк := 0
i2_пк := i1_пк = 0.571429
i3_пк := 0
i3_дк := 0
iL_пк := i2_пк = 0.571429
iL_дк := i2_дк = 0
uL_пк := 0
uC_дк := -E2 = -130
uC_пк := E1 - E2 - i1_пк*R = -90
# Незалежні початкові умови:
i20 := i2_дк = 0
uC0 := uC_дк = -130
# Залежні початкові умови:
Given
i10 == i20 + i30
E1 - E2 == uC0 + i10*R
E2 == i20*R - uC0 + uL0
[i10; i30; uL0] := Find(i10, i30, uL0) → [8/7; 8/7; 0]
# Незалежні початкові умови:
di20 := uL0/L = 0
duC0 := i30/C = 4571.43
# Залежні початкові умови:
Given
di10 == di20 + di30
0 == duC0 + di10*R
0 == di20*R - duC0 + duL0
[di10; di30; duL0] := Find(di10, di30, duL0) float, 7 → [-65.306; -65.306; 4571.429]
# Обчислимо вільний режим після комутації (t=0).
# Складаємо характеристичне рівняння схеми:
Z(p) == 1/(p*C)*(R + p*L)/(R + p*L + 1/(p*C)) + R == (1/(p*C)*(R + p*L) + R*(R + p*L + 1/(p*C)))/(R + p*L + 1/(p*C))
[p1; p2] := 1/(p*C)*(R + p*L) + R*(R + p*L + 1/(p*C)) solve, p; float, 7 → [-156.471; -269.093]
# Вільні складові повних струмів і напруг матимуть вигляд:
i1_вільна == A1*e^(p1*t) + A2*e^(p2*t)
i2_вільна == B1*e^(p1*t) + B2*e^(p2*t)
i3_вільна == C1*e^(p1*t) + C2*e^(p2*t)
uC_вільна == D1*e^(p1*t) + D2*e^(p2*t)
uL_вільна == F1*e^(p1*t) + F2*e^(p2*t)
# Визначаємо сталі інтегрування:
Given
i10 - i1_пк == A1 + A2
di10 - 0 == p1*A1 + p2*A2
[A1; A2] := Find(A1, A2) → [0.785472908307; -0.214044336878]
[A1; A2] = [0.785473; -0.214044]
Given
i20 - i2_пк == B1 + B2
di20 - 0 == p1*B1 + p2*B2
[B1; B2] := Find(B1, B2) → [-1.36534549036; 0.793916918934]
[B1; B2] = [-1.36535; 0.793917]
Given
i30 - i3_пк == C1 + C2
di30 - 0 == p1*C1 + p2*C2
[C1; C2] := Find(C1, C2) → [2.15081839867; -1.00796125581]
[C1; C2] = [2.15082; -1.00796]
Given
uC0 - uC_пк == D1 + D2
duC0 - 0 == p1*D1 + p2*D2
[D1; D2] := Find(D1, D2) → [-54.9831020593; 14.9831020593]
[D1; D2] = [-54.9831; 14.9831]
Given
uL0 - uL_пк == F1 + F2
duL0 - 0 == p1*F1 + p2*F2
[F1; F2] := Find(F1, F2) → [40.5910860715; -40.5910860715]
[F1; F2] = [40.5911; -40.5911]
# Отже вільні складові матимуть вигляд: | Повні формули:
i1_вільна(t) := A1*e^(p1*t) + A2*e^(p2*t)
i1_вільна(0 s) = 0.571429
i1(t) := i1_пк + i1_вільна(t)
i1(0 s) = 1.14286
i2_вільна(t) := B1*e^(p1*t) + B2*e^(p2*t)
i2_вільна(0 s) = -0.571429
i2(t) := i2_пк + i2_вільна(t)
i2(0 s) = 0
i3_вільна(t) := C1*e^(p1*t) + C2*e^(p2*t)
i3_вільна(0 s) = 1.14286
i3(t) := i3_пк + i3_вільна(t)
i3(0 s) = 1.14286
uC_вільна(t) := D1*e^(p1*t) + D2*e^(p2*t)
uC_вільна(0 s) = -40
uC(t) := uC_пк + uC_вільна(t)
uC(0 s) = -130
uL_вільна(t) := F1*e^(p1*t) + F2*e^(p2*t)
uL_вільна(0 s) = 0
uL(t) := uL_пк + uL_вільна(t)
uL(0 s) = 0
t := 0, 0.0002 .. 0.1
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# Операторний метод
# Розраховуємо УРДК (t<0):
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i1_дк := 0
i2_дк := i1_дк = 0
i3_дк := 0
iL_дк := i2_дк = 0
uC_дк := -E2 = -130
uL_дк := -uC_дк + E2
# Початкові умови:
uC0 = -130
iL0 := iL_дк = 0
i20 = 0
# Знаходимо струми в колі методом контурних струмів:
Z11(p) := R + 1/(p*C)
Z12(p) := 1/(p*C)
Z22(p) := R + p*L + 1/(p*C)
Z21(p) := 1/(p*C)
Ek1(p) := E1/p - E2/p - uC0/p
Ek2(p) := E2/p + uC0/p + L*i20
Ik1(p)*Z11(p) - Ik2(p)*Z12(p) == Ek1(p)
-Ik1(p)*Z21(p) + Ik2(p)*Z22(p) == Ek2(p)
Δ(p) := det([Z11(p), -Z12(p); -Z21(p), Z22(p)]) → (133*p^2 + 56.6*10^3*p + 5.6*10^6)/(10*p)
Δ1(p) := det([Ek1(p), -Z12(p); Ek2(p), Z22(p)]) → (76*p^2 + 28*10^3*p + 1.6*10^6)/(5*p^2)
Δ2(p) := det([Z11(p), Ek1(p); -Z21(p), Ek2(p)]) → 320*10^3/p^2
Ik1(p) := Δ1(p)/Δ(p) → 2*(76*p^2 + 28*10^3*p + 1.6*10^6)/(p*(133*p^2 + 56.6*10^3*p + 5.6*10^6))
Ik2(p) := Δ2(p)/Δ(p) → 3.2*10^6/(p*(133*p^2 + 56.6*10^3*p + 5.6*10^6))
I1(p) := Ik1(p) → (152*p^2 + 56*10^3*p + 3.2*10^6)/(p*(133*p^2 + 56.6*10^3*p + 5.6*10^6))
I2(p) := Ik2(p) → 3.2*10^6/(p*(133*p^2 + 56.6*10^3*p + 5.6*10^6))
I3(p) := Ik1(p) - Ik2(p) simplify → 8*(19*p + 7*10^3)/(133*p^2 + 56.6*10^3*p + 5.6*10^6)
uC(p) := uC0/p + I3(p)/(p*C) simplify → -(5.32*10^3*p + 1.656*10^6)/(133*p^2 + 56.6*10^3*p + 5.6*10^6) - 90/p
uL(p) := L*p*I2(p) - L*i2_дк simplify → 608*10^3/(133*p^2 + 56.6*10^3*p + 5.6*10^6)
# Перейдемо від зображення до функції часу:
I1(t) := I1(p) invlaplace, p; simplify → 4*cosh(100*sqrt(5.609*10^3)*t/133)*e^(-28.3*10^3*t/133)/7 + 524*sqrt(5.609*10^3)*sinh(100*sqrt(5.609*10^3)*t/133)*e^(-28.3*10^3*t/133)/(39.263*10^3) + 4/7
I2(t) := I2(p) invlaplace, p; simplify → 4/7 - 1.132*10^3*sqrt(5.609*10^3)*sinh(100*sqrt(5.609*10^3)*t/133)*e^(-28.3*10^3*t/133)/(39.263*10^3) - 4*cosh(100*sqrt(5.609*10^3)*t/133)*e^(-28.3*10^3*t/133)/7
I3(t) := I3(p) invlaplace, p; factor → 8*e^(-28.3*10^3*t/133)*(5.609*10^3*cosh(100*sqrt(5.609*10^3)*t/133) + 207*sqrt(5.609*10^3)*sinh(100*sqrt(5.609*10^3)*t/133))/(39.263*10^3)
uLt(t) := uL(p) invlaplace, p; simplify → 6.08*10^3*sqrt(5.609*10^3)*sinh(100*sqrt(5.609*10^3)*t/133)*e^(-28.3*10^3*t/133)/(5.609*10^3)
uCt(t) := uC(p) invlaplace, p; simplify → -40*cosh(100*sqrt(5.609*10^3)*t/133)*e^(-28.3*10^3*t/133) - 5.24*10^3*sqrt(5.609*10^3)*sinh(100*sqrt(5.609*10^3)*t/133)*e^(-28.3*10^3*t/133)/(5.609*10^3) - 90
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# Визначимо чому повинен дорівнювати активний опір вітки з джерелом Е1, щоб аперіодичний процес переходив у коливальний
Z_ab(p) == 1/(p*C)*(R + p*L)/(R + p*L + 1/(p*C)) + R'
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Z_ab(p) == (1/(p*C)*(R + p*L) + R'*(R + p*L + 1/(p*C)))/(R + p*L + 1/(p*C))
1/(p*C)*(R + p*L) + R'*(R + p*L + 1/(p*C)) == 0
(R'*L)*p^2 + (R*R' + L/C)*p + (R/C + R'/C) == 0
D == (R*R' + L/C)^2 - 4*(R'*L)*(R/C + R'/C) == 0
((R*R' + L/C)^2 - 4*(R'*L)*(R/C + R'/C)) solve, R'; float → [51.131; 6.073]
