U1 := 14.000
R1 := 150.370
R2 := 96
w := 314
L1 := 0.119
L2 := 0.317
XL1 := w*L1 → 37.366
XL2 := w*L2 → 99.538
M := 0.147434
XM := w*M → 46.294276
ZM := 1i*XM
Z1 := R1 + XL1*1i
Z2 := R2 + XL2*1i
ZU := (Z1*Z2 - ZM^2)/(Z1 + Z2 - 2*ZM) → 63.6815353488 + 63.8575690697i
|ZU| → 90.1838515027
I := U1/ZU → 0.109618537496 - 0.109921554044i
|I| → 0.155238435338
I1 := U1*(Z2 - ZM)/(Z1*Z2 - ZM^2) → 0.0610508072449 - 0.0301232451448i
arg(I) = -45.0791 deg
|I1| → 0.06807797708
I2 := U1*(Z1 - ZM)/(Z1*Z2 - ZM^2) → 0.0485677302506 - 0.079798308899i
|I2| → 0.0934162433672
I1*Z1 + I2*ZM → 14 + 3.91882518724e-20i
I1 + I2 → 0.109618537496 - 0.109921554044i
UR1 := R1*I1 → 9.18020988541 - 4.52963237243i
arg(UR1) = -26.2623 deg
UL1 := XL1*1i*I1 → 1.12558517808 + 2.28122446351i
UM1 := XM*1i*I2 → 3.6942049365 + 2.24840790892i
UR2 := R2*I2 → 4.66250210406 - 7.6606376543i
UL2 := XL2*1i*I2 → 7.94296407119 + 4.83433473369i
UM2 := XM*1i*I1 → 1.39453382475 + 2.82630292062i
UR1 + UL1 + UM1 → 14 + 3.89999999236e-20i
|UM2| → 3.15162066046
UR2 + UL2 + UM2 → 14 - 3.30000000635e-20i
Мощности
# [reference: VeSt - ASIC 3 Licens.mcd]
P1t := Re(UR1*conj(I1)) → 0.696906450553
P2t := Re(UR2*conj(I2)) → 0.837753074385
P := P1t + P2t → 1.53465952494
vI1 := vector([I1; I2], 4, 0.01)
ψI2 := arg(I2) = -58.674 deg
vU1 := vector([UR1; UL1; UM1], 3, 1)
ψI1 := arg(I1) = -26.2623 deg
P1m := XM*|I1|*|I2|*sin(ψI2 - ψI1) → -0.157804850876
vU2 := vector([UR2; UL2; UM2], 3, 1)
P2m := XM*|I2|*|I1|*sin(ψI1 - ψI2) → 0.157804850876
или
P1m := |UM2|*|I2|*sin(ψI2 - ψI1) → -0.157804850876
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P2m := |UM1|*|I1|*sin(ψI1 - ψI2) → 0.157804850876
