U := 3
L := 25*10^-3
C := 1*10^-6
ν := 1006
ω := 2*π*ν float, 10 → 6320.884419
Xl := ω*L → 158.022110475
Xc := 1/(ω*C) → 158.205708839
Rsh := 20
Z := Rsh + 1i*(Xl - Xc) → 20.0 - 0.183598364429i
|Z| → 20.0008426912
I := U/Z → 0.14998736043 + 0.00137687170301i
Ul := I*1i*Xl → -0.217576172362 + 23.7013192398i
|I| → 0.149993680082
Uc := -I*1i*Xc → 0.217828963755 - 23.7288566738i
arg(I) = 0.525956 deg
URsh := I*Rsh
# [reference: VeSt - ASIC 3 Licens.mcd]
U := Ul + Uc + URsh → 3 - 2.00000012744e-21i
vI1 := vector(I, 1, 0.01)
vU1 := vector([Ul; Uc; URsh], 3, 1)
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