R3 := 110
R5 := 210
Uab := 27.6*e^(1i*π/6)
Za := R3
Zb := R5
Ubc := 27.1*e^(-1i*π/2)
Zc := R5
Ya := 1/Za → 1/110
Uca := 27*e^(1i*5*π/6)
Yb := 1/Zb → 1/210
Yc := 1/Zc → 1/210
Uan1 := (Uab*Yb - Uca*Yc)/(Ya + Yb + Yc) → 6.98372093023*sqrt(3) + 0.0767441860465i
|Uan1| → 12.0964029267
arg(Uan1) = 0.363509 deg
Ubn1 := (Ubc*Yc - Uab*Ya)/(Ya + Yb + Yc) → -6.73953488372*sqrt(3) - 13.6720930233i
|Ubn1| → 17.9774892291
arg(Ubn1) = -130.491 deg
Ucn1 := (Uca*Ya - Ubc*Yb)/(Ya + Yb + Yc) → 13.5255813953i - 567*sqrt(3)/86
|Ucn1| → 17.7015597911
arg(Ucn1) = 130.174 deg
Ia := Uan1/Za → 0.063488372093*sqrt(3) + 0.000697674418605i
|Ia| → 0.109967299333
Ib := Ubn1/Zb → -0.0320930232558*sqrt(3) - 0.0651052048726i
|Ib| → 0.0856070915673
Ic := Ucn1/Zc → 0.064407530454i - 27*sqrt(3)/860
|Ic| → 0.0842931418623
P1 := -Uca*conj(Ia) → (0.063488372093*sqrt(3) - 0.000697674418605i)*(27*sqrt(3)/2 - 27i/2)
Re(P1) → 2.56186046512
P2 := Ubc*conj(Ib) → 0.869720930233i*sqrt(3) + 1.76435105205
Re(P2) → 1.76435105205
Uan := 15.6*e^(1i*0)
Unn1 := Uan - Uan1 → -6.98372093023*sqrt(3) + 15.6 - 0.0767441860465i
|Unn1| float, 5 → 3.5047
Ubn := 15.6*e^(-1i*2*π/3)
Unn1 := Ubn - Ubn1 → (6.73953488372 - 7.8i)*sqrt(3) - (7.8 - 13.6720930233i)
|Unn1| float, 5 → 3.8766
Ucn := 15.6*e^(1i*2*π/3)
Unn1 := Ucn - Ucn1 → (6.59302325581 + 7.8i)*sqrt(3) - (7.8 + 13.5255813953i)
|Unn1| float, 5 → 3.6195
arg(Unn1) = -0.24671 deg
# [reference: VeSt - ASIC 3 Licens.mcd]
vU3 := vector([Unn1; Ucn1]*e^(1i*π/2), 3, 1)
vU1 := vector([Unn1; Uan1]*e^(1i*π/2), 3, 1)
vU2 := vector([Unn1; Ubn1]*e^(1i*π/2), 3, 1)
Ibc := Ib + Ic
vI1 := vector([[Ib; Ic], [Ibc; Ia]]*e^(1i*π/2), [4, 4], [0.01, 0.01])
Isum := Ia + Ib + Ic → -9.41395347255e-22*sqrt(3) + 7.9090000022e-22i
|Isum| → 1.81223574897e-21
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