R5 := 210
Zb := R5
Uan := 15.6*e^(1i*0)
Zc := R5
Ubn := 15.6*e^(-1i*2*π/3)
Ucn := 15.6*e^(1i*2*π/3)
I11 := Uan/105 → 0.148571428571
I12 := Ubn/210 → -0.0371428571429i*sqrt(3) - 0.0371428571429
arg(I12) = -120 deg
|I12| → 0.0742857142857
I13 := Ucn/210 → 0.0371428571429i*sqrt(3) - 0.0371428571429
arg(I13) = 120 deg
|I13| → 0.0742857142857
I1sum := I11 - I12 - I13 → 0.222857142857
arg(I1sum) = 0 deg
|I1sum| → 0.222857142857
I21 := Uan/105*210/420 → 0.0742857142857
I22 := Ubn/210 → -0.0371428571429i*sqrt(3) - 0.0371428571429
arg(I22) = -120 deg
|I22| → 0.0742857142857
I2sum := -I21 + I22 → -0.0371428571429i*sqrt(3) - 0.111428571429
arg(I2sum) = -150 deg
|I2sum| → 0.128666631419
I31 := Uan/105*210/420 → 0.0742857142857
I33 := Ucn/210 → 0.0371428571429i*sqrt(3) - 0.0371428571429
arg(I33) = 120 deg
|I33| → 0.0742857142857
I3sum := -I31 + I33 → 0.0371428571429i*sqrt(3) - 0.111428571429
arg(I3sum) = 150 deg
|I3sum| → 0.128666631419
IN1 := I1sum + I2sum + I3sum → 2.00000000122e-21
|IN1| → 2.00000000122e-21
Unn1 := -Uan → -15.6
arg(Unn1) = 180 deg
Unn1 := -Ubn + I2sum*Zb → 3.00000000577e-20i*sqrt(3) - 15.6
arg(Unn1) = 180 deg
|Unn1| → 15.6
Uan1 := Uan → 15.6
Unn1 := -Ucn + I3sum*Zc → -3.00000000577e-20i*sqrt(3) - 15.6
arg(Uan1) = 0 deg
arg(Unn1) = -180 deg
|Uan1| → 15.6
|Unn1| → 15.6
Ubn1 := I2sum*Zb → -7.8i*sqrt(3) - 23.4
Uab := 27.6*e^(1i*π/6)
arg(Ubn1) = -150 deg
|Ubn1| → 27.0199925981
Ubc := 27.1*e^(-1i*π/2)
Ucn1 := I3sum*Zc → 7.8i*sqrt(3) - 23.4
arg(Ucn1) = 150 deg
Uca := 27*e^(1i*5*π/6)
|Ucn1| → 27.0199925981
P1 := -Uca*conj(I1sum) → 3.00857142857*sqrt(3) - 3.00857142857i
Re(P1) float, 5 → 5.211
P2 := Ubc*conj(I2sum) → 1.00657142857*sqrt(3) + 3.01971428571i
Re(P2) float, 5 → 1.7434
# [reference: VeSt - ASIC 3 Licens.mcd]
vU3 := vector([-Unn1; Uan1]*e^(1i*π/2), 3, 1)
vU1 := vector([-Unn1; Ubn1]*e^(1i*π/2), 3, 1)
vU2 := vector([-Unn1; Ucn1]*e^(1i*π/2), 3, 1)
I23sum := I2sum + I3sum → -0.222857142857
vI1 := vector([[I2sum; I3sum], [I23sum; I1sum]]*e^(1i*π/2), [4, 4], [0.01, 0.01])
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