Xl := 160
R3 := 110
Uab := 27*e^(1i*π/6)
Xc := 315
R5 := 210
Za := R5
Ubc := 27.1*e^(-1i*π/2)
Zb := 1i*Xl
Zc := -1i*Xc
Ya := 1/Za → 1/210
Uca := 27*e^(1i*5*π/6)
Yb := 1/Zb → -(1/160)*1i
Yc := 1/Zc → (1/315)*1i
Uan1 := (Uab*Yb - Uca*Yc)/(Ya + Yb + Yc) float, 5 → 25.737 + 1.5204i
|Uan1| → 25.7818693108
arg(Uan1) = 3.38079 deg
Ubn1 := (Ubc*Yc - Uab*Ya)/(Ya + Yb + Yc) float, 5 → 2.4012 - 11.949i
|Ubn1| → 12.187877684
arg(Ubn1) = -78.6375 deg
Ucn1 := (Uca*Ya - Ubc*Yb)/(Ya + Yb + Yc) float, 5 → 2.4468 + 15.08i
|Ucn1| → 15.2772127772
arg(Ucn1) = 80.7838 deg
Ia := Uan1/Za → 0.122557142857 + 0.00724i
|Ia| → 0.122770806242
arg(Ia) = 3.38079 deg
Ib := Ubn1/Zb → -0.07468125 - 0.0150075i
|Ib| → 0.076174235525
arg(Ib) = -168.638 deg
Ic := Ucn1/Zc → -0.047873015873 + 0.00776761904762i
|Ic| → 0.0484990881816
arg(Ic) = 170.784 deg
P1 := -Uca*conj(Ia) → (1.65452142857 - 0.09774i)*sqrt(3) - (0.09774 + 1.65452142857i)
Re(P1) float, 5 → 2.768
P2 := Ubc*conj(Ib) → 0.40670325 + 2.023861875i
Re(P2) float, 5 → 0.4067
Uan := 15.6*e^(1i*0)
Unn1 := Uan - Uan1 → -10.137 - 1.5204i
|Unn1| float, 5 → 10.25
Ubn := 15.6*e^(-1i*2*π/3)
Unn1 := Ubn - Ubn1 → -7.8i*sqrt(3) - (10.2012 - 11.949i)
|Unn1| float, 5 → 10.32
Ucn := 15.6*e^(1i*2*π/3)
Unn1 := Ucn - Ucn1 → 7.8i*sqrt(3) - (10.2468 + 15.08i)
|Unn1| float, 5 → 10.366
arg(Unn1) → arg(7.8i*sqrt(3) - (10.2468 + 15.08i)) = -171.289 deg
# [reference: VeSt - ASIC 3 Licens.mcd]
vU3 := vector([Unn1; Ucn1]*e^(1i*π/2), 3, 1)
vU1 := vector([Unn1; Uan1]*e^(1i*π/2), 3, 1)
vU2 := vector([Unn1; Ubn1]*e^(1i*π/2), 3, 1)
Ibc := Ib + Ic
|Ibc| → 0.122767927244
vI1 := vector([[Ib; Ic], [Ibc; Ia]]*e^(1i*π/2), [4, 4], [0.01, 0.01])
Isum := Ia + Ib + Ic → 2.87698412698e-6 + 1.19047619048e-7i
|Isum| → 2.87944612773e-6
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