Xl := 160
R3 := 110
Uan := 15.6*e^(1i*0)
Xc := 315
R5 := 210
Za := R5
Zb := 1i*Xl
Ubn := 15.6*e^(-1i*2*π/3)
Zc := -1i*Xc
Ucn := 15.6*e^(1i*2*π/3)
Ia := Uan/Za → 0.0742857142857
|Ia| float, 5 → 0.074286
Ib := Ubn/Zb → -0.04875*sqrt(3) + 0.04875i
|Ib| float, 5 → 0.0975
Ic := Ucn/Zc → -0.0247619047619*sqrt(3) - 0.0247619047619i
|Ic| float, 5 → 0.049524
P1 := Uan*conj(Ia) → 1.15885714286
Re(P1) → 1.15885714286
P2 := Ubn*conj(Ib) → (-0.04875*sqrt(3) - 0.04875i)*(-7.8i*sqrt(3) - 7.8)
Re(P2) → -0.38025*sqrt(3) + 0.38025*sqrt(3)
P3 := Ucn*conj(Ic) → (-0.0247619047619*sqrt(3) + 0.0247619047619i)*(7.8i*sqrt(3) - 7.8)
Re(P3) → -0.193142857143*sqrt(3) + 0.193142857143*sqrt(3)
# [reference: VeSt - ASIC 3 Licens.mcd]
vU1 := vector([Uan; Ubn; Ucn]*e^(1i*π/2), 1, 1)
Ibc := Ib + Ic
vI1 := vector([[Ic; Ib], [Ibc; Ia]]*e^(1i*π/2), [4, 4], [0.01, 0.01])
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