R5 := 210
Uab := 27.6*e^(1i*π/6)
Za := R5
Zb := R5
Ubc := 27.1*e^(-1i*π/2)
Zc := R5
Ya := 1/Za → 1/210
Uca := 27*e^(1i*5*π/6)
Yb := 1/Zb → 1/210
Yc := 1/Zc → 1/210
Uan1 := (Uab*Yb - Uca*Yc)/(Ya + Yb + Yc) → 9.1*sqrt(3) + 0.1i
|Uan1| → 15.7619795711
arg(Uan1) = 0.363509 deg
Ubn1 := (Ubc*Yc - Uab*Ya)/(Ya + Yb + Yc) → -4.6*sqrt(3) - 13.6333333333i
|Ubn1| → 15.7907497535
arg(Ubn1) = -120.302 deg
Ucn1 := (Uca*Ya - Ubc*Yb)/(Ya + Yb + Yc) → 13.5333333333i - 9*sqrt(3)/2
|Ucn1| → 15.6173336748
arg(Ucn1) = 119.939 deg
Ia := Uan1/Za → 0.0433333333333*sqrt(3) + 0.00047619047619i
|Ia| → 0.0750570455767
Ib := Ubn1/Zb → -0.0219047619048*sqrt(3) - 0.0649206349206i
|Ib| → 0.0751940464453
Ic := Ucn1/Zc → 0.0644444444444i - 3*sqrt(3)/140
|Ic| → 0.0743682555944
P1 := -Uca*conj(Ia) → (0.0433333333333*sqrt(3) - 0.00047619047619i)*(27*sqrt(3)/2 - 27i/2)
Re(P1) → 1.74857142857
P2 := Ubc*conj(Ib) → 0.593619047619i*sqrt(3) + 1.75934920635
Re(P2) → 1.75934920635
Ubn := 15.6*e^(-1i*2*π/3)
Uan := 15.6*e^(1i*0)
Unn1 := Uan - Uan1 → -9.1*sqrt(3) + 15.6 - 0.1i
|Unn1| float, 5 → 0.19009
Ucn := 15.6*e^(1i*2*π/3)
# [reference: VeSt - ASIC 3 Licens.mcd]
vU3 := vector([Unn1; Ucn1]*e^(1i*π/2), 3, 1)
vU1 := vector([Unn1; Uan1]*e^(1i*π/2), 3, 1)
Ibc := Ib + Ic
vU2 := vector([Unn1; Ubn1]*e^(1i*π/2), 3, 1)
vI1 := vector([[Ib; Ic], [Ibc; Ia]]*e^(1i*π/2), [4, 4], [0.01, 0.01])
Isum := Ia + Ib + Ic → -4.28571428043e-22*sqrt(3) + 4.79999999914e-22i
|Isum| → 8.83979867827e-22
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