R5 := 210
Uan := 15.6*e^(1i*0)
Za := R5
Zb := R5
Ubn := 15.6*e^(-1i*2*π/3)
Zc := R5
Ucn := 15.6*e^(1i*2*π/3)
Ia := Uan/Za → 0.0742857142857
|Ia| float, 5 → 0.074286
Ib := Ubn/Zb → -0.0371428571429i*sqrt(3) - 0.0371428571429
|Ib| float, 5 → 0.074286
Ic := Ucn/Zc → 0.0371428571429i*sqrt(3) - 0.0371428571429
|Ic| float, 5 → 0.074286
P1 := Uan*conj(Ia) → 1.15885714286
Re(P1) → 1.15885714286
P2 := Ubn*conj(Ib) → (0.0371428571429i*sqrt(3) - 0.0371428571429)*(-7.8i*sqrt(3) - 7.8)
Re(P2) → 1.15885714286
P3 := Ucn*conj(Ic) → (-0.0371428571429i*sqrt(3) - 0.0371428571429)*(7.8i*sqrt(3) - 7.8)
Re(P3) → 1.15885714286
# [reference: VeSt - ASIC 3 Licens.mcd]
vU1 := vector([Uan; Ubn; Ucn]*e^(1i*π/2), 1, 1)
Ibc := Ib + Ic
vI1 := vector([[Ib; Ic], [Ibc; Ia]]*e^(1i*π/2), [4, 4], [0.01, 0.01])
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