R3 := 110
R5 := 210
Uab := 27.6*e^(1i*π/6)
Za := ∞
Zb := R5
Ubc := 27.1*e^(-1i*π/2)
Zc := R5
Ya := 1/Za → 0
Uca := 27*e^(1i*5*π/6)
Yb := 1/Zb → 1/210
Yc := 1/Zc → 1/210
Uan1 := (Uab*Yb - Uca*Yc)/(Ya + Yb + Yc) → 13.65*sqrt(3) + 0.15i
|Uan1| → 23.6429693567
arg(Uan1) = 0.363509 deg
Ubn1 := (Ubc*Yc - Uab*Ya)/(Ya + Yb + Yc) → -13.55i
|Ubn1| → 13.55
arg(Ubn1) = -90 deg
Ucn1 := (Uca*Ya - Ubc*Yb)/(Ya + Yb + Yc) → 13.55i
|Ucn1| → 13.55
arg(Ucn1) = 90 deg
Ia := Uan1/Za → 0
|Ia| → 0
Ib := Ubn1/Zb → -0.0645238095238i
|Ib| → 0.0645238095238
Ic := Ucn1/Zc → 0.0645238095238i
|Ic| → 0.0645238095238
P1 := -Uca*conj(Ia) → 0
Re(P1) → 0
P2 := Ubc*conj(Ib) → 1.7485952381
Re(P2) → 1.7485952381
Uan := 15.6*e^(1i*0)
Unn1 := Uan - Uan1 → -13.65*sqrt(3) + 15.6 - 0.15i
|Unn1| float, 5 → 8.0439
Ubn := 15.6*e^(-1i*2*π/3)
Unn1 := Ubn - Ubn1 → -7.8i*sqrt(3) - (7.8 - 13.55i)
|Unn1| float, 5 → 7.8001
arg(Unn1) = 179.706 deg
Ucn := 15.6*e^(1i*2*π/3)
Unn1 := Ucn - Ucn1 → 7.8i*sqrt(3) - (7.8 + 13.55i)
|Unn1| float, 5 → 7.8001
# [reference: VeSt - ASIC 3 Licens.mcd]
vU3 := vector([Unn1; Ucn1]*e^(1i*π/2), 3, 1)
vU1 := vector([Unn1; Uan1]*e^(1i*π/2), 3, 1)
vU2 := vector([Unn1; Ubn1]*e^(1i*π/2), 3, 1)
Ibc := Ib + Ic
|Ibc| → 0.0
vI1 := vector([[Ib; Ic], [Ibc; Ia]]*e^(1i*π/2), [4, 4], [0.01, 0.01])
Isum := Ia + Ib + Ic → 0.0
|Isum| → 0.0
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