# Дано:
R := 25
C := 50*10^-6
E2 := 100
L := 170*10^-3
E1 := 120  # После комутации:
# До комутации:
i1b := E1/(3*R) → 8/5
i1a := E1/(2*R) → 12/5
i2b := 0
i3b := i1b → 8/5
i3a := i1a → 12/5
i2a := 0
Ucb := -E2 + 2*R*i3b → -20
Uca := -E2 + i3a*R → -40
# Расчет входного сопротивления:
Z(p) := 1/(p*C) + R + R*(p*L + R)/(2*R + p*L) solve, p → [-5275/17 - (25*sqrt(9879)/17)*1i; -5275/17 + 25/17*sqrt(9879)*1i]
-5275/17 + 25/17*sqrt(9879)*1i = -310.294 + 146.166i
δ := 5275/17
ω := 25/17*sqrt(9879)
-5275/17 = -310.294
# Токи переходных процессов для t=0:
# Система №1 | Конденсатор взят с плюсом
Mb := [(E1 - E2 - i1b*R) - Ucb; E1 - i1b*R; -i1b] → [0; 80; -8/5]
Ma := [R, 0, 1; 0, R, 1; -1, -1, 0] → [25, 0, 1; 0, 25, 1; -1, -1, 0]
Mr := Ma^-1*Mb → [-4/5; 12/5; 20]
i10 := i1b
Uc0 := Ucb
i20 := Mr[0] → -4/5
i30 := Mr[1] → 12/5
Ul0 := Mr[2] → 20
di10 := Ul0/L → 2000/17
dUc0 := i20/C → -16000
# Система №2 (производные)
Mdb := [-di10*R - dUc0; -di10*R; -di10] → [222000/17; -50000/17; -2000/17]
Mda := [R, 0, 1; 0, R, 1; -1, -1, 0] → [25, 0, 1; 0, 25, 1; -1, -1, 0]
Mdr := Mda^-1*Mdb → [6440/17; -4440/17; 61000/17]
di20 := Mdr[0] → 6440/17
di30 := Mdr[1] → -4440/17
dUl0 := Mdr[2] → 61000/17
# Расчет Ul(t):
Al := sqrt(Ul0^2 + ((dUl0 + δ*Ul0)/ω)^2) → 160*sqrt(17)*sqrt(89)/89
βL := asin(Ul0/Al) → asin(sqrt(17)*sqrt(89)/136)
Ul(t) := Al*e^(-δ*t)*sin(ω*t + βL) → 160*sqrt(17)*sqrt(89)*sin(asin(sqrt(17)*sqrt(89)/136) + 25*sqrt(9879)*t/17)*e^(-5275*t/17)/89
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Ul(0) → 20
# Расчет Uc(t):
Ac := -sqrt((Ucb - Uca)^2 + ((dUc0 + δ*(Ucb - Uca))/ω)^2) → -160*sqrt(17)*sqrt(89)/89
βc := asin((Ucb - Uca)/Ac) → -asin(1/136*sqrt(17)*sqrt(89))
Uca + Ac*sin(βc) → -20
Uc(t) := Ac*e^(-δ*t)*sin(ω*t + βc) + Uca → -160*sqrt(17)*sqrt(89)*e^(-5275*t/17)*sin(25*sqrt(9879)*t/17 - asin(1/136*sqrt(17)*sqrt(89)))/89 - 40
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Uc(0) → -20
Uc(1) float, 5 → -40.0
# Расчет i1(t): | Почему А отрицательное?
Ai1 := -sqrt((i1b - i1a)^2 + ((di10 + δ*(i1b - i1a))/ω)^2) float, 5 → -1.1993
βi1 := asin((i1b - i1a)/Ai1) float, 5 → 0.73025
i1a + Ai1*sin(βi1) → 1.59999984982
i1(t) := Ai1*e^(-δ*t)*sin(ω*t + βi1) + i1a → -1.1993*sin(25*sqrt(9879)*t/17 + 0.73025)*e^(-5275*t/17) + 12/5
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# Расчет i2(t):
Ai2 := sqrt((i20 - i2a)^2 + ((di20 + δ*(i20 - i2a))/ω)^2) float, 5 → 1.1993
βi2 := asin((i20 - i2a)/Ai2) float, 5 → -0.73025
# Почему А отрицательное?
i2a + Ai2*sin(βi2) → -0.80000015018
i2(t) := Ai2*e^(-δ*t)*sin(ω*t + βi2) + i2a → 1.1993*sin(25*sqrt(9879)*t/17 - 0.73025)*e^(-5275*t/17)
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# Расчет i3(t):
Ai3 := -sqrt((i30 - i3a)^2 + ((di30 + δ*(i30 - i3a))/ω)^2) float, 5 → -1.7868
βi3 := asin((i30 - i3a)/Ai3) float, 5 → 0.0
# Почему А отрицательное?
i3(t) := Ai3*e^(-δ*t)*sin(ω*t + βi3) + i3a → -1.7868*e^(-5275*t/17)*sin(25*sqrt(9879)*t/17) + 12/5
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