# Дано:
R := 25
C := 50*10^-6
E2 := 70
L := 170*10^-3
E1 := 180  # После комутации:
# До комутации:
i1b := E1/(3*R) → 12/5
i1a := E1/(2*R) → 18/5
i2b := 0
i3b := i1b → 12/5
i3a := i1a → 18/5
i2a := 0
Ucb := -E2 + 2*R*i3b → 50
Uca := -E2 + i3a*R → 20
# Расчет входного сопротивления:
Z(p) := 1/(p*C) + R*(p*L + R)/(2*R + p*L) solve, p → [-8050/17 - (50*sqrt(1279)/17)*1i; -8050/17 + 50/17*sqrt(1279)*1i]
δ := 8050/17
ω := 50/17*sqrt(1279)
# Токи переходных процессов для t=0:
# Система №1
Ma := [1, 0, R; 0, 0, R; 0, 1, 1] → [1, 0, 25; 0, 0, 25; 0, 1, 1]
Mb := [E1 - i1b*R; E2 + Ucb; i1b] → [120; 120; 12/5]
Mr := Ma^-1*Mb → [0; -12/5; 24/5]
i10 := i1b
Uc0 := Ucb
Ul0 := Mr[0] → 0
i20 := Mr[1] → -12/5
i30 := Mr[2] → 24/5
di10 := Ul0/L → 0
dUc0 := i20/C → -48000
# Система №2 (производные)
Mda := [1, 0, R; 0, 0, R; 0, 1, 1] → [1, 0, 25; 0, 0, 25; 0, 1, 1]
Mdb := [-di10*R; dUc0; di10] → [0; -48000; 0]
Mdr := Mda^-1*Mdb → [48000; 1920; -1920]
di20 := Mdr[1] → 1920
dUl0 := Mdr[0] → 48000
di30 := Mdr[2] → -1920
# Расчет Ul(t):
Al := -sqrt(Ul0^2 + ((dUl0 + δ*Ul0)/ω)^2) → -16320*sqrt(1279)/1279
βL := asin(Ul0/Al) → 0
Ul(t) := Al*e^(-δ*t)*sin(ω*t + βL) → -16320*sqrt(1279)*e^(-8050*t/17)*sin(50*sqrt(1279)*t/17)/1279
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Ul(0) → 0
# Расчет Uc(t):
Ac := -sqrt((Ucb - Uca)^2 + ((dUc0 + δ*(Ucb - Uca))/ω)^2) → -8160*sqrt(2)*sqrt(1279)/1279
βc := asin((Ucb - Uca)/Ac) → -asin(1/544*sqrt(2)*sqrt(1279))
Uca + Ac*sin(βc) → 50
Uc(t) := Ac*e^(-δ*t)*sin(ω*t + βc) + Uca → 20 - 8160*sqrt(2)*sqrt(1279)*e^(-8050*t/17)*sin(50*sqrt(1279)*t/17 - asin(1/544*sqrt(2)*sqrt(1279)))/1279
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Uc(0) → 50
Uc(1) float, 5 → 20.0
# Расчет i1(t): | Почему А отрицательное?
Ai1 := -sqrt((i1b - i1a)^2 + ((di10 + δ*(i1b - i1a))/ω)^2) float, 5 → -5.5339
βi1 := asin((i1b - i1a)/Ai1) float, 5 → 0.21858
i1a + Ai1*sin(βi1) → 2.40000904065
i1(t) := Ai1*e^(-δ*t)*sin(ω*t + βi1) + i1a → -5.5339*sin(50*sqrt(1279)*t/17 + 0.21858)*e^(-8050*t/17) + 18/5
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# Расчет i2(t):
Ai2 := sqrt((i20 - i2a)^2 + ((di20 + δ*(i20 - i2a))/ω)^2) float, 5 → 7.8261
βi2 := asin((i20 - i2a)/Ai2) float, 5 → -0.31169
# Почему А отрицательное?
i2a + Ai2*sin(βi2) → -2.40001164692
i2(t) := Ai2*e^(-δ*t)*sin(ω*t + βi2) + i2a → 7.8261*e^(-8050*t/17)*sin(50*sqrt(1279)*t/17 - 0.31169)
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# Расчет i3(t):
Ai3 := -sqrt((i30 - i3a)^2 + ((di30 + δ*(i30 - i3a))/ω)^2) float, 5 → -12.907
βi3 := asin((i30 - i3a)/Ai3) float, 5 → -0.093107
# Почему А отрицательное?
i3(t) := Ai3*e^(-δ*t)*sin(ω*t + βi3) + i3a → -12.907*sin(50*sqrt(1279)*t/17 - 0.093107)*e^(-8050*t/17) + 18/5
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