# Дано:
R := 25
C := 50*10^-6
E1 := 120
k := 1.0  # Проверка:
Ropr := R + R*R/(R + R) → 75/2
# Расчет входного сопротивления:
iopr := 1/Ropr float, 5 → 0.026667
Zo(p) := (2*R + R*(1/(C*p) + R)/(2*R + 1/(C*p)) → (500000/p + 625)/(20000/p + 50) + 50)
i1pr := iopr*R/(R + R) → 0.0133335
p1 := Zo(p) solve, p → -480
# Общий ток:
Io(p) := 1/(p*Zo(p)) simplify → 2*(p + 400)/(125*p*(p + 480))
ion(t) := Io(p) invlaplace, p → e^(-480*t)/750 + 1/150
ion(1) float, 5 → 0.0066667
# Ток в ветвях: | Правильно
I1(p) := Io(p)*R/(2*R + 1/(C*p)) → (2*p + 800)/(5*p*(20000/p + 50)*(p + 480))
I2(p) := Io(p)*R/(2*R + 1/(C*p)) → (2*p + 800)/(5*p*(20000/p + 50)*(p + 480))
i1n(t) := I1(p) invlaplace, p → e^(-480*t)/125
i2n(t) := i1n(t) → e^(-480*t)/125
i2n(1) float, 5 → 2.7653e-211
# Постоянная времени, период: | Правильно
τ := 1/|p1| float, 5 → 0.0020833
T := k*τ → 0.0020833
# Напряжение на емкости:
Ucnp(p) := 1/(C*p)*I2(p) → 4000*(2*p + 800)/(p^2*(20000/p + 50)*(p + 480))
Ucnt(t) := Ucnp(p) invlaplace, p → 1/3 - e^(-480*t)/3
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# Напряжение на 0; T
# тут своя функция
U0T(t) := -3*E1/T*t + E1
UTinf(t) := 0
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# Производные от напряжения:
U0T(0) = 120
U0T(T) = -240
U0Tp(t) := d/dt(U0T(t)) → -172802.764844
UTinfp(t) := d/dt(UTinf(t)) → 0
# Поведение входного тока:
# 1. 0<t<T
io0T(t) := U0T(0)*ion(t) + integral(U0Tp(x)*ion(t - x), x = 0 .. t) → 0.640007680123*e^(-480*t) + (-1152.01843229*t) + 0.319992319877
# 2. T<t<∞
ioTinf(t) := U0T(0)*ion(t) + integral(U0Tp(x)*ion(t - x), x = 0 .. T) + (UTinf(T) - U0T(T))*ion(t - T) → -0.664767597704*e^(-480*t) + 0.32*e^(0.999984 - 480*t) - 6.77099999515e-20
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io0T(T) = -1.84456
io0T(0) = 0.96
# Поведение напряжения на кондере
# 1. 0<t<T
Uc0T(t) := U0T(0)*Ucnt(t) + integral(U0Tp(x)*Ucnt(t - x), x = 0 .. t) simplify → 160.001920031 - 160.001920031*e^(-480.0*t) - 57600.9216147*t
# 2. T<t<∞
UcTinf(t) := U0T(0)*Ucnt(t) + integral(U0Tp(x)*Ucnt(t - x), x = 0 .. T) + (UTinf(T) - U0T(T))*Ucnt(t - T) → 166.191899426*e^(-480*t) + (-80.0*e^(0.999984 - 480*t)) + 7.81100001062e-19
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Uc0T(0) = 0
Uc0T(T) = -18.8604
UcTinf(0) = -51.2672
UcTinf(T) = -18.8604
# Проверки:
# Расчет напряжения на индуктивности через ток
L*d/dt(io0T(t)) → L*(-307.203686459*e^(-480*t) - 1152.01843229)
L*d/dt(ioTinf(t)) → L*(319.088446898*e^(-480*t) + (-153.6*e^(0.999984 - 480*t)))
# (с) by Ashaev Yuriy 2009 :)
