# Дано:
R := 25
L := 170*10^-3
E1 := 90
k := 0.9  # Проверка:
Ropr := R + R*R/(R + R) → 75/2
# Расчет входного сопротивления:
iopr := 1/Ropr float, 5 → 0.026667
Zo(p) := R + R*R/(2*R) + L*p → 17*p/100 + 75/2
i1pr := iopr*R/(R + R) → 0.0133335
p1 := Zo(p) solve, p → -3750/17
# Общий ток:
Io(p) := 1/(p*Zo(p)) simplify → 100/(p*(17*p + 3750))
ion(t) := Io(p) invlaplace, p → 2/75 - 2*e^(-3750*t/17)/75
# Ток в ветвях:
ion(1) float, 5 → 0.026667
Правильно
I1(p) := Io(p)*R/(R + R) → 50/(p*(17*p + 3750))
I2(p) := Io(p)*R/(R + R) → 50/(p*(17*p + 3750))
i1n(t) := I1(p) invlaplace, p → 1/75 - e^(-3750*t/17)/75
i2n(t) := i1n(t) → 1/75 - e^(-3750*t/17)/75
i2n(1) float, 5 → 0.013333
# Постоянная времени, период: | Правильно
τ := 1/|p1| float, 5 → 0.0045333
T := k*τ → 0.00407997
# Напряжение на емкости:
Ulnp(p) := L*p*Io(p) → 17/(17*p + 3750)
Ulnt(t) := Ulnp(p) invlaplace, p → e^(-3750*t/17)
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# Напряжение на 0; T
U0T(t) := -E1/(2*T)*t + E1
UTinf(t) := 0
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# Производные от напряжения:
U0Tp(t) := d/dt(U0T(t)) → -11029.4928639
UTinfp(t) := 0
# Поведение входного тока:
# 1. 0<t<T
io0T(t) := U0T(0)*ion(t) + integral(U0Tp(x)*ion(t - x), x = 0 .. t) → -294.119809704*t + (-3.73334313733*e^(-3750*t/17)) + 3.73334313733
# 2. T<t<∞
ioTinf(t) := U0T(0)*ion(t) + integral(U0Tp(x)*ion(t - x), x = 0 .. T) + (UTinf(T) - U0T(T))*ion(t - T) → -0.453869910986*e^(-3750*t/17) + 1.2*e^(0.899993382353 - 3750*t/17)
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# Поведение напряжения на индуктивности:
# 1. 0<t<T
Ul0T(t) := U0T(0)*Ulnt(t) + integral(U0Tp(x)*Ulnt(t - x), x = 0 .. t) simplify → 140.00036765*e^(-220.588235294*t) - 50.0003676498
# 2. T<t<∞
UlTinf(t) := U0T(0)*Ulnt(t) + integral(U0Tp(x)*Ulnt(t - x), x = 0 .. T) + (UTinf(T) - U0T(T))*Ulnt(t - T) → 90*e^(-3750*t/17) + (-72.979878338*e^(-3750*t/17)) + (-45.0*e^(0.899993382353 - 3750*t/17))
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# Проверки:
# Расчет напряжения на индуктивности через ток
L*d/dt(io0T(t)) → 140.00036765*e^(-3750*t/17) - 50.0003676498
L*d/dt(ioTinf(t)) → 17.020121662*e^(-3750*t/17) + (-45.0*e^(0.899993382353 - 3750*t/17))
# (с) by Ashaev Yuriy 2009 :)
