j := sqrt(-1)
15 + 12.285
R := 15
atan(12.285/15) = 0.686219
xl2 := 5
xl1 := 5
200*e^0.35j/(20.23*e^0.686j) = 9.33348 - 3.25965i
xc1 := 20
xc2 := 45
Z := 15 + 12.285j
E := 200*e^0.35j
I21 := R/Z = 0.59853 - 0.490196i
E = 187.875 + 68.5796i
|I21|^2 = 0.59853
I11 := E/Z
5.625j/(15 + 12.285) = 0.206157i
|I11|^2 = 106.405
I11 = 9.73773 - 3.40323i
0.206j*5.625j = -1.15875
I21 = 0.59853 - 0.490196i
sqrt(106.405 + 100) = 14.3668
I31 := 5.625j/Z = 0.183823 + 0.224449i
|I21|^2 =  # no stored result
|I31|^2 = 0.0841682
Uz2 := I31*5.625j = -1.26252 + 1.03401i
6j^2 = -36
|Uz2|^2 = 2.66314
Z13 := 15j*(-6.66)*j/(5j - 6.66j) = 60.1807i
Z23 := (-15j*3*45j)/(15j - 135j) = 16.875i
