# Дано:
R := 25
C := 50*10^-6
E2 := 70
L := 170*10^-3
E1 := 180
# До комутации: b-before | После комутации: a-after
i1a := E1/(2*R) → 18/5
i1b := E1/(3*R) → 12/5
i2b := 0
i3a := i1a → 18/5
i3b := i1b → 12/5
i2a := 0
Ucb := -E2 + i3b*2*R → 50
Uca := -E2 + i3a*R → 20
# Расчет эквивалентной схемы:
R11(p) := 2*R + p*L → 17*p/100 + 50
Ek1(p) := E1/p + 4/10 → 180/p + 2/5
R22(p) := R + 1/(p*C) → 20000/p + 25
Ek2(p) := E2/p + Ucb/p → 120/p
R12(p) := R → 25
R21(p) := R12(p)
MR(p) := [R11(p), R12(p); R21(p), R22(p)]
ME(p) := [Ek1(p); Ek2(p)]
Ik(p) := MR(p)^-1*ME(p) simplify → [
    40*(p^2 + 950*p + 360000)/(p*(17*p^2 + 16100*p + 4000000));
    (208*p/5 + 6000)/(17*p^2 + 16100*p + 4000000)
]
# Расчет i1(t):
i1(t) := Ik(p)[0] invlaplace, p; simplify → 18/5 - 16866*sqrt(1279)*e^(-8050*t/17)*sin(50*sqrt(1279)*t/17)/108715 - 106*e^(-8050*t/17)*cos(50*sqrt(1279)*t/17)/85
i1(t) laplace; simplify → 40*(s^2 + 950*s + 360000)/(s*(17*s^2 + 16100*s + 4000000))
sqrt((16866*sqrt(1279)/108715)^2 + (106/85)^2) float, 5 → 5.6867
i1(1) float, 5 → 3.6
di1(t) := d/dt(i1(t)) → 2000*e^(-8050*t/17)*cos(50*sqrt(1279)*t/17)/289 + 28510000*sqrt(1279)*e^(-8050*t/17)*sin(50*sqrt(1279)*t/17)/369631
di1(0) → 2000/289
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# Расчет i3(t):
i2(t) := (-Ik(p))[1] invlaplace, p; simplify → 8*e^(-8050*t/17)*(66508*sin(25*sqrt(1279)*t/17)^2 + 2911*sqrt(1279)*sin(50*sqrt(1279)*t/17) - 33254)/108715
i2(t) laplace; simplify → -16*(13*s + 1875)/(5*(17*s^2 + 16100*s + 4000000))
i2(0) float, 5 → -2.4471
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# Расчет i2(t):
i3(t) := i1(t) - i2(t) simplify → 6*e^(-8050*t/17)*cos(50*sqrt(1279)*t/17)/5 - 2362*sqrt(1279)*e^(-8050*t/17)*sin(50*sqrt(1279)*t/17)/6395 + 18/5
i3(0) float, 2 → 4.8
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i1(0) - i2(0) - i3(0) → 0
Ucp(p) := 1/(p*C)*(-Ik(p))[1] + Ucb/p simplify → (510*p - 349000)/(17*p^2 + 16100*p + 4000000) + 20/p
Ucpt(t) := Ucp(p) invlaplace, p; simplify → 30*e^(-8050*t/17)*cos(50*sqrt(1279)*t/17) - 11810*sqrt(1279)*e^(-8050*t/17)*sin(50*sqrt(1279)*t/17)/1279 + 20
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Ucpt(1) float, 5 → 20.0
Ulp(p) := L*(p*Ik(p)[0] - i1(0)) → 17*(40*p^2 + 38000*p + 14400000)/(100*(17*p^2 + 16100*p + 4000000)) - 2/5
Ult(t) := Ulp(p) invlaplace, p; simplify → 20*e^(-8050*t/17)*(1279*cos(50*sqrt(1279)*t/17) + 14255*sqrt(1279)*sin(50*sqrt(1279)*t/17))/21743
dUl(t) := d/dt(Ult(t)) → 20*e^(-8050*t/17)*(911607250*cos(50*sqrt(1279)*t/17)/17 - 63950*sqrt(1279)*sin(50*sqrt(1279)*t/17)/17)/21743 - 161000*e^(-8050*t/17)*(1279*cos(50*sqrt(1279)*t/17) + 14255*sqrt(1279)*sin(50*sqrt(1279)*t/17))/369631
dUl(0) → 14094000/289
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Ult(0) → 20/17
