R5 := 200
Zb := R5
Uan := 12.6*e^(1i*0)
Zc := R5
Ubn := 12.6*e^(-1i*2*π/3)
Ucn := 12.6*e^(1i*2*π/3)
I11 := Uan/102 → 0.123529411765
I12 := Ubn/200 → -0.0315i*sqrt(3) - 0.0315
arg(I12) = -120 deg
|I12| → 0.063
I13 := Ucn/200 → 0.0315i*sqrt(3) - 0.0315
arg(I13) = 120 deg
|I13| → 0.063
I1sum := I11 - I12 - I13 → 0.186529411765
arg(I1sum) = 0 deg
|I1sum| → 0.186529411765
I21 := Uan/102*200/400 → 0.0617647058824
I22 := Ubn/200 → -0.0315i*sqrt(3) - 0.0315
arg(I22) = -120 deg
|I22| → 0.063
I2sum := -I21 + I22 → -0.0315i*sqrt(3) - 0.0932647058824
arg(I2sum) = -149.672 deg
|I2sum| → 0.108051170115
I31 := Uan/102*200/400 → 0.0617647058824
I33 := Ucn/200 → 0.0315i*sqrt(3) - 0.0315
arg(I33) = 120 deg
|I33| → 0.063
I3sum := -I31 + I33 → 0.0315i*sqrt(3) - 0.0932647058824
arg(I3sum) = 149.672 deg
|I3sum| → 0.108051170115
IN1 := I1sum + I2sum + I3sum → -1.99999999806e-21
|IN1| → 1.99999999806e-21
Unn1 := -Uan → -12.6
arg(Unn1) = 180 deg
Unn1 := -Ubn + I2sum*Zb → -12.3529411765
arg(Unn1) = 180 deg
|Unn1| → 12.3529411765
Uan1 := Uan → 12.6
Unn1 := -Ucn + I3sum*Zc → -12.3529411765
arg(Uan1) = 0 deg
arg(Unn1) = 180 deg
|Uan1| → 12.6
|Unn1| → 12.3529411765
Ubn1 := I2sum*Zb → -6.3i*sqrt(3) - 18.6529411765
arg(Ubn1) = -149.672 deg
Uab := 21.7*e^(1i*π/6)
|Ubn1| → 21.6102340231
Ucn1 := I3sum*Zc → 6.3i*sqrt(3) - 18.6529411765
Ubc := 21.9*e^(-1i*π/2)
arg(Ucn1) = 149.672 deg
|Ucn1| → 21.6102340231
Uca := 21.5*e^(1i*5*π/6)
P1 := -Uca*conj(I1sum) → 2.00519117647*sqrt(3) - 2.00519117647i
Re(P1) float, 5 → 3.4731
P2 := Ubc*conj(I2sum) → 0.68985*sqrt(3) + 2.04249705882i
Re(P2) float, 5 → 1.1949
# [reference: VeSt - ASIC 3 Licens.mcd]
vU3 := vector([-Unn1; Uan1]*e^(1i*π/2), 3, 1)
vU1 := vector([-Unn1; Ubn1]*e^(1i*π/2), 3, 1)
vU2 := vector([-Unn1; Ucn1]*e^(1i*π/2), 3, 1)
I23sum := I2sum + I3sum → -0.186529411765
vI1 := vector([[I2sum; I3sum], [I23sum; I1sum]]*e^(1i*π/2), [4, 4], [0.01, 0.01])
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