R3 := 102
R5 := 200
Uan := 12.4*e^(1i*0)
Za := ∞
Zb := R5
Ubn := 12.7*e^(-1i*2*π/3)
Zc := R5
Ucn := 12.6*e^(1i*2*π/3)
Ia := Uan/Za → 0
|Ia| float, 5 → 0.0
Ib := Ubn/Zb → -0.03175i*sqrt(3) - 0.03175
|Ib| float, 5 → 0.0635
Ic := Ucn/Zc → 0.0315i*sqrt(3) - 0.0315
|Ic| float, 5 → 0.063
P1 := Uan*conj(Ia) → 0
Re(P1) → 0
P2 := Ubn*conj(Ib) → (-6.35i*sqrt(3) - 6.35)*(0.03175i*sqrt(3) - 0.03175)
Re(P2) → 0.80645
P3 := Ucn*conj(Ic) → (6.3i*sqrt(3) - 6.3)*(-0.0315i*sqrt(3) - 0.0315)
Re(P3) → (6.3i*sqrt(3) - 6.3)*(-0.0315i*sqrt(3) - 0.0315)
# [reference: VeSt - ASIC 3 Licens.mcd]
vU1 := vector([Uan; Ubn; Ucn]*e^(1i*π/2), 1, 1)
Ibc := Ib + Ic
vI1 := vector([[Ib; Ic], [Ibc; Ia]]*e^(1i*π/2), [4, 4], [0.01, 0.01])
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