Xl := 160
R3 := 102
Uan := 12.4*e^(1i*0)
Xc := 315
R5 := 200
Za := R5
Zb := 1i*Xl
Ubn := 12.7*e^(-1i*2*π/3)
Zc := -1i*Xc
Ucn := 12.6*e^(1i*2*π/3)
Ia := Uan/Za → 0.062
|Ia| float, 5 → 0.062
Ib := Ubn/Zb → -0.0396875*sqrt(3) + 0.0396875i
|Ib| float, 5 → 0.079375
Ic := Ucn/Zc → -0.02*sqrt(3) - 0.02i
|Ic| float, 5 → 0.04
P1 := Uan*conj(Ia) → 0.7688
Re(P1) → 0.7688
P2 := Ubn*conj(Ib) → (-0.0396875*sqrt(3) - 0.0396875i)*(-6.35i*sqrt(3) - 6.35)
Re(P2) → -0.252015625*sqrt(3) + 0.252015625*sqrt(3)
P3 := Ucn*conj(Ic) → (-0.02*sqrt(3) + 0.02i)*(6.3i*sqrt(3) - 6.3)
Re(P3) → -0.126*sqrt(3) + 0.126*sqrt(3)
# [reference: VeSt - ASIC 3 Licens.mcd]
vU1 := vector([Uan; Ubn; Ucn]*e^(1i*π/2), 1, 1)  # error: Эта переменная не определена.
Ibc := Ib + Ic
vI1 := vector([[Ic; Ib], [Ibc; Ia]]*e^(1i*π/2), [4, 4], [0.01, 0.01])  # error: Эта переменная не определена.
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