# Обрыв в фазе (B) в цепи без нейтрального провода
Ea := 10*e^(1i*π/2)*V
Eb := 10*e^(1i*(π/2 - 2*π/3))*V
Ec := 10*e^(1i*(π/2 + 2*π/3))*V
# Сопротивление R5 | Обрыв | Сопротивление R5
Za := 211*Ω
Zb := ∞*Ω
Zc := 211*Ω
Un1n := (Ea/Za + Eb/Zb + Ec/Zc)/(1/Za + 1/Zb + 1/Zc)
Un1n = (-4.33013 + 2.5i) V
|Un1n| = 5 V
arg(Un1n) = 150 deg
Uan1 := Ea - Un1n
Uan1 = (4.33013 + 7.5i) V
|Uan1| = 8.66025 V
arg(Uan1) = 60 deg
Ubn1 := Eb - Un1n
Ubn1 = (12.9904 - 7.5i) V
|Ubn1| = 15 V
arg(Ubn1) = -30 deg
Ucn1 := Ec - Un1n
Ucn1 = (-4.33013 - 7.5i) V
|Ucn1| = 8.66025 V
arg(Ucn1) = -120 deg
Ia := Uan1/Za
Ia = (20.5219 + 35.545i) mA
|Ia| = 41.0439 mA
arg(Ia) = 60 deg
Ib := Ubn1/Zb
Ib = (1.29904e-303 - 7.5e-304i) mA
|Ib| = 1.5e-303 mA
arg(Ib) = -30 deg
Ic := Ucn1/Zc
Ic = (-20.5219 - 35.545i) mA
|Ic| = 41.0439 mA
arg(Ic) = -120 deg
i := 1 .. 10
I[i] := 0, Ia, 0, Ib, 0, Ic, 0
U[i] := 0, Ea, Un1n, 0, Eb, Un1n, 0, Ec, Un1n, 0
R := 100 Ω
II[i] := Un1n/R + I[i]
II[i] = [-0.0433013 + 0.025i; -0.0227793 + 0.060545i; -0.0433013 + 0.025i; -0.0433013 + 0.025i; -0.0433013 + 0.025i; -0.0638232 - 0.010545i; -0.0433013 + 0.025i; -0.0433013 + 0.025i; -0.0433013 + 0.025i; -0.0433013 + 0.025i] A
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