U1 := 15.800
R2 := 96
R1 := 150.370
w := 314
L1 := 0.119
L2 := 0.380
XL1 := w*L1 → 37.366
XL2 := w*L2 → 119.32
M := 0.147434
XM := w*M → 46.294276
Z1 := (R1 + (XL1 + XM)*1i) + (R2 + (XL2 + XM)*1i) → 246.37 + 249.274552i
I := U1/Z1 → 0.0316897868699 - 0.0320633901244i
|I| → 0.0450810778279
UR1 := R1*I → 4.76519325162 - 4.82137197301i
UL1 := XL1*1i*I → 1.19808063539 + 1.18412057618i
UM := XM*1i*I → 1.48435143192 + 1.46705573973i
UR2 := R2*I → 3.04221953951 - 3.07808545195i
UL2 := XL2*1i*I → 3.82580370965 + 3.78122536931i
UR1 + UL1 + UM + UR2 + UL2 + UM → 15.8 - 1.15000000087e-19i
# [reference: VeSt - ASIC 3 Licens.mcd]
[UR1; UL1; UM; UR2; UL2; UM]
vI1 := vector(I, 1, 0.01)
vU1 := vector([UR1; UL1; UM; UR2; UL2; UM], 3, 1)
arg(UR1) = -45.3358 deg
arg(UR2) = -45.3358 deg
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