Em := 80
L := 4*10^-3
ω := 1000
R := 20
C := 14*10^-6
View(E) := [|E|, arg(E)/deg]
# 1.
E(ωt) :=
    0 if 0 ≤ ωt < π/6
    1/2*Em if π/6 < ωt ≤ π/3
    Em if π/3 < ωt < 2*π/3
    1/2*Em if 2*π/3 < ωt ≤ 5*π/6
    0 if 5*π/6 < ωt ≤ 7*π/6
    -1/2*Em if 7*π/6 < ωt ≤ 4*π/3
    -Em if 4*π/3 < ωt < 5*π/3
    -1/2*Em if 5*π/3 < ωt ≤ 11*π/6
    0 if 11*π/6 < ωt ≤ 13*π/6
    1/2*Em if 13*π/6 < ωt < 7*π/3
    Em if 7*π/3 < ωt < 15*π/6
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U1 := 69.571  # B
View(U1) = [69.571, 0]
U3 := -16.977  # B
View(U3) = [16.977, 180]
U5 := -3.728  # B
View(U5) = [3.728, 180]
e1(ωt) := U1*sin(ωt)
e3(ωt) := U3*sin(3*ωt)
e5(ωt) := U5*sin(5*ωt)
eΣ(ωt) := e1(ωt) + e3(ωt) + e5(ωt)
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# 3 )
k := 1
E1 := U1/sqrt(2)
E1 = 49.1941
View(E1) = [49.1941, 0]
XC := 1/(ω*C*k) → 500/7
XC = 71.4286
View(XC) = [71.4286, 0]
XL := ω*L*k → 4
XL = 4
View(XL) = [4, 0]
Z1 := -1i*XC + R*(1i*XL)/(R + 1i*XL) → 10/13 - 6150/91*1i
Z1 = 0.769231 - 67.5824i
View(Z1) = [67.5868, -89.3479]
I11 := E1/Z1
I11 = 0.00828412 + 0.727819i
View(I11) = [0.727866, 89.3479]
I21 := I11*1i*XL/(R + 1i*XL)
I21 = -0.139647 + 0.0295861i
View(I21) = [0.142746, 168.038]
I31 := I11*R/(R + 1i*XL)
I31 = 0.147931 + 0.698233i
View(I31) = [0.713731, 78.0379]
Uv1 := (I31*1i*XL)
Uv1 = -2.79293 + 0.591723i
View(Uv1) = [2.85493, 168.038]
k := 3
E3 := U3/sqrt(2)
E3 = -12.0046
View(E3) = [12.0046, 180]
XC := 1/(ω*C*k) → 500/21
XC = 23.8095
View(XC) = [23.8095, 0]
XL := ω*L*k → 12
XL = 12
View(XL) = [12, 0]
Z3 := -1i*XC + R*(1i*XL)/(R + 1i*XL) → 90/17 - 5350/357*1i
Z3 = 5.29412 - 14.986i
View(Z3) = [15.8936, -70.5432]
I13 := E3/Z3
I13 = -0.25159 - 0.712172i
View(I13) = [0.755306, -109.457]
I23 := I13*1i*XL/(R + 1i*XL)
I23 = 0.247596 - 0.299512i
View(I23) = [0.388601, -50.4206]
I33 := I13*R/(R + 1i*XL)
I33 = -0.499186 - 0.41266i
View(I33) = [0.647669, -140.421]
Uv3 := I33*1i*XL
Uv3 = 4.95193 - 5.99023i
View(Uv3) = [7.77203, -50.4206]
k := 5
E5 := U5/sqrt(2)
E5 = -2.63609
View(E5) = [2.63609, 180]
XC := 1/(ω*C*k) → 100/7
XC = 14.2857
View(XC) = [14.2857, 0]
XL := ω*L*k → 20
XL = 20
View(XL) = [20, 0]
Z5 := -1i*XC + R*(1i*XL)/(R + 1i*XL) → 10 - 30/7*1i
Z5 = 10 - 4.28571i
View(Z5) = [10.8797, -23.1986]
I15 := E5/Z5
I15 = -0.222704 - 0.0954448i
View(I15) = [0.242295, -156.801]
I25 := I15*1i*XL/(R + 1i*XL)
I25 = -0.0636299 - 0.159075i
View(I25) = [0.171329, -111.801]
I35 := I15*R/(R + 1i*XL)
I35 = -0.159075 + 0.0636299i
View(I35) = [0.171329, 158.199]
Uv5 := I25*R
Uv5 = -1.2726 - 3.18149i
View(Uv5) = [3.42657, -111.801]
UV5 := I35*1i*XL
UV5 = -1.2726 - 3.18149i
View(UV5) = [3.42657, -111.801]
i1 := I11 + I13 + I15
i1 = -0.46601 - 0.079798i
View(i1) = [0.472793, -170.283]
i2 := I21 + I23 + I25
i2 = 0.0443199 - 0.429i
View(i2) = [0.431283, -84.1017]
i3 := I31 + I33 + I35
i3 = -0.51033 + 0.349202i
View(i3) = [0.618368, 145.617]
# 4 )
I1 := sqrt(|I11|^2 + |I13|^2 + |I15|^2)
I1 = 1.07656
I2 := sqrt(|I21|^2 + |I23|^2 + |I25|^2)
I2 = 0.448041
I3 := sqrt(|I31|^2 + |I33|^2 + |I35|^2)
I3 = 0.978898
Uv := sqrt(|Uv1|^2 + |Uv3|^2 + |Uv5|^2)
Uv = 8.96083
# 5 )
P := R*(|I21|^2 + |I23|^2 + |I25|^2)
P = 4.01482
PP := E1*|I11|*cos(arg(I11)) + E3*|I13|*cos(arg(I13)) + E5*|I15|*cos(arg(I15))
PP = 4.01482
Q := |I11|*|E1|*sin(-arg(I11) - arg(E1)) + |I13|*|E3|*sin(-arg(I13) - arg(E3))
Q := Q + |I15|*|E5|*sin(-arg(I15) - arg(E5))
Q = -44.6053
S := sqrt(|E1|^2 + |E3|^2 + |E5|^2)*I1
S = 54.5883
T := sqrt(S^2 - P^2 - Q^2)
T = 31.211
λ := P/S
λ = 0.0735473
# 6 )
Z := -1i/(k*ω*C) + R*k*1i*ω*L/(R + k*1i*ω*L)
Z = 10 - 4.28571i
Im(Z) == 0
-1/(k*ω*CR) + R^2*k*ω*L/(R^2 + (k*ω*L)^2) == 0
CR := (R^2 + (k*ω*L)^2)/((R*k*ω)^2*L)
k == 3
ω == 1000
CR = 2e-5
Z := -1i/(k*ω*CR) + R*k*1i*ω*L/(R + k*1i*ω*L)
Z = 10
