# Дано:
R := 25
C := 50*10^-6
E2 := 100
L := 170*10^-3
E1 := 120
# До комутации: b-before | После комутации: a-after
i1a := E1/(2*R) → 12/5
i1b := E1/(3*R) → 8/5
i2b := 0
i3a := i1a → 12/5
i3b := i1b → 8/5
i2a := 0
Ucb := -E2 + i3b*2*R → -20
Uca := -E2 + i3a*R → -40
# Расчет эквивалентной схемы:
R11(p) := 2*R + p*L → 17*p/100 + 50
Ek1(p) := E1/p + i1b*L → 120/p + 34/125
R22(p) := 2*R + 1/(p*C) → 20000/p + 50
Ek2(p) := E2/p + Ucb/p → 80/p
R12(p) := R → 25
R21(p) := R12(p)
MR(p) := [R11(p), R12(p); R21(p), R22(p)]
ME(p) := [Ek1(p); Ek2(p)]
5*p*(17*p^2 + 10550*p + 2000000)
-5275/17 - (25*sqrt(9879)/17)*1i = -310.294 - 146.166i
[0; -5275/17 - (25*sqrt(9879)/17)*1i; -5275/17 + 25/17*sqrt(9879)*1i]
-5275/17 + 25/17*sqrt(9879)*1i = -310.294 + 146.166i
Ik(p) := MR(p)^-1*ME(p) simplify → [
    8*(17*p^2 + 11800*p + 3000000)/(5*p*(17*p^2 + 10550*p + 2000000));
    (68*p + 10000)/(5*(17*p^2 + 10550*p + 2000000))
]
# Расчет i1(t):
i1(t) := Ik(p)[0] invlaplace, p; simplify → 12/5 - 4*sqrt(9879)*e^(-5275*t/17)*sin(25*sqrt(9879)*t/17)/445 - 4*e^(-5275*t/17)*cos(25*sqrt(9879)*t/17)/5
i1(t) laplace; simplify → 8*(17*s^2 + 11800*s + 3000000)/(5*s*(17*s^2 + 10550*s + 2000000))
sqrt((25*sqrt(9879)/17)^2 + (5275/17)^2) float, 5 → 343.0
i1(1) float, 5 → 2.4
di1(t) := d/dt(i1(t)) → 2000*e^(-5275*t/17)*cos(25*sqrt(9879)*t/17)/17 + 6000*sqrt(9879)*e^(-5275*t/17)*sin(25*sqrt(9879)*t/17)/1513
di1(0) → 2000/17
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# Расчет i3(t):
i2(t) := (-Ik(p))[1] invlaplace, p; simplify → -4*e^(-5275*t/17)*(89*cos(25*sqrt(9879)*t/17) - sqrt(9879)*sin(25*sqrt(9879)*t/17))/445
-5275/17 - (25*sqrt(9879)/17)*1i = -310.294 - 146.166i
17*s^2 + 10550*s + 2000000
[-5275/17 - (25*sqrt(9879)/17)*1i; -5275/17 + 25/17*sqrt(9879)*1i]
-5275/17 + 25/17*sqrt(9879)*1i = -310.294 + 146.166i
i2(t) laplace; simplify → -4*(17*s + 2500)/(5*(17*s^2 + 10550*s + 2000000))
i2(0) float, 5 → -0.8
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# Расчет i2(t):
i3(t) := i1(t) - i2(t) simplify → 12/5 - 8*sqrt(9879)*e^(-5275*t/17)*sin(25*sqrt(9879)*t/17)/445
i3(0) float, 2 → 2.4
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i1(0) - i2(0) - i3(0) → 0
Ucp(p) := 1/(p*C)*(-Ik(p))[1] + Ucb/p simplify → (340*p - 61000)/(17*p^2 + 10550*p + 2000000) - 40/p
Ucpt(t) := Ucp(p) invlaplace, p; simplify → 20*e^(-5275*t/17)*cos(25*sqrt(9879)*t/17) - 60*sqrt(9879)*e^(-5275*t/17)*sin(25*sqrt(9879)*t/17)/89 - 40
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Ucpt(1) float, 5 → -40.0
Ulp(p) := L*(p*Ik(p)[0] - i1(0)) → 17*(136*p^2 + 94400*p + 24000000)/(500*(17*p^2 + 10550*p + 2000000)) - 34/125
Ult(t) := Ulp(p) invlaplace, p; simplify → 20*e^(-5275*t/17)*(89*cos(25*sqrt(9879)*t/17) + 3*sqrt(9879)*sin(25*sqrt(9879)*t/17))/89
dUl(t) := d/dt(Ult(t)) → 20*e^(-5275*t/17)*(740925*cos(25*sqrt(9879)*t/17)/17 - 2225*sqrt(9879)*sin(25*sqrt(9879)*t/17)/17)/89 - 105500*e^(-5275*t/17)*(89*cos(25*sqrt(9879)*t/17) + 3*sqrt(9879)*sin(25*sqrt(9879)*t/17))/1513
dUl(0) → 61000/17
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Ult(0) → 20
