A := [-1, 2, 3]
B := [5, -5, 0]
C := [9, 10, -4]
D := [-8, 1, 2]
MA := [6, 4, 6; 3, -7, 10; 10, 1, 2]
MZ := [1, 2, 3; 7, -6, 4; 0, 8, 2]
E := A + B + C + D*(MA*MZ) → [-271, -93, -292]
MB := [1, 4, 0; 3, -3, 4; 9, 5, 6]
MC := [16, 4, 3; 3, 0, 15; 1, 5, 2]
MD := MA*MB*transpose(MC) → [1476, 996, 386; 1580, 696, 551; 732, 333, 298]
transpose(sort(transpose(E))) → [-292, -271, -93]
MM := [3, 4, 7; 6, -8, 9; 2, 3, 5]
E := B*(MA*MM) + transpose(sort(transpose(E)))*MB → [-1607, -1260, -1142]
