E_0 := 24
R_2 := 4
R_3 := 2
i_огр := E_0/(R_2 + R_3) = 4
E_огр := E_0*R_3/(R_2 + R_3) = 8
k := 1/R_3 = 0.5
i_ψ1(u_r) :=
    i_огр if u_r ≤ E_огр
    (u_r*k) if u_r > E_огр
i_ψ2(u_r) :=
    -i_огр if u_r ≤ -E_огр
    (u_r*k) if u_r > -E_огр
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