f(t) := e^(-4*t) + sin(t)
f'(t) := d/dt(f(t)) → cos(t) - 4*e^(-4*t)
f''(t) := d/dt(f'(t)) → 16*e^(-4*t) - sin(t)
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f(0) → 1
f'(0) → -3
f''(0) → 16
M1 := 0.1
M2 := 0.3
M3 := 1.6
K12 := M2/M1 → 3.0
K23 := M3/M2 → 5.33333333333
K33 := 4*M3/M3 → 4.0
K32 := M2/M3 → 0.1875
K31 := 4*M1/M3 → 0.25
R12 := 1/K12 → 0.333333333333
R23 := 1/K23 → 0.1875
R33 := 1/K33 → 0.25
R32 := 1/K32 → 5.33333333333
R31 := 1/K31 → 4.0
