# Вхідні дані:
f1(t) := t + e^(4*t)
f2(t) := t*cos(2*t)
F1(y, t) := cos(d/dt(y))/cos(y)
F2(y) := y*sqrt(y)
U_max := 20
C1 := 0.8
C2 := -1
C3 := 1
t_max := 40
a0 := -4
a1 := -7
a2 := -2
b0 := -3
f2(t) := e^(-t)*cos(t) - sin(t)
y(t) := cosh(5*t)
y(0) → 1
f1(0) → 1 = 1
f1'(t) := d/dt(f1(t)) → 4*e^(4*t) + 1
f1'(0) = 5
f1''(t) := d/dt(f1'(t)) → 16*e^(4*t)
f1''(0) = 16
f1'''(t) := d/dt(f1''(t)) → 64*e^(4*t)
f1'''(0) = 64
f2(0) → 1 = 1
f2'(t) := d/dt(f2(t)) → -cos(t) - e^(-t)*cos(t) - e^(-t)*sin(t) → -cos(t) - e^(-t)*cos(t) - e^(-t)*sin(t)
f2'(0) = -2
f2''(t) := d/dt(f2'(t)) → sin(t) + 2*e^(-t)*sin(t)
f2''(0) = 0
f2'''(t) := d/dt(f2''(t)) → cos(t) + 2*e^(-t)*cos(t) - 2*e^(-t)*sin(t)
f2'''(0) = 3
f2''''(t) := d/dt(f2'''(t)) → -sin(t) - 4*e^(-t)*cos(t)
f2''''(40) = -0.745113
