# Вхідні дані:
f1(t) := cosh(t) + sin(t)
f2(t) := t*cos(2*t)
F1(y, t) := cos(d/dt(y))/cos(y)
F2(y) := y*sqrt(y)
U_max := 20
C1 := 0.8
C2 := -1
C3 := 1
t_max := 40
a0 := -4
a1 := -7
a2 := -2
b0 := -3
f2(t) := 2*t + sqrt(t^2 + 5)
y(t) := cosh(5*t)
y(0) → 1
f1(0) → 1 = 1
f1'(t) := d/dt(f1(t)) → sinh(t) + cos(t)
f1'(0) = 1
f1''(t) := d/dt(f1'(t)) → cosh(t) - sin(t)
f1''(0) = 1
f1'''(t) := d/dt(f1''(t)) → sinh(t) - cos(t)
f1'''(0) = -1
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f2(0) → sqrt(5) = 2.23607
f2'(t) := d/dt(f2(t)) → t/sqrt(t^2 + 5) + 2 → t/sqrt(t^2 + 5) + 2
f2'(0) = 2
f2''(t) := d/dt(f2'(t)) → (t^2 + 5)^(-1/2) - t^2/(t^2 + 5)^(3/2)
f2''(0) = 0.447214
f2'''(t) := d/dt(f2''(t)) → 3*t^3/(t^2 + 5)^(5/2) - 3*t/(t^2 + 5)^(3/2)
f2'''(0) = 0
f2''''(t) := d/dt(f2'''(t)) → 18*t^2/(t^2 + 5)^(5/2) - 3/(t^2 + 5)^(3/2) - 15*t^4/(t^2 + 5)^(7/2)
f2''''(40) = 5.79121e-7
