# Вхідні дані:
f1(t) := sin(t) - sinh(t)
f2(t) := t*cos(2*t)
F1(y, t) := cos(d/dt(y))/cos(y)
F2(y) := y*sqrt(y)
U_max := 50
C1 := 0.8
C2 := -1
C3 := 1
t_max := 40
a0 := -4
a1 := -7
a2 := -2
b0 := -3
f2(t) := sqrt(2*t)
y(t) := cosh(5*t)
y(0) → 1
f1(0) → 0 = 0
f1'(t) := d/dt(f1(t)) → cos(t) - cosh(t)
f1'(0) = 0
f1''(t) := d/dt(f1'(t)) → -sinh(t) - sin(t)
f1''(0) = 0
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f1'''(t) := d/dt(f1''(t)) → -cosh(t) - cos(t)
f1'''(4) = -26.6546
f2(40) → 4*sqrt(5) = 8.94427
f2'(t) := d/dt(f2(t)) → sqrt(2)/(2*sqrt(t)) → sqrt(2)/(2*sqrt(t))
f2'(40) = 0.111803
f2''(t) := d/dt(f2'(t)) → -sqrt(2)/(4*t^(3/2))
f2''(0) =  # error: Деление на ноль.
f2'''(t) := d/dt(f2''(t)) → 3*sqrt(2)/(8*t^(5/2))
f2'''(0) =  # error
f2''''(t) := d/dt(f2'''(t)) → -15*sqrt(2)/(16*t^(7/2))
f2''''(40) = -3.27549e-6
