# Вхідні дані:
f1(t) := e^(-t)*sin(5*t)
f2(t) := t*cos(2*t)
F1(y, t) := cos(d/dt(y))/cos(y)
F2(y) := y*sqrt(y)
U_max := 20
C1 := 0.8
C2 := -1
C3 := 1
t_max := 40
a0 := -4
a1 := -7
a2 := -2
b0 := -3
f2(t) := e^(5*t)*cos(4*t)
y(t) := cosh(5*t)
y(0) → 1
f1(0) → 0 = 0
f1'(t) := d/dt(f1(t)) → 5*cos(5*t)*e^(-t) - sin(5*t)*e^(-t)
f1'(0) = 5
f1''(t) := d/dt(f1'(t)) → -10*cos(5*t)*e^(-t) - 24*sin(5*t)*e^(-t)
f1''(0) = -10
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f1'''(t) := d/dt(f1''(t)) → 74*sin(5*t)*e^(-t) - 110*cos(5*t)*e^(-t)
f1'''(0) = -110
f2(1) → cos(4)*e^5 = -97.0093
f2'(t) := d/dt(f2(t)) → 5*cos(4*t)*e^(5*t) - 4*sin(4*t)*e^(5*t) → 5*cos(4*t)*e^(5*t) - 4*sin(4*t)*e^(5*t)
f2'(1) = -35.7688
f2''(t) := d/dt(f2'(t)) → 9*cos(4*t)*e^(5*t) - 40*sin(4*t)*e^(5*t)
f2''(0) = 9
f2'''(t) := d/dt(f2''(t)) → -115*cos(4*t)*e^(5*t) - 236*sin(4*t)*e^(5*t)
f2'''(0) = -115
f2''''(t) := d/dt(f2'''(t)) → -1519*cos(4*t)*e^(5*t) - 720*sin(4*t)*e^(5*t)
f2''''(40) = 9.56715e89
