# Вхідні дані:
f1(t) := sinh(5*t) + cos(t)
f2(t) := t*cos(2*t)
f2(t) := t*cos(2*t)
F1(y, t) := cos(d/dt(y))/cos(y)
F2(y) := y*sqrt(y)
U_max := 20
C1 := 0.8
C2 := -1
C3 := 1
t_max := 40
a0 := -4
a1 := -7
a2 := -2
b0 := -3
y(t) := cosh(5*t)
y(0) → 1
f1(0) → 1 = 1
f1'(t) := d/dt(f1(t)) → 5*cosh(5*t) - sin(t)
f1'(0) = 5
f1''(t) := d/dt(f1'(t)) → 25*sinh(5*t) - cos(t)
f1''(0) = -1
f1'''(t) := d/dt(f1''(t)) → 125*cosh(5*t) + sin(t)
f1'''(0) = 125
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f2(0) → 0 = 0
f2'(t) := d/dt(f2(t)) → cos(2*t) - 2*t*sin(2*t)
f2'(0) = 1
f2''(t) := d/dt(f2'(t)) → -4*sin(2*t) - 4*t*cos(2*t)
f2''(0) = 0
f2'''(t) := d/dt(f2''(t)) → 8*t*sin(2*t) - 12*cos(2*t)
f2'''(0) = -12
f2''''(t) := d/dt(f2'''(t)) → 32*sin(2*t) + 16*t*cos(2*t)
f2''''(40) = -102.452
