Eo1 := 5
Eo2 := 5
Uf1 := 7
Uf2 := -5.5
R0 := 420000
R3 := 200000
R22 := Eo2*R0/Uf1 - R3 → 100000
R21 := -Eo1*R0/Uf2 - R3 → 181818.181818
ki := 1/R3
Iogr1 := -Eo2/(R22 + R3)
Iogr2 := Eo1/(R21 + R3)
ku := -R0/R3 → -21/10
Eogr1 := Eo2*R0/(R22 + R3) → 7
Eogr2 := -Eo1*R0/(R21 + R3) → -5.5
Uf1pr := Eogr1 → 7
Uf2pr := Eogr2 → -5.5
deltaUf1 := Uf1pr - Uf1 → 0
deltaUf1 := Uf2pr - Uf2 → 0.0
