y(t) := e^(-4*t) + e^(-3*t)
y(0) = 2
y1(t) := d/dt(y(t)) → -3*e^(-3*t) - 4*e^(-4*t)
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y1(0) = -7
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M1 := |y(0)/10| = 0.2
M2 := |y1(0)/10| = 0.7
K12 := M2/M1 = 3.5
K21 := 7*M1/M2 = 2
K22 := 12 = 12
C := 10^-6
R12 := 1/(C*K12) = 285714
R21 := 1/(C*K21) = 500000
R22 := 1/(C*K22) = 83333.3
t := 0
d^3/dt^3(y(t)) → -91
d^2/dt^2(y(t)) → 25
d/dt(y(t)) → -7
НУ
y(t) → 2
M := 5
