# A = B  + C(MO*MX)alpha
N := 2
P := 17
H := ceil(N/P) = 1
f(i, j) := 1
B := matrix(1, N, f)
C := matrix(1, N, f)
MO := matrix(N, N, f)
MX := matrix(N, N, f)
α := 1
A := B + C*(MO*MX)*α = [5, 5]
α_g := 2
f_B(i, j) := j
B_g := matrix(1, N, f_B) = [0, 1]
f_C(i, j) := 5*j
C_g := matrix(1, N, f_C) = [0, 5]
f_MO(i, j) := 10 + 10*i + j
MO_g := matrix(N, N, f_MO)
f_MX(i, j) := 200 + 10*i + j
MX_g := matrix(N, N, f_MX)
A_g := B_g + C_g*(MO_g*MX_g)*α_g
A_g = [84100, 84511]
A_g[0, 0] = 84100
A_g[0, 1] = 84511
A_g[0, 2] =  # error: This array index is invalid for this array.
