# A = max(MO)*B + alpha*C*(MO*MK)
N := 110
P := 6
H := ceil(N/P) = 19
f(i, j) := 1
α := 1
B := matrix(1, N, f)
C := matrix(1, N, f)
MK := matrix(N, N, f)
MO := matrix(N, N, f)
A := max(MO)*B + α*C*(MO*MK)
α_g := 2
f_B(i, j) := j
B_g := matrix(1, N, f_B)
C_g := B_g
f_MO(i, j) := 10 + 10*i + j
MO_g := matrix(N, N, f_MO)
MK_g := MO_g
A_g := B_g*max(MO_g) + α_g*C_g*(MO_g*MK_g)
