# MA = max(MO)*ME  + alpha*MK*MR
N := 9
P := 9
H := ceil(N/P) = 1
f(i, j) := 1
α := 1
ME := matrix(N, N, f)
MO := matrix(N, N, f)
MK := matrix(N, N, f)
MR := matrix(N, N, f)
MA := max(MO)*ME + α*MK*MR = [
    10, 10, 10, 10, 10, 10, 10, 10, 10;
    10, 10, 10, 10, 10, 10, 10, 10, 10;
    10, 10, 10, 10, 10, 10, 10, 10, 10;
    10, 10, 10, 10, 10, 10, 10, 10, 10;
    10, 10, 10, 10, 10, 10, 10, 10, 10;
    10, 10, 10, 10, 10, 10, 10, 10, 10;
    10, 10, 10, 10, 10, 10, 10, 10, 10;
    10, 10, 10, 10, 10, 10, 10, 10, 10;
    10, 10, 10, 10, 10, 10, 10, 10, 10
]
α_g := 2
f_MO(i, j) := 10 + 10*i + j
MO_g := matrix(N, N, f_MO)
f_ME(i, j) := 200 + 10*i + j
ME_g := matrix(N, N, f_ME)
f_MK(i, j) := 300 + 10*i + j
MK_g := matrix(N, N, f_MK)
f_MR(i, j) := 400 + 10*i + j
MR_g := matrix(N, N, f_MR)
MO_g = [
    10, 11, 12, 13, 14, 15, 16, 17, 18;
    20, 21, 22, 23, 24, 25, 26, 27, 28;
    30, 31, 32, 33, 34, 35, 36, 37, 38;
    40, 41, 42, 43, 44, 45, 46, 47, 48;
    50, 51, 52, 53, 54, 55, 56, 57, 58;
    60, 61, 62, 63, 64, 65, 66, 67, 68;
    70, 71, 72, 73, 74, 75, 76, 77, 78;
    80, 81, 82, 83, 84, 85, 86, 87, 88;
    90, 91, 92, 93, 94, 95, 96, 97, 98
]
MA_g := max(MO_g)*ME_g + α_g*MK_g*MR_g
