# MA = MB  + alpha*MZ*MK
N := 9
P := 9
H := ceil(N/P) = 1
f(i, j) := 1
α := 1
MB := matrix(N, N, f)
MK := matrix(N, N, f)
MZ := matrix(N, N, f)
MA := MB + α*MZ*MK = [
    10, 10, 10, 10, 10, 10, 10, 10, 10;
    10, 10, 10, 10, 10, 10, 10, 10, 10;
    10, 10, 10, 10, 10, 10, 10, 10, 10;
    10, 10, 10, 10, 10, 10, 10, 10, 10;
    10, 10, 10, 10, 10, 10, 10, 10, 10;
    10, 10, 10, 10, 10, 10, 10, 10, 10;
    10, 10, 10, 10, 10, 10, 10, 10, 10;
    10, 10, 10, 10, 10, 10, 10, 10, 10;
    10, 10, 10, 10, 10, 10, 10, 10, 10
]
α_g := 2
f_MB(i, j) := 10 + 10*i + j
MB_g := matrix(N, N, f_MB)
f_MK(i, j) := 210 + 10*i + j
MK_g := matrix(N, N, f_MK)
f_MZ(i, j) := 310 + 10*i + j
MZ_g := matrix(N, N, f_MZ)
MB_g = [
    10, 11, 12, 13, 14, 15, 16, 17, 18;
    20, 21, 22, 23, 24, 25, 26, 27, 28;
    30, 31, 32, 33, 34, 35, 36, 37, 38;
    40, 41, 42, 43, 44, 45, 46, 47, 48;
    50, 51, 52, 53, 54, 55, 56, 57, 58;
    60, 61, 62, 63, 64, 65, 66, 67, 68;
    70, 71, 72, 73, 74, 75, 76, 77, 78;
    80, 81, 82, 83, 84, 85, 86, 87, 88;
    90, 91, 92, 93, 94, 95, 96, 97, 98
]
MA_g := MB_g + α_g*MZ_g*MK_g
MA_g = [
    1414210, 1419863, 1425516, 1431169, 1436822, 1442475, 1448128, 1453781, 1459434;
    1459220, 1465053, 1470886, 1476719, 1482552, 1488385, 1494218, 1500051, 1505884;
    1504230, 1510243, 1516256, 1522269, 1528282, 1534295, 1540308, 1546321, 1552334;
    1549240, 1555433, 1561626, 1567819, 1574012, 1580205, 1586398, 1592591, 1598784;
    1594250, 1600623, 1606996, 1613369, 1619742, 1626115, 1632488, 1638861, 1645234;
    1639260, 1645813, 1652366, 1658919, 1665472, 1672025, 1678578, 1685131, 1691684;
    1684270, 1691003, 1697736, 1704469, 1711202, 1717935, 1724668, 1731401, 1738134;
    1729280, 1736193, 1743106, 1750019, 1756932, 1763845, 1770758, 1777671, 1784584;
    1774290, 1781383, 1788476, 1795569, 1802662, 1809755, 1816848, 1823941, 1831034
]
